Simulations: Version=57
  Experiment
    Factors
      Factor SowDate: Specification=[SowingRule].Script.SowingDate = 2003-11-01, 2003-12-20
      Factor Fertiliser
        Specification=[FertiliserRule].Script.ApplicationAmount = 0, 20, 60, 80, 100
    Simulation Base
      Weather: FileName=WeatherFiles\lincoln.met
      Clock: StartDate=2003-10-20; EndDate=2004-05-23
      Summary
      Zone Field: Area=1; Slope=0
        Irrigation
        Fertiliser
        Report: EventNames=[Clock].DoReport
          VariableNames:
            [Clock].Today
            [FertiliserRule].Script.ApplicationAmount
            [SowingRule].Script.SowingDate.Year
            [SowingRule].Script.SowingDate.DayOfYear
        Soil: SoilType=Black Vertosol; LocalName=Waco; Site=Jimbour; NearestTown=Jimbour, Q 4352; Region=South East Queensland; NaturalVegetation=Grassland, mainly Qld bluegrass; Latitude=0; Longitude=0
          Water
            Thickness  BD    AirDry  LL15  DUL   SAT
            150        1.02  0.15    0.29  0.54  0.59
            150        1.03  0.26    0.29  0.53  0.58
            300        1.02  0.29    0.29  0.54  0.59
            300        1.02  0.29    0.29  0.54  0.58
            300        1.06  0.3     0.3   0.52  0.57
            300        1.11  0.31    0.31  0.5   0.55
            300        1.12  0.32    0.32  0.5   0.55
            300        1.15  0.33    0.33  0.48  0.53
            300        1.18  0.34    0.34  0.47  0.52
            300        1.2   0.35    0.35  0.46  0.51
            300        1.25  0.36    0.36  0.44  0.49
            SoilCrop WheatSoil
              LL=[0.29, 0.29, 0.32, 0.38, 0.39, 0.39, 0.41, 0.48, 0.47, 0.46, 0.44]
              KL=[0.1, 0.1, 0.08, 0.06, 0.04, 0.02, 0.01, 0, 0, 0, 0]
              XF=[1, 1, 1, 1, 1, 1, 1, 0, 0, 0, 0]
            SoilCrop BarleySoil
              LL=[0.29, 0.29, 0.36, 0.43, 0.51, 0.5, 0.5, 0.48, 0.47, 0.46, 0.44]
              KL=[0.1, 0.1, 0.08, 0.06, 0.04, 0.02, 0.01, 0, 0, 0, 0]
              XF=[1, 1, 1, 1, 1, 1, 1, 0, 0, 0, 0]
            SoilCrop PotatoSoil
              LL=[0.29, 0.29, 0.36, 0.43, 0.51, 0.5, 0.5, 0.48, 0.47, 0.46, 0.44]
              KL=[0.1, 0.1, 0.08, 0.06, 0.04, 0.02, 0.01, 0, 0, 0, 0]
              XF=[1, 1, 1, 1, 1, 1, 1, 0, 0, 0, 0]
          SoilWater: SummerDate=1-Nov; SummerU=6; SummerCona=3; WinterDate=1-Apr; WinterU=6; WinterCona=3; DiffusConst=40; DiffusSlope=16; Salb=0.13; CN2Bare=73; CNRed=20; CNCov=0.8; slope=0; discharge_width=0; catchment_area=0; max_pond=0; ResidueInterception=0
            Thickness  SWCON  KLAT
            150        0.3    0
            150        0.3    0
            300        0.3    0
            300        0.3    0
            300        0.3    0
            300        0.3    0
            300        0.3    0
            300        0.3    0
            300        0.3    0
            300        0.3    0
            300        0.3    0
          SoilOrganicMatter: RootCN=40; EnrACoeff=7.4; EnrBCoeff=0.2; OCUnits=Total
            Thickness  OC    SoilCN  FBiom  FInert  RootWt
            150        1.04  12.5    0.025  0.4     48.1286
            150        0.89  12.5    0.02   0.6     41.4247
            300        0.89  12.5    0.015  0.8     30.6882
            300        0.89  12.5    0.01   0.9     22.7344
            300        0.77  12.5    0.01   0.95    16.842
            300        0.45  12.5    0.01   0.95    12.4769
            300        0.27  12.5    0.01   0.95    9.2431
            300        0.22  12.5    0.01   0.95    6.84746
            300        0.16  12.5    0.01   0.95    5.07272
            300        0.13  12.5    0.01   0.95    3.75796
            300        0.12  12.5    0.01   0.95    2.78397
          Analysis: PHUnits=Water; BoronUnits=0
            Thickness  EC    PH
            150        0.2   8.4
            150        0.25  8.8
            300        0.31  9
            300        0.4   9.2
            300        0.59  9.2
            300        0.84  9.1
            300        0.93  9
            300        1.01  9
            300        1.06  8.9
            300        1.05  8.9
            300        1.01  8.9
          InitialWater Initial water: PercentMethod=0; FractionFull=1
          Sample: NO3Units=ppm; NH4Units=ppm; SWUnits=Volumetric; OCUnits=Total; PHUnits=Water
            Thickness  NO3    NH4
            150        6.503  0.599004
            150        2.101  0.100001
            300        2.101  0.100001
            300        1.701  0.100001
            300        1.701  0.100001
            300        1.701  0.100001
            300        1.701  0.100001
            300        1.701  0.100001
            300        1.701  0.100001
            300        1.701  0.100001
            300        1.701  0.100001
          CERESSoilTemperature
          Nutrient
            DirectedGraphInfo={Nodes=[{Name=Inert, OutlineColour=Black}, {Name=SurfaceResidue, OutlineColour=Black}, {Name=FOMLignin, OutlineColour=Black}, {Name=FOMCellulose, OutlineColour=Black}, {Name=FOMCarbohydrate, OutlineColour=Black}, {Name=Microbial, OutlineColour=Black}, {Name=Humic, OutlineColour=Black}, {Name=Urea, OutlineColour=Black}, {Name=NO3, OutlineColour=Black}, {Name=NH4, OutlineColour=Black}, {Name=Atmosphere, OutlineColour=White}, {Name=PlantAvailableNO3, OutlineColour=Black}, {Name=PlantAvailableNH4, OutlineColour=Black}], Arcs=[{SourceName=SurfaceResidue, DestinationName=Microbial}, {SourceName=SurfaceResidue, DestinationName=Humic}, {SourceName=FOMLignin, DestinationName=Microbial}, {SourceName=FOMLignin, DestinationName=Humic}, {SourceName=FOMCellulose, DestinationName=Microbial}, {SourceName=FOMCellulose, DestinationName=Humic}, {SourceName=FOMCarbohydrate, DestinationName=Microbial}, {SourceName=FOMCarbohydrate, DestinationName=Humic}, {SourceName=Microbial, DestinationName=Microbial}, {SourceName=Microbial, DestinationName=Humic}, {SourceName=Humic, DestinationName=Microbial}, {SourceName=Urea, DestinationName=NH4}, {SourceName=NO3, DestinationName=Atmosphere}, {SourceName=NH4, DestinationName=NO3}]}
        SurfaceOrganicMatter: InitialResidueName=Potato; InitialResidueType=Potato; InitialResidueMass=1000; InitialStandingFraction=0; InitialCPR=0; InitialCNR=80; FractionFaecesAdded=0.5
        MicroClimate: a_interception=0; b_interception=1; c_interception=0; d_interception=0; soil_albedo=0.3; SoilHeatFluxFraction=0.4; NightInterceptionFraction=0.5; ReferenceHeight=2
        Manager SowingRule
          SowingDate = 2003-11-10
```csharp
        using System;
        using Models.Core;
        using Models.PMF;
        namespace Models
        {
           
           [Serializable] 
           [System.Xml.Serialization.XmlInclude(typeof(Model))]
            public class Script : Model
            {      
               [Description("Sowing Date")]
               public DateTime SowingDate { get; set; }//= new DateTime(2003, 11, 10, 0, 0, 0);

            }
        }
```
        Manager FertiliserRule
          ApplicationAmount = 500
          FertType = NO3N
          ApplicationDate = 2003-12-30
```csharp
        using System;
        using Models.Core;
        using Models.PMF;
        namespace Models
        {
            [Serializable]
            public class Script : Model
            {      
               [Link] Fertiliser Fertiliser;
               [Link] Clock Clock;

               [Description("Amount (kg/ha) of fertiliser to apply")]
               public double ApplicationAmount {get; set;} //= 500;
               [Description("Type of fertiliser to apply")]
               public Fertiliser.Types FertType {get; set;}//= "NO3_N";
               [Description("Date of fertiliser application")]
               public DateTime ApplicationDate {get; set;} //= new DateTime(2003, 12, 30, 0, 0, 0);

               [EventSubscribe("DoManagement")]
               private void OnDoManagement(object sender, EventArgs e)
               {
               if (Clock.Today.Date.Equals(ApplicationDate))
                    Fertiliser.Apply(Amount:ApplicationAmount,Type:FertType);
                  //Fertiliser.Apply(Amount:a, Type:"b", Depth:c)
                  //a is a double and can be represented by a variable name or a number representing the amount (kg/ha) of fertiliser to apply
                  //b is a string and can be represented by a variable name or text string (in quotes eg "UreaN") representing the type of fertiliser to apply
                  //c is an optional double and can be represented by a variable name or a number representing the depth (mm) to which fertiliser is applied
                  //if c is omitted a default depth of 0 is used (fertiliser is applied to the surface by defalt)
               }
            }
        }
```
  Experiment RangeExperiment
    Factors
      Factor Fertiliser: Specification=[FertiliserRule].Script.ApplicationAmount=0 to 100 step 20
    Simulation Base2
      Weather: FileName=WeatherFiles\lincoln.met
      Clock: StartDate=2003-10-20; EndDate=2004-05-23
      Summary
      Zone Field: Area=1; Slope=0
        Irrigation
        Fertiliser
        Report: EventNames=[Clock].DoReport
          VariableNames:
            [Clock].Today
            [FertiliserRule].Script.ApplicationAmount
        Soil: same as Experiment.Base.Field.Soil
        SurfaceOrganicMatter: InitialResidueName=Potato; InitialResidueType=Potato; InitialResidueMass=1000; InitialStandingFraction=0; InitialCPR=0; InitialCNR=80; FractionFaecesAdded=0.5
        Manager FertiliserRule: same as Experiment.Base.Field.FertiliserRule
  Experiment OperationsExpt
    Factors
      Factor Operations: Specification=[FertiliserRule]
        Operations 0N
          2003-11-15  [Fertiliser].Apply(0, Fertiliser.Types.NO3N, 0);
        Operations 50N
          2003-11-15  [Fertiliser].Apply(50, Fertiliser.Types.NO3N, 0);
          2003-11-16  [Fertiliser].Apply(50, Fertiliser.Types.NO3N, 0);
    Simulation Base3
      Weather: FileName=WeatherFiles\lincoln.met
      Clock: StartDate=2003-11-15; EndDate=2003-11-16
      Summary
      Zone Field: Area=1; Slope=0
        Irrigation
        Fertiliser
        Report: EventNames=[Clock].DoReport
          VariableNames:
            [Clock].Today
            [Fertiliser].NitrogenApplied
        Soil: same as Experiment.Base.Field.Soil
        SurfaceOrganicMatter: InitialResidueName=Potato; InitialResidueType=Potato; InitialResidueMass=1000; InitialStandingFraction=0; InitialCPR=0; InitialCNR=80; FractionFaecesAdded=0.5
        MicroClimate: a_interception=0; b_interception=1; c_interception=0; d_interception=0; soil_albedo=0.3; SoilHeatFluxFraction=0.4; NightInterceptionFraction=0.5; ReferenceHeight=2
        Operations FertiliserRule
          2003-11-15  [Fertiliser].Apply(10, Fertiliser.Types.NO3N, 0);
  Experiment Compound
    Factors
      Factor Site
        CompositeFactor Dalby
          Specifications:
            [Clock].StartDate=1988-01-01
            [Clock].EndDate=1988-12-31
            [Weather]
          Weather: FileName=WeatherFiles\Dalby.met
        CompositeFactor Goondiwindi
          Specifications:
            [Clock].StartDate=1940-01-01
            [Clock].EndDate=1940-12-31
            [Weather]
          Weather: FileName=WeatherFiles\Goond.met
    Simulation Base4
      Weather: FileName=WeatherFiles\Dalby.met
      Clock: StartDate=2003-10-20; EndDate=2004-05-23
      Summary
      Zone Field: Area=1; Slope=0
        Irrigation
        Fertiliser
        Report: VariableNames=[Clock].Today.Year; EventNames=[Clock].DoReport
        Soil: same as Experiment.Base.Field.Soil
        SurfaceOrganicMatter: InitialResidueName=Potato; InitialResidueType=Potato; InitialResidueMass=1000; InitialStandingFraction=0; InitialCPR=0; InitialCNR=80; FractionFaecesAdded=0.5
        MicroClimate: a_interception=0; b_interception=1; c_interception=0; d_interception=0; soil_albedo=0.3; SoilHeatFluxFraction=0.4; NightInterceptionFraction=0.5; ReferenceHeight=2
        Operations FertiliserRule
          2003-11-15  [Fertiliser].Apply(10, Fertiliser.Types.UreaN, 0);
  Experiment ManagerExpt
    Factors
      Factor NRate: Specification=[FertiliserRule]
        Manager 33
          FertDate = 2003-11-15
          ApplicationAmount = 33
```csharp
        using System;
        using Models.Core;
        using Models.PMF;
        using APSIM.Shared.Utilities;
        
        namespace Models
        {
           [Serializable] 
           [System.Xml.Serialization.XmlInclude(typeof(Model))]
            public class Script : Model
            {      
               [Link] Fertiliser Fertiliser;
               [Link] Clock Clock;

               [Description("Fertiliser Date")]
               public DateTime FertDate { get; set; }

               [Description("Amount fertiliser (kg/ha)")]
               public double ApplicationAmount { get; set; }

               [EventSubscribe("DoManagement")]
               private void OnDoManagement(object sender, EventArgs e)
               {
                
                if (Clock.Today.Date == FertDate.Date)
                    Fertiliser.Apply(ApplicationAmount, Fertiliser.Types.NO3N, 0);
               }
            }
        }
```
        Manager 66
          FertDate = 2003-11-15
          ApplicationAmount = 66
          script: same as in ManagerExpt.Factors.NRate.33
    Simulation Base5
      Weather: FileName=WeatherFiles\lincoln.met
      Clock: StartDate=2003-11-15; EndDate=2003-11-15
      Summary
      Zone Field: Area=1; Slope=0
        Irrigation
        Fertiliser
        Report: EventNames=[Clock].DoReport
          VariableNames:
            [Clock].Today
            [Fertiliser].NitrogenApplied
        Soil: same as Experiment.Base.Field.Soil
        SurfaceOrganicMatter: InitialResidueName=Potato; InitialResidueType=Potato; InitialResidueMass=1000; InitialStandingFraction=0; InitialCPR=0; InitialCNR=80; FractionFaecesAdded=0.5
        MicroClimate: a_interception=0; b_interception=1; c_interception=0; d_interception=0; soil_albedo=0.3; SoilHeatFluxFraction=0.4; NightInterceptionFraction=0.5; ReferenceHeight=2
        Manager FertiliserRule
          FertDate = 2003-11-15
          ApplicationAmount = 77
          script: same as in ManagerExpt.Factors.NRate.33
  DataStore
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