Simulations: Version=130
  Replacements
    Plant Soybean: PlantType=Soybean; IsAlive=false; IsEnding=false; DaysAfterEnding=0
      OrganArbitrator Arbitrator
        BiomassTypeArbitrator DMArbitration
          Folder PotentialPartitioningMethods
            ReallocationMethod
            AllocateFixationMethod
            RetranslocationMethod
            SendPotentialDMAllocationsMethod
          Folder AllocationMethods
            NutrientConstrainedAllocationMethod
            DryMatterAllocationsMethod
          RelativeAllocation ArbitrationMethod
        BiomassTypeArbitrator NArbitration
          Folder PotentialPartitioningMethods
            ReallocationMethod
          Folder ActualPartitioningMethods
            AllocateFixationMethod
            RetranslocationMethod
          Folder AllocationMethods
            NitrogenAllocationsMethod
          RelativeAllocation ArbitrationMethod
          AllocateUptakesMethod
        WaterUptakeMethod
        NitrogenUptakeMethod
      Phenology
        LinearInterpolationFunction PhotoperiodModifier
          XYPairs: X=[14.43, 21.19]; Y=[1, 0]
          VariableReference XValue: VariableName=[Phenology].Photoperiod
        HourlyInterpolation VegetativeThermalTime: agregationMethod=0
          XYPairs Response: X=[10, 20, 30, 40]; Y=[0, 10, 20, 0]
          ThreeHourSin InterpolationMethod
        HourlyInterpolation ReproductiveThermalTime: agregationMethod=0
          XYPairs Response: X=[10, 15, 30, 40]; Y=[5, 5, 20, 0]
          ThreeHourSin InterpolationMethod
        PhaseLookup ThermalTime
          PhaseLookupValue PreEmergence: Start=Sowing; End=Emergence
            VariableReference Base: VariableName=[Phenology].VegetativeThermalTime
          PhaseLookupValue VegetativeGrowth: Start=Emergence; End=EndCanopyDevelopment
            MultiplyFunction TT
              VariableReference Base: VariableName=[Phenology].VegetativeThermalTime
              VariableReference PPModifier: VariableName=[Phenology].PhotoperiodModifier
          PhaseLookupValue ReproductiveGrowth: Start=EndCanopyDevelopment; End=HarvestRipe
            MultiplyFunction TT
              VariableReference Base: VariableName=[Phenology].ReproductiveThermalTime
              VariableReference PPModifier: VariableName=[Phenology].PhotoperiodModifier
        PhotoperiodFunction Photoperiod: Twilight=0; DayLength=0
        GerminatingPhase Germinating: Start=Sowing; End=Germination
        EmergingPhase Emerging: ShootLag=10; ShootRate=1; Start=Germination; End=Emergence; TTForTimeStep=0
          VariableReference ThermalTime: VariableName=[Phenology].VegetativeThermalTime
        GenericPhase Vegetative: Start=Emergence; End=StartFlowering
          Constant Target: FixedValue=200
          VariableReference Progression: VariableName=[Phenology].ThermalTime
        GenericPhase EarlyFlowering: Start=StartFlowering; End=StartPodDevelopment
          Memo
            The duration of the grain filling phase has been taken from the model of Robertson et al (2002).
          Constant Target: FixedValue=200
          VariableReference Progression: VariableName=[Phenology].ThermalTime
        GenericPhase EarlyPodDevelopment: Start=StartPodDevelopment; End=StartGrainFilling
          Memo
            The duration of the grain filling phase has been taken from the model of Robertson et al (2002).
          Constant Target: FixedValue=140
          VariableReference Progression: VariableName=[Phenology].ThermalTime
        GenericPhase EarlyGrainFilling: Start=StartGrainFilling; End=EndCanopyDevelopment
          MultiplyFunction Target
            Constant FractionofGrainfilling: FixedValue=0.05
            VariableReference EntireGrainfilling
              VariableName=[Phenology].LateGrainFilling.Target.EntireGrainfillPeriod.FixedValue
          VariableReference Progression: VariableName=[Phenology].ThermalTime
        GenericPhase MidGrainFilling: Start=EndCanopyDevelopment; End=EndPodDevelopment
          MultiplyFunction Target
            Constant FractionofMidToLateGrainfilling: FixedValue=0.5
            SubtractFunction
              VariableReference EntireGrainfilling
                VariableName=[Phenology].LateGrainFilling.Target.EntireGrainfillPeriod.FixedValue
              VariableReference EarlyGrainfilling: VariableName=[Phenology].EarlyGrainFilling.Target
          VariableReference Progression: VariableName=[Phenology].ThermalTime
        GenericPhase LateGrainFilling: Start=EndPodDevelopment; End=EndGrainFill
          SubtractFunction Target
            Constant EntireGrainfillPeriod: FixedValue=500
            VariableReference EarlyGrainFillingTarget: VariableName=[Phenology].EarlyGrainFilling.Target
            VariableReference MidGrainFillingTarget: VariableName=[Phenology].MidGrainFilling.Target
          VariableReference Progression: VariableName=[Phenology].ThermalTime
        GenericPhase Maturing: Start=EndGrainFill; End=Maturity
          Constant Target: FixedValue=45
          VariableReference Progression: VariableName=[Phenology].ThermalTime
        GenericPhase Ripening: Start=Maturity; End=HarvestRipe
          Constant Target: FixedValue=45
          VariableReference Progression: VariableName=[Phenology].ThermalTime
        EndPhase ReadyForHarvesting: Start=HarvestRipe; End=Unused
          VariableReference ThermalTime: VariableName=[Phenology].ThermalTime
        OnEventFunction EmergenceDAS: SetEvent=Emergence; ReSetEvent=never
          Memo
            A function is used to provide maturity date as days after sowing(DAS).
          Constant PreEventValue: FixedValue=0
          VariableReference PostEventValue: VariableName=[Plant].DaysAfterSowing
        OnEventFunction FloweringDAS: SetEvent=StartFlowering; ReSetEvent=never
          Memo
            A function is used to provide flowering date as days after sowing(DAS).
          Constant PreEventValue: FixedValue=0
          VariableReference PostEventValue: VariableName=[Plant].DaysAfterSowing
        OnEventFunction MaturityDAS: SetEvent=Maturity; ReSetEvent=never
          Memo
            A function is used to provide maturity date as days after sowing(DAS).
          Constant PreEventValue: FixedValue=0
          VariableReference PostEventValue: VariableName=[Plant].DaysAfterSowing
      Structure: CohortInitialisationStage=Germination; LeafInitialisationStage=Emergence
        VariableReference ThermalTime: VariableName=[Phenology].VegetativeThermalTime
        Constant DroughtInducedBranchMortality: FixedValue=0
        LinearInterpolationFunction HeightModel
          XYPairs: X=[0, 300]; Y=[10, 750]
          VariableReference XValue: VariableName=[Stem].Live.Wt
        MultiplyFunction BranchingRate
          LinearInterpolationFunction Potential_Branching_Rate
            XYPairs: X=[0, 6, 7, 8, 9]; Y=[0, 0, 1, 0, 0]
            VariableReference XValue: VariableName=[Structure].LeafTipsAppeared
          LinearInterpolationFunction Cover_response
            XYPairs: X=[0, 0.17, 0.25]; Y=[1, 1, 0]
            VariableReference XValue: VariableName=[leaf].CoverGreen
          LinearInterpolationFunction CHO_response
            XYPairs: X=[0, 1, 10]; Y=[1, 1, 1]
            VariableReference XValue: VariableName=[Stem].Live.StorageWt
        Constant BranchMortality: FixedValue=0
        Constant StemSenescenceAge: FixedValue=0
        PhaseLookup FinalLeafNumber
          PhaseLookupValue VegetativeGrowth: Start=Sowing; End=EndCanopyDevelopment
            Constant MaximumValue: FixedValue=40
          PhaseLookupValue ReproductiveGrowth: Start=EndCanopyDevelopment; End=HarvestRipe
            VariableReference AppearedLeaves: VariableName=[Leaf].AppearedCohortNo
        Constant Phyllochron: FixedValue=45
      ReproductiveOrgan Grain: GrowthRespiration=0; MaintenanceRespiration=0
        Biomass Live: DMDOfStructural=0.6
        Biomass Dead: DMDOfStructural=0.6
        Constant PotentialHarvestIndex: FixedValue=0.5
        AddFunction FillingDuration
          VariableReference EarlyGrainFillingDuration: VariableName=[Phenology].EarlyGrainFilling.Target
          VariableReference MidGrainFillingDuration: VariableName=[Phenology].MidGrainFilling.Target
          VariableReference LateGrainFillingDuration: VariableName=[Phenology].LateGrainFilling.Target
        Constant MaximumPotentialGrainSize: FixedValue=0.19
        PhaseLookup DMDemandFunction
          PhaseLookupValue GrainFilling: Start=StartGrainFilling; End=EndGrainFill
            MultiplyFunction HIGrainDemand
              VariableReference AboveGroundWt: VariableName=[AboveGround].Wt
              DivideFunction HarvestIndexIncrease
                VariableReference PotentialHarvestIndex: VariableName=[Grain].PotentialHarvestIndex
                VariableReference FillingDuration: VariableName=[Grain].FillingDuration
              VariableReference ThermalTime: VariableName=[Phenology].ThermalTime
            FillingRateFunction
              VariableReference NumberFunction: VariableName=[Grain].NumberFunction
              VariableReference ThermalTime: VariableName=[Phenology].ThermalTime
              VariableReference PotentialSizeIncrement: VariableName=[Grain].MaximumPotentialGrainSize
              VariableReference FillingDuration: VariableName=[Grain].FillingDuration
        Constant MinimumNConc: FixedValue=0.05
        Constant MaximumNConc: FixedValue=0.058
        Constant WaterContent: FixedValue=0.12
        MultiplyFunction NFillingRate
          VariableReference NConc: VariableName=[Grain].MaximumNConc
          VariableReference DMDemand: VariableName=[Grain].DMDemandFunction
          VariableReference DMConversionEfficiency: VariableName=[Grain].DMConversionEfficiency
        PhaseLookup NFillingRateOLD
          PhaseLookupValue GrainFilling: Start=StartGrainFilling; End=EndGrainFill
            FillingRateFunction
              VariableReference NumberFunction: VariableName=[Grain].NumberFunction
              VariableReference ThermalTime: VariableName=[Phenology].ThermalTime
              MultiplyFunction PotentialSizeIncrement
                Constant MaximumFinalNConc: FixedValue=0.04
                VariableReference MaximumSize: VariableName=[Grain].MaximumPotentialGrainSize
              AddFunction FillingDuration
                VariableReference LatePodDevelopmentDuration: VariableName=[Phenology].LatePodDevelopment.Target
                VariableReference LateGrainFillingDuration1: VariableName=[Phenology].LateGrainFilling.Target
        MultiplyFunction NumberFunction
          Constant PeasPerPod: FixedValue=1
          VariableReference PodNumber: VariableName=[Shell].PodNumber
        BiomassRemoval BiomassRemovalDefaults
          OrganBiomassRemovalType Harvest: FractionLiveToRemove=1; FractionDeadToRemove=0; FractionLiveToResidue=0; FractionDeadToResidue=0
          OrganBiomassRemovalType Cut: FractionLiveToRemove=1; FractionDeadToRemove=0; FractionLiveToResidue=0; FractionDeadToResidue=0
          OrganBiomassRemovalType Prune: FractionLiveToRemove=0; FractionDeadToRemove=0; FractionLiveToResidue=0.8; FractionDeadToResidue=0
          OrganBiomassRemovalType Graze: FractionLiveToRemove=0.6; FractionDeadToRemove=0; FractionLiveToResidue=0.2; FractionDeadToResidue=0
        Constant DMConversionEfficiency: FixedValue=0.89
        Constant RemobilisationCost: FixedValue=0
        Constant CarbonConcentration: FixedValue=0.4
        DivideFunction HarvestIndex
          VariableReference GrainWt: VariableName=[Grain].Wt
          VariableReference AboveGroundWt: VariableName=[AboveGround].Wt
      Root: GrowthRespiration=0; MaintenanceRespiration=0
        RootShapeCylindre RootShape
        LinearInterpolationFunction KLModifier
          XYPairs: X=[0, 3]; Y=[1, 1]
          VariableReference XValue: VariableName=[Leaf].LAI
        HourlyInterpolation TemperatureEffect: agregationMethod=0
          XYPairs Response: X=[0, 26, 35]; Y=[1, 1, 1]
          ThreeHourSin InterpolationMethod
        Constant MaxDailyNUptake: FixedValue=6
        Constant SenescenceRate: FixedValue=0.005
        Constant MaximumRootDepth: FixedValue=1000000
        PhaseLookup RootFrontVelocity
          PhaseLookupValue PreEmergence: Start=Germination; End=Emergence
            Constant Function: FixedValue=5
          PhaseLookupValue early: Start=Emergence; End=StartGrainFilling
            Constant Function: FixedValue=30
          PhaseLookupValue late: Start=StartGrainFilling; End=Maturity
            Constant Function: FixedValue=5
        Constant MaximumNConc: FixedValue=0.01
        Constant MinimumNConc: FixedValue=0.005
        PhaseLookupValue NitrogenDemandSwitch: Start=Emergence; End=EndGrainFill
          Constant: FixedValue=1
        LinearInterpolationFunction KNO3
          XYPairs: X=[0, 0.003]; Y=[0.02, 0.02]
          VariableReference XValue: VariableName=[Root].LengthDensity
        LinearInterpolationFunction KNH4
          XYPairs: X=[0, 0.003]; Y=[0, 0]
          VariableReference XValue: VariableName=[Root].LengthDensity
        BiomassRemoval BiomassRemovalDefaults
          OrganBiomassRemovalType Harvest: FractionLiveToRemove=0; FractionDeadToRemove=0; FractionLiveToResidue=0.2; FractionDeadToResidue=0
          OrganBiomassRemovalType Cut: FractionLiveToRemove=0; FractionDeadToRemove=0; FractionLiveToResidue=0.3; FractionDeadToResidue=0
          OrganBiomassRemovalType Prune: FractionLiveToRemove=0; FractionDeadToRemove=0; FractionLiveToResidue=0.1; FractionDeadToResidue=0
          OrganBiomassRemovalType Graze: FractionLiveToRemove=0; FractionDeadToRemove=0; FractionLiveToResidue=0.15; FractionDeadToResidue=0
        LinearInterpolationFunction NUptakeSWFactor
          XYPairs: X=[0, 1]; Y=[0, 1]
          VariableReference XValue: VariableName=[Root].RWC
        Constant SpecificRootLength: FixedValue=40; Units=m/g
        Constant DMConversionEfficiency: FixedValue=1
        Constant MaintenanceRespirationFunction: FixedValue=1
        Constant RemobilisationCost: FixedValue=0
        Constant CarbonConcentration: FixedValue=0.4
        BiomassDemand DMDemands
          MultiplyFunction Structural
            PartitionFractionDemandFunction DMDemandFunction
              PhaseLookup PartitionFraction
                PhaseLookupValue Early: Start=Emergence; End=StartFlowering
                  Constant Function: FixedValue=0.2
                PhaseLookupValue Middle: Start=StartFlowering; End=StartGrainFilling
                  Constant Function: FixedValue=0.2
                PhaseLookupValue Late: Start=StartGrainFilling; End=Maturity
                  Constant Function: FixedValue=0.05
            Constant StructuralFraction: FixedValue=1
          Constant Metabolic: FixedValue=0
          StorageDMDemandFunction Storage
            SubtractFunction StorageFraction
              Constant One: FixedValue=1
              VariableReference StructuralFraction: VariableName=[Root].DMDemands.Structural.StructuralFraction
        BiomassDemand NDemands
          MultiplyFunction Structural
            VariableReference MinNconc: VariableName=[Root].minimumNconc
            VariableReference PotentialDMAllocation: VariableName=[Root].potentialDMAllocation.Structural
          MultiplyFunction Metabolic
            SubtractFunction MetabolicNconc
              VariableReference CritNconc: VariableName=[Root].criticalNConc
              VariableReference MinNconc: VariableName=[Root].minimumNconc
            VariableReference PotentialDMAllocation: VariableName=[Root].potentialDMAllocation.Structural
          StorageNDemandFunction Storage
            VariableReference NitrogenDemandSwitch: VariableName=[Root].nitrogenDemandSwitch
            VariableReference MaxNconc: VariableName=[Root].maximumNconc
        VariableReference CriticalNConc: VariableName=[Root].MinimumNConc
        BiomassDemand InitialWt
          Constant Structural: FixedValue=0.2; Units=g/plant
          Constant Metabolic: FixedValue=0
          Constant Storage: FixedValue=0
        Constant RootDepthStressFactor: FixedValue=1
      Nodule
        Constant FixationMetabolicCost: FixedValue=0
        Constant MaximumNConc: FixedValue=0.02
        Constant MinimumNConc: FixedValue=0.01
        Constant SenescenceRate: FixedValue=0
        Constant NReallocationFactor: FixedValue=0
        PhaseLookupValue NitrogenDemandSwitch: Start=Emergence; End=EndGrainFill
          Constant: FixedValue=1
        BiomassRemoval BiomassRemovalDefaults
          OrganBiomassRemovalType Harvest: FractionLiveToRemove=0.5; FractionDeadToRemove=0; FractionLiveToResidue=0.1; FractionDeadToResidue=0
          OrganBiomassRemovalType Cut: FractionLiveToRemove=0.8; FractionDeadToRemove=0; FractionLiveToResidue=0; FractionDeadToResidue=0
          OrganBiomassRemovalType Prune: FractionLiveToRemove=0; FractionDeadToRemove=0; FractionLiveToResidue=0.6; FractionDeadToResidue=0
          OrganBiomassRemovalType Graze: FractionLiveToRemove=0.6; FractionDeadToRemove=0; FractionLiveToResidue=0.2; FractionDeadToResidue=0
        Constant InitialWtFunction: FixedValue=0; Units=g/m^2
        Constant DetachmentRateFunction: FixedValue=0; Units=/d
        MultiplyFunction FixationRateOLD
          VariableReference NoduleWt: VariableName=[Nodule].Live.Wt
          Constant SpecificNitrogenaseActivity: FixedValue=0.1
          MinimumFunction StressFactor
            HourlyInterpolation FT: agregationMethod=0
              XYPairs Response: X=[0, 20, 30, 40]; Y=[0, 1, 1, 0]
              ThreeHourSin InterpolationMethod
            LinearInterpolationFunction FW
              XYPairs: X=[0, 1, 1.5]; Y=[0, 1, 1]
              VariableReference XValue: VariableName=[Leaf].Fw
        Constant MaintenanceRespirationFunction: FixedValue=0; Units=0-1
        Constant DMConversionEfficiency: FixedValue=1; Units=0-1
        Constant NRetranslocationFactor: FixedValue=0
        Constant DMReallocationFactor: FixedValue=0
        Constant DMRetranslocationFactor: FixedValue=0
        VariableReference CriticalNConc: VariableName=[Nodule].MinimumNConc
        Constant RemobilisationCost: FixedValue=0
        Constant CarbonConcentration: FixedValue=0.4
        HoldFunction FixationRate: WhenToHold=StartGrainFilling
          MinimumFunction DailyPotentialFixationRate
            MultiplyFunction PotentialFixationRate
              VariableReference Biomass: VariableName=[AboveGround].Wt
              PhaseLookup SpecificFixationRate
                PhaseLookupValue VegetativeGrowth: Start=Emergence; End=StartFlowering
                  Constant Rate: FixedValue=0.006
                PhaseLookupValue ReproductiveGrowth: Start=StartFlowering; End=EndGrainFill
                  Constant Rate: FixedValue=0.002
            Constant MaximumFixationRate: FixedValue=0.6
        BiomassDemand DMDemands
          MultiplyFunction Structural
            PartitionFractionDemandFunction DMDemandFunction
              PhaseLookup PartitionFraction
                PhaseLookupValue Early: Start=Emergence; End=StartFlowering
                  Constant Function: FixedValue=0.03
                PhaseLookupValue Middle: Start=StartFlowering; End=StartGrainFilling
                  Constant Function: FixedValue=0.02
                PhaseLookupValue Late: Start=StartGrainFilling; End=Maturity
                  Constant Function: FixedValue=0
            Constant StructuralFraction: FixedValue=1; Units=g/g
          Constant Metabolic: FixedValue=0
          StorageDMDemandFunction Storage
            SubtractFunction StorageFraction
              Constant One: FixedValue=1
              VariableReference StructuralFraction: VariableName=[Nodule].DMDemands.Structural.StructuralFraction
        BiomassDemand NDemands
          MultiplyFunction Structural
            VariableReference MinNconc: VariableName=[Nodule].minimumNconc
            VariableReference PotentialDMAllocation: VariableName=[Nodule].potentialDMAllocation.Structural
          MultiplyFunction Metabolic
            SubtractFunction MetabolicNconc
              VariableReference CritNconc: VariableName=[Nodule].criticalNConc
              VariableReference MinNconc: VariableName=[Nodule].minimumNconc
            VariableReference PotentialDMAllocation: VariableName=[Nodule].potentialDMAllocation.Structural
          StorageNDemandFunction Storage
            VariableReference NitrogenDemandSwitch: VariableName=[Nodule].nitrogenDemandSwitch
            VariableReference MaxNconc: VariableName=[Nodule].maximumNconc
      GenericOrgan Shell: IsAboveGround=true
        AccumulateFunction PodNumber: StartStageName=StartPodDevelopment; EndStageName=EndCanopyDevelopment; FractionRemovedOnCut=0; FractionRemovedOnHarvest=0; FractionRemovedOnGraze=0; FractionRemovedOnPrune=0
          MultiplyFunction DailyPodAppearanceRate
            DivideFunction PodAppearanceRate
              Constant PodsPerNode: FixedValue=8
              VariableReference NodeAppearanceRate: VariableName=[Structure].Phyllochron
            VariableReference ThermalTime: VariableName=[Phenology].ThermalTime
            VariableReference PlantPopulation: VariableName=[Soybean].SowingData.Population
        Constant NReallocationFactor: FixedValue=0.5
        Constant NRetranslocationFactor: FixedValue=0.5
        Constant MaximumNConc: FixedValue=0.045
        VariableReference CriticalNConc: VariableName=[Shell].MinimumNConc
        Constant MinimumNConc: FixedValue=0.01
        Constant DMRetranslocationFactor: FixedValue=0.1
        PhaseLookupValue NitrogenDemandSwitch: Start=StartPodDevelopment; End=EndPodDevelopment
          Constant: FixedValue=1
        BiomassRemoval BiomassRemovalDefaults: same as Replacements.Soybean.Nodule.BiomassRemovalDefaults
        PhaseLookup SenescenceRate
          PhaseLookupValue ReproductivePhase: Start=StartPodDevelopment; End=Maturity
            MinimumFunction Rate
              DivideFunction Fraction
                VariableReference TT: VariableName=[Phenology].ThermalTime
                SubtractFunction TTRemaining
                  ExpressionFunction ReproductiveTT
                    Expression=[Phenology].EarlyPodDevelopment.Target+[Phenology].EarlyGrainFilling.Target+[Phenology].MidGrainFilling.Target+[Phenology].LateGrainFilling.Target
                  ExpressionFunction ReproductiveTT1Complete
                    Expression=[Phenology].EarlyPodDevelopment.ProgressThroughPhase+[Phenology].EarlyGrainFilling.ProgressThroughPhase+[Phenology].MidGrainFilling.ProgressThroughPhase+[Phenology].LateGrainFilling.ProgressThroughPhase
              Constant One: FixedValue=1
        Constant DetachmentRateFunction: FixedValue=0; Units=/d
        Constant MaintenanceRespirationFunction: FixedValue=0; Units=0-1
        Constant DMConversionEfficiency: FixedValue=1; Units=0-1
        Constant DMReallocationFactor: FixedValue=0
        Constant RemobilisationCost: FixedValue=0
        Constant CarbonConcentration: FixedValue=0.4
        MultiplyFunction PodNumberOld
          Constant PodsPerNode: FixedValue=1
          VariableReference StemPopulation: VariableName=[Structure].TotalStemPopn
          PhaseLookupValue FloweringNodes: Start=StartFlowering; End=HarvestRipe
            SubtractFunction FloweringNodes
              VariableReference TotalNodes: VariableName=[Structure].LeafTipsAppeared
              VariableReference VegetativeNodes: VariableName=[Phenology].NFF
        HoldFunction PodNumberByStem: WhenToHold=StartGrainFilling
          MultiplyFunction Value
            Constant PodsPerGStem: FixedValue=5
            VariableReference StemMass: VariableName=[Stem].Live.Wt
        PopulationBasedDemandFunction DMDemandFunctionOLD
          VariableReference ThermalTime: VariableName=[Phenology].ThermalTime
          VariableReference OrganPopulation: VariableName=[Shell].PodNumber
          Constant ExpansionStress: FixedValue=1
          AddFunction GrowthDuration
            VariableReference EarlyPodDevelopmentDuration: VariableName=[Phenology].EarlyPodDevelopment.Target
            VariableReference EarlyGrainFillingDuration: VariableName=[Phenology].EarlyGrainFilling.Target
            VariableReference MidGrainFillingDuration: VariableName=[Phenology].MidGrainFilling.Target
          Constant StartStage: FixedValue=5
          Constant MaximumOrganWt: FixedValue=0.08
        Constant PotentialHarvestIndex: FixedValue=0.2
        AddFunction FillingDuration: same as Replacements.Soybean.Shell.DMDemandFunctionOLD.GrowthDuration
        BiomassDemand DMDemands
          MultiplyFunction Structural
            PhaseLookup DMDemandFunction
              PhaseLookupValue PodDevelopment: Start=StartPodDevelopment; End=EndPodDevelopment
                MultiplyFunction HIPodDemand
                  VariableReference AboveGroundWt: VariableName=[AboveGround].Wt
                  DivideFunction HarvestIndexIncrease
                    VariableReference PotentialHarvestIndex: VariableName=[Shell].PotentialHarvestIndex
                    VariableReference FillingDuration: VariableName=[Shell].FillingDuration
                  VariableReference ThermalTime: VariableName=[Phenology].ThermalTime
                FillingRateFunction: same as Replacements.Soybean.Grain.DMDemandFunction.GrainFilling.FillingRateFunction
            Constant StructuralFraction: FixedValue=1
          Constant Metabolic: FixedValue=0
          StorageDMDemandFunction Storage
            SubtractFunction StorageFraction
              Constant One: FixedValue=1
              VariableReference StructuralFraction: VariableName=[Shell].DMDemands.Structural.StructuralFraction
        BiomassDemand NDemands
          MultiplyFunction Structural
            VariableReference MinNconc: VariableName=[Shell].minimumNconc
            VariableReference PotentialDMAllocation: VariableName=[Shell].potentialDMAllocation.Structural
          StorageNDemandFunction Storage
            VariableReference NitrogenDemandSwitch: VariableName=[Shell].nitrogenDemandSwitch
            VariableReference MaxNconc: VariableName=[Shell].maximumNconc
          Constant Metabolic: FixedValue=0
        RetranslocateNonStructural RetranslocateNitrogen
        BiomassDemand InitialWt
          Constant Structural: FixedValue=0; Units=g/m^2
          Constant Metabolic: FixedValue=0
          Constant Storage: FixedValue=0
        Constant Photosynthesis: FixedValue=0
        VariableReference initialNConcFunction: VariableName=[Shell].MinimumNConc
        BiomassDemand dmDemandPriorityFactors
          Constant Structural: FixedValue=1
          Constant Metabolic: FixedValue=1
          Constant Storage: FixedValue=1
      Leaf: MaxCover=1; Albedo=0.25; Gsmax350=0.011; R50=150; KDead=0.3; MaximumMainStemLeafNumber=40
        zero: CurrentExpandingLeaf, StartFractionExpanded, FractionNextleafExpanded, DeadNodesYesterday, GrowthRespiration, LAI, Depth, Width, FRGR, PotentialEP, WaterDemand, TipsAtEmergence, CohortsAtInitialisation, FractionDied
        LeafCohort InitialLeaf1: Rank=1; Area=100
          zero: NReallocationFactor, DMReallocationFactor, NRetranslocationFactor, DMRetranslocationFactor, ShadeInducedSenRate, SenescedFrac, DeltaPotentialArea, DeltaStressConstrainedArea, DeltaCarbonConstrainedArea, PotentialStructuralDMAllocation, PotentialMetabolicDMAllocation, MetabolicNReallocated, MetabolicWtReallocated, StorageNReallocated, StorageWtReallocated, MetabolicNRetranslocated, StorageNRetrasnlocated, DMRetranslocated, MetabolicNAllocation, StructuralDMAllocation, MetabolicDMAllocation, MaintenanceRespiration
        LeafCohort InitialLeaf2: Rank=2
          zero: NReallocationFactor, DMReallocationFactor, NRetranslocationFactor, DMRetranslocationFactor, ShadeInducedSenRate, SenescedFrac, DeltaPotentialArea, DeltaStressConstrainedArea, DeltaCarbonConstrainedArea, PotentialStructuralDMAllocation, PotentialMetabolicDMAllocation, MetabolicNReallocated, MetabolicWtReallocated, StorageNReallocated, StorageWtReallocated, MetabolicNRetranslocated, StorageNRetrasnlocated, DMRetranslocated, MetabolicNAllocation, StructuralDMAllocation, MetabolicDMAllocation, Area, MaintenanceRespiration
        PhaseLookup ThermalTime
          PhaseLookupValue VegetativeGrowth: Start=Sowing; End=EndCanopyDevelopment
            VariableReference ThermalTime: VariableName=[Phenology].VegetativeThermalTime
          PhaseLookupValue ReproductiveGrowth: Start=EndCanopyDevelopment; End=HarvestRipe
            MultiplyFunction PPAcceleratedTT
              VariableReference ThermalTime: VariableName=[Phenology].ThermalTime
              LinearInterpolationFunction PPAccelerator
                XYPairs: X=[10, 13.39]; Y=[1, 1]
                VariableReference XValue: VariableName=[Phenology].Photoperiod
        LeafCohortParameters: ExpansionStressValue=0; CellDivisionStressValue=0; DroughtInducedLagAccelerationValue=0; DroughtInducedSenAccelerationValue=0; ShadeInducedSenescenceRateValue=0; SenessingLeafRelativeSizeValue=0
          Constant SenessingLeafRelativeSize: FixedValue=1; Units=0-1
          MultiplyFunction MaxArea
            LinearInterpolationFunction RelativeArea
              XYPairs: X=[2, 7, 10, 18]; Y=[0.6666, 1, 1, 0.83]
              VariableReference XValue: VariableName=[Leaf].AppearedCohortNo
            Constant LargestLeaf: FixedValue=12000
          MultiplyFunction GrowthDuration
            VariableReference Phyllochron: VariableName=[Structure].Phyllochron
            LinearInterpolationFunction AgeFactor
              XYPairs: X=[1, 5, 10, 20]; Y=[1, 2, 4, 8]
              VariableReference XValue: VariableName=[Leaf].AppearedCohortNo
          SubtractFunction FirstLeafDuration
            AddFunction TTtoEndCanopy
              VariableReference Vegetative: VariableName=[Phenology].Vegetative.Target
              VariableReference EarlyFlowering: VariableName=[Phenology].EarlyFlowering.Target
              VariableReference EarlyPod: VariableName=[Phenology].EarlyPodDevelopment.Target
              VariableReference EarlyGrain: VariableName=[Phenology].EarlyGrainFilling.Target
            VariableReference GrowthDuraction: VariableName=[Leaf].LeafCohortParameters.GrowthDuration
          SubtractFunction LastLeafDuration
            AddFunction ThermalTimeToRipe
              VariableReference MidGrainFilling: VariableName=[Phenology].MidGrainFilling.Target
              VariableReference LateGrainFilling: VariableName=[Phenology].LateGrainFilling.Target
              VariableReference Maturing: VariableName=[Phenology].Maturing.Target
              VariableReference Ripening: VariableName=[Phenology].Ripening.Target
            VariableReference SenescenceDuration: VariableName=[Leaf].LeafCohortParameters.SenescenceDuration
            VariableReference GrowthDuraction: VariableName=[Leaf].LeafCohortParameters.GrowthDuration
          SubtractFunction LagDuration
            VariableReference FLD: VariableName=[Leaf].LeafCohortParameters.FirstLeafDuration
            MultiplyFunction DeltaDuration
              MinimumFunction Factor
                DivideFunction AgeFactor
                  ExpressionFunction TTComplete
                    Expression=[Phenology].Vegetative.ProgressThroughPhase+[Phenology].EarlyFlowering.ProgressThroughPhase+[Phenology].EarlyPodDevelopment.ProgressThroughPhase+[Phenology].EarlyGrainFilling.ProgressThroughPhase
                  ExpressionFunction TTtoStartPod
                    Expression=[Phenology].Vegetative.Target+[Phenology].EarlyFlowering.Target+[Phenology].EarlyPodDevelopment.Target+[Phenology].EarlyGrainFilling.Target
                Constant One: FixedValue=1
              SubtractFunction DeltaMax
                VariableReference FLD: VariableName=[Leaf].LeafCohortParameters.FirstLeafDuration
                VariableReference LLD: VariableName=[Leaf].LeafCohortParameters.LastLeafDuration
          MultiplyFunction SenescenceDuration
            Constant Multiplier: FixedValue=3
            VariableReference Phyllochron: VariableName=[Structure].Phyllochron
          MultiplyFunction DetachmentLagDuration
            Constant Multiplier: FixedValue=3
            VariableReference Phyllochron: VariableName=[Structure].Phyllochron
          Constant DetachmentDuration: FixedValue=20
          LinearInterpolationFunction SpecificLeafAreaMaxOLD
            XYPairs: X=[0.5, 0.8, 1, 2, 3, 4]; Y=[45000, 40000, 35000, 32000, 32000, 32000]
            VariableReference XValue: VariableName=[Leaf].LAI
          LinearInterpolationFunction SpecificLeafAreaMax
            XYPairs: X=[0.1, 6]; Y=[30000, 45000]
            VariableReference XValue: VariableName=[Leaf].LAI
          Constant StructuralFraction: FixedValue=0.7
          LinearInterpolationFunction SpecificLeafAreaMinOLD
            XYPairs: X=[0.5, 6]; Y=[10000, 10000]
            VariableReference XValue: VariableName=[Leaf].LAI
          LinearInterpolationFunction SpecificLeafAreaMin
            XYPairs: X=[0.5, 6]; Y=[20000, 30000]
            VariableReference XValue: VariableName=[Leaf].LAI
          LinearInterpolationFunction ExpansionStress
            XYPairs: X=[0, 1]; Y=[0, 1]
            VariableReference XValue: VariableName=[Soybean].Leaf.Fw
          Constant MinimumNConc: FixedValue=0.02
          Constant CriticalNConc: FixedValue=0.06
          Constant MaximumNConc: FixedValue=0.08
          Constant NReallocationFactor: FixedValue=1
          Constant DMRetranslocationFactor: FixedValue=0.5
          LinearInterpolationFunction ShadeInducedSenescenceRate
            XYPairs: X=[0, 0.9, 0.90001]; Y=[0, 0, 0]
            VariableReference XValue: VariableName=[Leaf].CohortCurrentRankCoverAbove
          Constant InitialNConc: FixedValue=0
          Constant StorageFraction: FixedValue=0
          Constant DMReallocationFactor: FixedValue=1
          Constant LeafSizeShapeParameter: FixedValue=0.01
          Constant MaintenanceRespirationFunction: FixedValue=0
          Constant DroughtInducedSenAcceleration: FixedValue=1
          Constant CellDivisionStress: FixedValue=1; Units=0-1
          Constant DroughtInducedLagAcceleration: FixedValue=1
          ArrayFunction LagDurationAgeMultiplier: Values=1 1 1
          ArrayFunction SenescenceDurationAgeMultiplier: Values=1 1 1
          ArrayFunction LeafSizeAgeMultiplier: Values=1 1 1 1 1 1 1 1 1 1 1 1
          Constant RemobilisationCost: FixedValue=0
          Constant CarbonConcentration: FixedValue=0.4
          Constant NRetranslocationFactor: FixedValue=0.5
        LinearInterpolationFunction ExtinctionCoeff
          XYPairs: X=[200, 1000]; Y=[0.6, 0.4]
          VariableReference XValue: VariableName=[Soybean].SowingData.RowSpacing
        RUEModel Photosynthesis
          Constant RUE: FixedValue=1.2
          WeightedTemperatureFunction FT: MaximumTemperatureWeighting=0.5
            XYPairs: X=[10, 20, 30, 40]; Y=[0, 1, 1, 0]
          LinearInterpolationFunction FVPD
            XYPairs: X=[0, 10, 50]; Y=[1, 1, 1]
            VariableReference XValue: VariableName=[Leaf].Photosynthesis.VPD
          LinearInterpolationFunction FN
            XYPairs: X=[0, 1, 1.5]; Y=[1, 1, 1]
            VariableReference XValue: VariableName=[Leaf].Fn
          LinearInterpolationFunction FW
            XYPairs: X=[0, 1]; Y=[0, 1]
            VariableReference XValue: VariableName=[Leaf].Fw
          RUECO2Function FCO2: PhotosyntheticPathway=C3
          VariableReference RadnInt: VariableName=[Leaf].RadiationIntercepted
        MinimumFunction FRGRFunction
          VariableReference RUE_FT: VariableName=[Leaf].Photosynthesis.FT
          MinimumFunction Others
            VariableReference RUE_FN: VariableName=[Leaf].Photosynthesis.FN
            VariableReference RUE_FVPD: VariableName=[Leaf].Photosynthesis.FVPD
        LinearInterpolationFunction FrostFraction
          XYPairs: X=[-1, 0]; Y=[0, 0]
          VariableReference XValue: VariableName=[Weather].MinT
        BiomassRemoval BiomassRemovalDefaults
          OrganBiomassRemovalType Harvest: FractionLiveToRemove=0; FractionDeadToRemove=0; FractionLiveToResidue=0.3; FractionDeadToResidue=0
          OrganBiomassRemovalType Cut: FractionLiveToRemove=0.8; FractionDeadToRemove=0; FractionLiveToResidue=0; FractionDeadToResidue=0
          OrganBiomassRemovalType Prune: FractionLiveToRemove=0; FractionDeadToRemove=0; FractionLiveToResidue=0.6; FractionDeadToResidue=0
          OrganBiomassRemovalType Graze: FractionLiveToRemove=0.6; FractionDeadToRemove=0; FractionLiveToResidue=0.1; FractionDeadToResidue=0
        Constant StructuralFraction: FixedValue=0.5
        Constant DMConversionEfficiency: FixedValue=1
        Constant RemobilisationCost: FixedValue=0
        Constant CarbonConcentration: FixedValue=0.4
        Constant StomatalConductanceCO2Modifier: FixedValue=1
        Constant WidthFunction: FixedValue=0
        VariableReference DepthFunction: VariableName=[Leaf].Height
      GenericOrgan Stem: IsAboveGround=true
        Constant NReallocationFactor: FixedValue=0
        Constant NRetranslocationFactor: FixedValue=0.5
        PhaseLookup DMRetranslocationFactor
          PhaseLookupValue GrainFilling: Start=EndCanopyDevelopment; End=EndGrainFill
            Constant RetranslocationFactor: FixedValue=0.2
        LinearInterpolationFunction MaximumNConc
          XYPairs: X=[3, 4, 5]; Y=[0.025, 0.02, 0.015]
          VariableReference XValue: VariableName=[Phenology].Stage
        Constant MinimumNConc: FixedValue=0.006
        PhaseLookupValue NitrogenDemandSwitch: Start=Emergence; End=StartGrainFilling
          Constant: FixedValue=1
        BiomassRemoval BiomassRemovalDefaults: same as Replacements.Soybean.Nodule.BiomassRemovalDefaults
        Constant SenescenceRate: FixedValue=0; Units=/d
        Constant DetachmentRateFunction: FixedValue=0; Units=/d
        Constant MaintenanceRespirationFunction: FixedValue=0; Units=0-1
        Constant DMConversionEfficiency: FixedValue=1; Units=0-1
        Constant DMReallocationFactor: FixedValue=0
        VariableReference CriticalNConc: VariableName=[Stem].MinimumNConc
        Constant RemobilisationCost: FixedValue=0
        Constant CarbonConcentration: FixedValue=0.4
        BiomassDemand DMDemands
          MultiplyFunction Structural
            PhaseLookup Fraction
              PhaseLookupValue StemGrowthPhase: Start=Emergence; End=StartPodDevelopment
                Constant Fraction: FixedValue=0.75
              PhaseLookupValue PodAndGrainGrowth: Start=StartPodDevelopment; End=EndGrainFill
                Constant Fraction: FixedValue=0
            VariableReference DMDemand: VariableName=[Stem].PotentialGrowth
          Constant Metabolic: FixedValue=0
          MultiplyFunction Storage
            VariableReference DMDemand: VariableName=[Stem].PotentialGrowth
            SubtractFunction StorageFraction
              Constant One: FixedValue=1
              VariableReference StructuralFraction: VariableName=[Stem].DMDemands.Structural.Fraction
        BiomassDemand NDemands
          MultiplyFunction Structural
            VariableReference MinNconc: VariableName=[Stem].minimumNconc
            VariableReference PotentialDMAllocation: VariableName=[Stem].potentialDMAllocation.Structural
          MultiplyFunction Metabolic
            SubtractFunction MetabolicNconc
              VariableReference CritNconc: VariableName=[Stem].criticalNConc
              VariableReference MinNconc: VariableName=[Stem].minimumNconc
            VariableReference PotentialDMAllocation: VariableName=[Stem].potentialDMAllocation.Structural
          StorageNDemandFunction Storage
            VariableReference NitrogenDemandSwitch: VariableName=[Stem].nitrogenDemandSwitch
            VariableReference MaxNconc: VariableName=[Stem].maximumNconc
        PartitionFractionDemandFunction PotentialGrowth
          PhaseLookup PartitionFraction
            PhaseLookupValue StemGrowthPhase: Start=Emergence; End=EndPodDevelopment
              Constant StemFraction: FixedValue=0.4
            PhaseLookupValue GrainFilling: Start=EndPodDevelopment; End=EndGrainFill
              Constant StemFraction: FixedValue=0
        RetranslocateNonStructural RetranslocateNitrogen
        BiomassDemand InitialWt
          Constant Structural: FixedValue=0; Units=g/m^2
          Constant Metabolic: FixedValue=0
          Constant Storage: FixedValue=0
        Constant Photosynthesis: FixedValue=0
        VariableReference initialNConcFunction: VariableName=[Stem].MinimumNConc
        BiomassDemand dmDemandPriorityFactors
          Constant Structural: FixedValue=1
          Constant Metabolic: FixedValue=1
          Constant Storage: FixedValue=1
      CompositeBiomass AboveGround: DMDOfStructural=0.6
        Propertys=[[Leaf].Live, [Leaf].Dead, [Stem].Live, [Stem].Dead, [Grain].Live, [Grain].Dead, [Shell].Live, [Shell].Dead]
      CompositeBiomass BelowGround: Propertys=[[Root].Live, [Root].Dead, [Nodule].Live, [Nodule].Dead]; DMDOfStructural=0.6
      CompositeBiomass Total: DMDOfStructural=0.6
        Propertys=[[Leaf].Live, [Leaf].Dead, [Stem].Live, [Stem].Dead, [Grain].Live, [Grain].Dead, [Shell].Live, [Shell].Dead, [Root].Live, [Root].Dead, [Nodule].Live, [Nodule].Dead]
      CompositeBiomass TotalLive: DMDOfStructural=0.6
        Propertys=[[Leaf].Live, [Stem].Live, [Grain].Live, [Shell].Live, [Root].Live, [Nodule].Live]
      CompositeBiomass TotalDead: DMDOfStructural=0.6
        Propertys=[[Leaf].Dead, [Stem].Dead, [Grain].Dead, [Shell].Dead, [Root].Dead, [Nodule].Dead]
      CompositeBiomass Pod: Propertys=[[Shell].Live, [Shell].Dead, [Grain].Live, [Grain].Dead]; DMDOfStructural=0.6
      Memo
        ## References

        ### **Ayaz S, McKenzie BA, McNeil DL, Hill GD.** **2004**. Light interception and utilization of four grain legumes sown at different plant populations and depths. _Journal of Agricultural Science,_ **142**: 297-308.
         **Ayaz S, McKenzie BA, Hill GD, McNeil DL.** **2004**. Variability in yield of four grain legume species in a subhumid temperate environment. II. Yield components. _Journal of Agricultural Science,_ **142**: 21-28.
         **Ayaz S, McKenzie BA, Hill GD, McNeil DL.** **2004**. Nitrogen distribution in four grain legumes. _Journal of Agricultural Science,_ **142**: 309-317.
         **Wilson DR, Robertson MJ.** **1996.** Pea phenology responses to temperature and photoperiod. _Australian Agronomy Society_.
      Cultivar PioneerP932T16R_MG32
        Command:
          [Phenology].Vegetative.Target.FixedValue = 328
          [Phenology].EarlyFlowering.Target.FixedValue = 106
          [Phenology].EarlyGrainFilling.Target.FractionofGrainfilling.FixedValue = 0.40
          [Phenology].LateGrainFilling.Target.EntireGrainfillPeriod.FixedValue = 499
          [Phenology].PhotoperiodModifier.XYPairs.X = 13.59, 17.6
      Cultivar PioneerP22T69R_MG22
        Command:
          [Phenology].Vegetative.Target.FixedValue = 328
          [Phenology].EarlyFlowering.Target.FixedValue = 106
          [Phenology].EarlyGrainFilling.Target.FractionofGrainfilling.FixedValue = 0.35
          [Phenology].LateGrainFilling.Target.EntireGrainfillPeriod.FixedValue = 580
          [Phenology].PhotoperiodModifier.XYPairs.X = 13.59, 17.6
      Cultivar Trial_MG00
        Command:
          [Phenology].Vegetative.Target.FixedValue = 268
          [Phenology].EarlyFlowering.Target.FixedValue = 76
          [Phenology].EarlyGrainFilling.Target.FractionofGrainfilling.FixedValue = 0.05
          [Phenology].LateGrainFilling.Target.EntireGrainfillPeriod.FixedValue = 432
          [Phenology].PhotoperiodModifier.XYPairs.X = 14.43, 21.19
      Cultivar Lambert_MG0
        Command:
          [Phenology].Vegetative.Target.FixedValue = 294
          [Phenology].EarlyFlowering.Target.FixedValue = 81
          [Phenology].EarlyGrainFilling.Target.FractionofGrainfilling.FixedValue = 0.05
          [Phenology].LateGrainFilling.Target.EntireGrainfillPeriod.FixedValue = 442
          [Phenology].PhotoperiodModifier.XYPairs.X = 14.29, 20.14
      Cultivar IA1006_MG10
        Command:
          [Phenology].Vegetative.Target.FixedValue = 336
          [Phenology].EarlyFlowering.Target.FixedValue = 118
          [Phenology].EarlyGrainFilling.Target.FractionofGrainfilling.FixedValue = 0.05
          [Phenology].LateGrainFilling.Target.EntireGrainfillPeriod.FixedValue = 518
          [Phenology].PhotoperiodModifier.XYPairs.X = 14.37, 19.30
      Cultivar IA2008_MG20
        Command:
          [Phenology].Vegetative.Target.FixedValue = 329
          [Phenology].EarlyFlowering.Target.FixedValue = 150
          [Phenology].EarlyGrainFilling.Target.FractionofGrainfilling.FixedValue = 0.05
          [Phenology].LateGrainFilling.Target.EntireGrainfillPeriod.FixedValue = 580
          [Phenology].PhotoperiodModifier.XYPairs.X = 13.92, 17.93
      Cultivar Macon_MG30
        Command:
          [Phenology].Vegetative.Target.FixedValue = 367
          [Phenology].EarlyFlowering.Target.FixedValue = 163
          [Phenology].EarlyGrainFilling.Target.FractionofGrainfilling.FixedValue = 0.175
          [Phenology].LateGrainFilling.Target.EntireGrainfillPeriod.FixedValue = 607
          [Phenology].PhotoperiodModifier.XYPairs.X = 14.05, 17.56
      Cultivar Pioneer94B01_MG40
        Command:
          [Phenology].Vegetative.Target.FixedValue = 322
          [Phenology].EarlyFlowering.Target.FixedValue = 143
          [Phenology].EarlyGrainFilling.Target.FractionofGrainfilling.FixedValue = 0.30
          [Phenology].LateGrainFilling.Target.EntireGrainfillPeriod.FixedValue = 567
          [Phenology].PhotoperiodModifier.XYPairs.X = 13.05, 16.46
      Cultivar Hutcheson_MG50
        Command:
          [Phenology].Vegetative.Target.FixedValue = 438
          [Phenology].EarlyFlowering.Target.FixedValue = 112
          [Phenology].EarlyGrainFilling.Target.FractionofGrainfilling.FixedValue = 0.30
          [Phenology].LateGrainFilling.Target.EntireGrainfillPeriod.FixedValue = 505
          [Phenology].PhotoperiodModifier.XYPairs.X = 12.58, 15.88
      Cultivar NK622_MG60
        Command:
          [Phenology].Vegetative.Target.FixedValue = 436
          [Phenology].EarlyFlowering.Target.FixedValue = 93
          [Phenology].EarlyGrainFilling.Target.FractionofGrainfilling.FixedValue = 0.30
          [Phenology].LateGrainFilling.Target.EntireGrainfillPeriod.FixedValue = 467
          [Phenology].PhotoperiodModifier.XYPairs.X = 12.39, 15.61
      Cultivar Becks367NRR_MG37
        Command:
          [Phenology].Vegetative.Target.FixedValue = 267
          [Phenology].EarlyFlowering.Target.FixedValue = 112
          [Phenology].EarlyGrainFilling.Target.FractionofGrainfilling.FixedValue = 0.26
          [Phenology].LateGrainFilling.Target.EntireGrainfillPeriod.FixedValue = 506
          [Phenology].PhotoperiodModifier.XYPairs.X = 13.27, 17.2
      Cultivar AsgrowAG4403_MG40
        Command:
          [Phenology].Vegetative.Target.FixedValue = 292
          [Phenology].EarlyFlowering.Target.FixedValue = 123
          [Phenology].EarlyGrainFilling.Target.FractionofGrainfilling.FixedValue = 0.30
          [Phenology].LateGrainFilling.Target.EntireGrainfillPeriod.FixedValue = 535
          [Phenology].PhotoperiodModifier.XYPairs.X = 13.09, 16.49
      Cultivar HornbeckHBK4891_MG40
        Command:
          [Phenology].Vegetative.Target.FixedValue = 292
          [Phenology].EarlyFlowering.Target.FixedValue = 123
          [Phenology].EarlyGrainFilling.Target.FractionofGrainfilling.FixedValue = 0.30
          [Phenology].LateGrainFilling.Target.EntireGrainfillPeriod.FixedValue = 535
          [Phenology].PhotoperiodModifier.XYPairs.X = 13.09, 16.49
      Cultivar AsgrowAG5701_MG50
        Command:
          [Phenology].Vegetative.Target.FixedValue = 404
          [Phenology].EarlyFlowering.Target.FixedValue = 131
          [Phenology].EarlyGrainFilling.Target.FractionofGrainfilling.FixedValue = 0.30
          [Phenology].LateGrainFilling.Target.EntireGrainfillPeriod.FixedValue = 549
          [Phenology].PhotoperiodModifier.XYPairs.X = 12.83, 16.13
      Cultivar PioneerP9504_MG50
        Command:
          [Phenology].Vegetative.Target.FixedValue = 404
          [Phenology].EarlyFlowering.Target.FixedValue = 112
          [Phenology].EarlyGrainFilling.Target.FractionofGrainfilling.FixedValue = 0.30
          [Phenology].LateGrainFilling.Target.EntireGrainfillPeriod.FixedValue = 505
          [Phenology].PhotoperiodModifier.XYPairs.X = 12.83, 16.13
      Cultivar Pioneer92MGI_MG26
        Command:
          [Phenology].Vegetative.Target.FixedValue = 271
          [Phenology].EarlyFlowering.Target.FixedValue = 120
          [Phenology].EarlyGrainFilling.Target.FractionofGrainfilling.FixedValue = 0.125
          [Phenology].LateGrainFilling.Target.EntireGrainfillPeriod.FixedValue = 529
          [Phenology].PhotoperiodModifier.XYPairs.X = 13.77, 17.57
      Cultivar Becks321NRR_MG32
        Command:
          [Phenology].Vegetative.Target.FixedValue = 272
          [Phenology].EarlyFlowering.Target.FixedValue = 117
          [Phenology].EarlyGrainFilling.Target.FractionofGrainfilling.FixedValue = 0.20
          [Phenology].LateGrainFilling.Target.EntireGrainfillPeriod.FixedValue = 522
          [Phenology].PhotoperiodModifier.XYPairs.X = 13.45, 18.0
      Cultivar Hooper_MG40
        Command:
          [Phenology].Vegetative.Target.FixedValue = 380
          [Phenology].EarlyFlowering.Target.FixedValue = 80
          [Phenology].EarlyGrainFilling.Target.FractionofGrainfilling.FixedValue = 0.05
          [Phenology].LateGrainFilling.Target.EntireGrainfillPeriod.FixedValue = 440
          [Phenology].PhotoperiodModifier.XYPairs.X = 13.26, 16.67
          [Leaf].LeafCohortParameters.MaxArea.LargestLeaf.FixedValue = 17000
      Cultivar Stephens_MG40
        Command:
          [Phenology].Vegetative.Target.FixedValue = 360
          [Phenology].EarlyFlowering.Target.FixedValue = 80
          [Phenology].EarlyGrainFilling.Target.FractionofGrainfilling.FixedValue = 0.05
          [Phenology].LateGrainFilling.Target.EntireGrainfillPeriod.FixedValue = 440
          [Phenology].PhotoperiodModifier.XYPairs.X = 13.26, 16.67
          [Leaf].LeafCohortParameters.MaxArea.LargestLeaf.FixedValue = 17000
      Cultivar Davis
        Command:
          [Phenology].Vegetative.Target.FixedValue = 480
          [Phenology].EarlyFlowering.Target.FixedValue = 100
          [Phenology].EarlyGrainFilling.Target.FractionofGrainfilling.FixedValue = 0.015
          [Phenology].LateGrainFilling.Target.EntireGrainfillPeriod.FixedValue = 467
          [Phenology].PhotoperiodModifier.XYPairs.X = 12.39, 15.61
          [Phenology].MidGrainFilling.Target.FractionofMidToLateGrainfilling.FixedValue=0.33
          [Leaf].LeafCohortParameters.MaxArea.LargestLeaf.FixedValue = 23000
          [Leaf].LeafCohortParameters.MaxArea.RelativeArea.XYPairs.X = 2, 7, 13, 18
          [Grain].MaximumNConc.FixedValue = 0.067
          [Stem].PotentialGrowth.PartitionFraction.StemGrowthPhase.StemFraction.FixedValue = 0.5
      Cultivar PioneerP92Y75_MG27
        Command:
          [Phenology].Vegetative.Target.FixedValue = 328
          [Phenology].EarlyFlowering.Target.FixedValue = 106
          [Phenology].EarlyGrainFilling.Target.FractionofGrainfilling.FixedValue = 0.14
          [Phenology].LateGrainFilling.Target.EntireGrainfillPeriod.FixedValue = 499
          [Phenology].PhotoperiodModifier.XYPairs.X = 13.59, 17.6
      Cultivar PioneerP22T61_MG22
        Command:
          [Phenology].Vegetative.Target.FixedValue = 328
          [Phenology].EarlyFlowering.Target.FixedValue = 106
          [Phenology].EarlyGrainFilling.Target.FractionofGrainfilling.FixedValue = 0.3
          [Phenology].LateGrainFilling.Target.EntireGrainfillPeriod.FixedValue = 499
          [Phenology].PhotoperiodModifier.XYPairs.X = 13.59, 17.6
      Cultivar Buchanan
        Command:
          [Phenology].Vegetative.Target.FixedValue = 380
          [Phenology].EarlyFlowering.Target.FixedValue = 80
          [Phenology].EarlyGrainFilling.Target.FractionofGrainfilling.FixedValue = 0.05
          [Phenology].LateGrainFilling.Target.EntireGrainfillPeriod.FixedValue = 440
          [Phenology].PhotoperiodModifier.XYPairs.X = 13.26, 16.67
          [Leaf].LeafCohortParameters.MaxArea.LargestLeaf.FixedValue = 21500
      Cultivar Djakal
        Command:
          [Phenology].Vegetative.Target.FixedValue = 332
          [Phenology].EarlyFlowering.Target.FixedValue = 80
          [Phenology].EarlyGrainFilling.Target.FractionofGrainfilling.FixedValue = 0.05
          [Phenology].LateGrainFilling.Target.EntireGrainfillPeriod.FixedValue = 440
          [Phenology].PhotoperiodModifier.XYPairs.X = 13.26, 16.67
          [Leaf].LeafCohortParameters.MaxArea.LargestLeaf.FixedValue = 17000
      Cultivar PioneerP93M11_MG31
        Command:
          [Phenology].Vegetative.Target.FixedValue = 250
          [Phenology].EarlyFlowering.Target.FixedValue = 110
          [Phenology].EarlyGrainFilling.Target.FractionofGrainfilling.FixedValue = 0.30
          [Phenology].LateGrainFilling.Target.EntireGrainfillPeriod.FixedValue = 457
          [Phenology].PhotoperiodModifier.XYPairs.X = 13.4, 16.0
          [Leaf].LeafCohortParameters.MaxArea.LargestLeaf.FixedValue = 25000
          [Grain].MaximumNConc.FixedValue = 0.065
          [Shell].PotentialHarvestIndex.FixedValue = 0.5
          [Leaf].LeafCohortParameters.DetachmentDuration.FixedValue = 1e6
      Constant MortalityRate: FixedValue=0
    Plant Maize: PlantType=Maize; IsAlive=false; IsEnding=false; DaysAfterEnding=0
      OrganArbitrator Arbitrator: same as Replacements.Soybean.Arbitrator
      Phenology
        MultiplyFunction ThermalTime
          HourlyInterpolation BaseThermalTime: agregationMethod=0
            XYPairs Response: X=[0, 18, 26, 34, 44]; Y=[0, 10, 18, 26, 0]
            ThreeHourSin InterpolationMethod
        GerminatingPhase Germinating: Start=Sowing; End=Germination
        EmergingPhase Emerging: ShootLag=55; ShootRate=0.6; Start=Germination; End=Emergence; TTForTimeStep=0
          VariableReference ThermalTime: VariableName=[Phenology].ThermalTime
        GenericPhase Juvenile: Start=Emergence; End=EndJuvenile
          Constant Target: FixedValue=200; Units=deg day
          VariableReference Progression: VariableName=[Phenology].ThermalTime
        GenericPhase Photosensitive: Start=EndJuvenile; End=FloralInitiation
          VariableReference Progression: VariableName=[Phenology].ThermalTime
          LinearInterpolationFunction Target
            Memo
              The photoperiod is likely to vary with individual maize cultivars.  Therefore, the response shown here is indicative only.  See the descriptions of individual cultivars for more detail on photoperiod responses used by the maize model.
            XYPairs: X=[0, 12.5, 24]; Y=[0, 0, 10]
            VariableReference XValue: VariableName=[Phenology].Photoperiod
        LeafAppearancePhase LeafAppearance: Start=FloralInitiation; End=FlagLeaf
          VariableReference ThermalTime: VariableName=[Phenology].ThermalTime
          VariableReference FinalLeafNumber: VariableName=[Structure].FinalLeafNumber
          ExpressionFunction LeafNumber
            Expression=[Leaf].ExpandedCohortNo + [Leaf].NextExpandingLeafProportion
          VariableReference FullyExpandedLeafNo: VariableName=[Leaf].ExpandedCohortNo
          VariableReference InitialisedLeafNumber: VariableName=[Leaf].InitialisedCohortNo
        GenericPhase FlagLeafToFlowering: Start=FlagLeaf; End=Flowering
          Constant Target: FixedValue=50; Units=deg day
          VariableReference Progression: VariableName=[Phenology].ThermalTime
        GenericPhase FloweringToGrainFilling: Start=Flowering; End=StartGrainFill
          Constant Target: FixedValue=120; Units=deg day
          VariableReference Progression: VariableName=[Phenology].ThermalTime
        GenericPhase GrainFilling: Start=StartGrainFill; End=EndGrainFill
          Constant Target: FixedValue=550; Units=deg day
          VariableReference Progression: VariableName=[Phenology].ThermalTime
        GenericPhase Maturing: Start=EndGrainFill; End=Maturity
          Constant Target: FixedValue=10; Units=deg day
          VariableReference Progression: VariableName=[Phenology].ThermalTime
        GenericPhase MaturityToHarvestRipe: Start=Maturity; End=HarvestRipe
          Constant Target: FixedValue=10; Units=deg day
          VariableReference Progression: VariableName=[Phenology].ThermalTime
        EndPhase ReadyForHarvesting: Start=HarvestRipe; End=Unused
          VariableReference ThermalTime: VariableName=[Phenology].ThermalTime
        PhotoperiodFunction Photoperiod: Twilight=-6; DayLength=0
        OnEventFunction FloweringDAS: SetEvent=Flowering; ReSetEvent=never
          Memo
            A function is used to provide flowering date as days after sowing(DAS).
          Constant PreEventValue: FixedValue=0
          VariableReference PostEventValue: VariableName=[Plant].DaysAfterSowing
        OnEventFunction MaturityDAS: SetEvent=Maturity; ReSetEvent=never
          Memo
            A function is used to provide maturity date as days after sowing(DAS).
          Constant PreEventValue: FixedValue=0
          VariableReference PostEventValue: VariableName=[Plant].DaysAfterSowing
        BBCH
      Structure: CohortInitialisationStage=Germination; LeafInitialisationStage=Emergence
        Memo
          Though tillering is common in some maize varieties under certain agronomic conditions, no tillering is accounted for within this model.  Therefore all branching has been parameterised out of the current maize model.
        Constant StemSenescenceAge: FixedValue=0
        VariableReference ThermalTime: VariableName=[Phenology].ThermalTime
        PhaseLookup Phyllochron
          PhaseLookupValue Phyllochron: Start=Emergence; End=FlagLeaf
            LinearInterpolationFunction Phyllochron
              XYPairs: X=[1, 3.4, 4]; Y=[30, 30, 42]
              VariableReference XValue: VariableName=[Structure].LeafTipsAppeared
        HeightFunction HeightModel
          LinearInterpolationFunction PotentialHeight
            XYPairs: X=[3, 4, 5, 6]; Y=[20, 400, 450, 1700]
            VariableReference XValue: VariableName=[Phenology].Stage
          LinearInterpolationFunction WaterStress
            XYPairs: X=[0, 0.6]; Y=[0, 1]
            VariableReference XValue: VariableName=[Maize].Leaf.Fw
        Constant BranchingRate: FixedValue=0
        AddFunction BranchMortality
          Constant ShadeInducedBranchMortality: FixedValue=0
          Constant DroughtInducedBranchMortality: FixedValue=0
        Constant zFinalLeafNumber: FixedValue=15
        HoldFunction FinalLeafNumber: WhenToHold=FloralInitiation
          AddFunction ValueToHold
            Constant PrimordiaAtEmergence: FixedValue=6
            DivideFunction PrimordiaDuringJuvenilePhase
              AddFunction
                VariableReference JuvenilePhaseDuration: VariableName=[Phenology].Juvenile.Target
                VariableReference PhotoSensitivePhaseDuration: VariableName=[Phenology].Photosensitive.Target
              PhaseLookup MeanPlastochron
                PhaseLookupValue PreEmerg: Start=Germination; End=Emergence
                  Constant: FixedValue=15
                PhaseLookupValue PostEmerg: Start=Emergence; End=FlagLeaf
                  DivideFunction MeanPlastochron
                    AccumulateFunction AccumulatedPlastochron: StartStageName=Emergence; EndStageName=FloralInitiation; FractionRemovedOnCut=0; FractionRemovedOnHarvest=0; FractionRemovedOnGraze=0; FractionRemovedOnPrune=0
                      MultiplyFunction Plastochron
                        VariableReference Phyllochron: VariableName=[Structure].Phyllochron
                        Constant LeafTipsPerPrimordia: FixedValue=0.5
                    AccumulateFunction Days: StartStageName=Emergence; EndStageName=FloralInitiation; FractionRemovedOnCut=0; FractionRemovedOnHarvest=0; FractionRemovedOnGraze=0; FractionRemovedOnPrune=0
                      Constant: FixedValue=1
      ReproductiveOrgan Grain: GrowthRespiration=0; MaintenanceRespiration=0
        Biomass Live: DMDOfStructural=0.6
        Biomass Dead: DMDOfStructural=0.6
        Constant DMConversionEfficiency: FixedValue=1
        Constant RemobilisationCost: FixedValue=0
        Constant InitialGrainProportion: FixedValue=0.05
        Constant MaximumPotentialGrainSize: FixedValue=0.3; Units=g
        Constant MaximumGrainsPerCob: FixedValue=700; Units=number
        PhaseLookup DMDemandFunction
          PhaseLookupValue InitialPhase: Start=Flowering; End=StartGrainFill
            FillingRateFunction
              VariableReference NumberFunction: VariableName=[Grain].NumberFunction
              VariableReference FillingDuration: VariableName=[Phenology].FloweringToGrainFilling.Target
              VariableReference ThermalTime: VariableName=[Phenology].ThermalTime
              MultiplyFunction PotentialSizeIncrement
                VariableReference InitialProportion: VariableName=[Grain].InitialGrainProportion
                VariableReference MaximumSize: VariableName=[Grain].MaximumPotentialGrainSize
          PhaseLookupValue LinearPhase: Start=StartGrainFill; End=EndGrainFill
            FillingRateFunction
              VariableReference NumberFunction: VariableName=[Grain].NumberFunction
              VariableReference FillingDuration: VariableName=[Phenology].GrainFilling.Target
              VariableReference ThermalTime: VariableName=[Phenology].ThermalTime
              MultiplyFunction PotentialSizeIncrement
                SubtractFunction ProportionLinearPhase
                  Constant One: FixedValue=1
                  VariableReference InitialProportion: VariableName=[Grain].InitialGrainProportion
                VariableReference MaximumSize: VariableName=[Grain].MaximumPotentialGrainSize
        Constant MinimumNConc: FixedValue=0.008; Units=g/g
        PhaseLookup MaximumNConc
          PhaseLookupValue InitialPhase: Start=Flowering; End=StartGrainFill
            Constant InitialNconc: FixedValue=0.05
          PhaseLookupValue LinearPhase: Start=StartGrainFill; End=EndGrainFill
            Constant FinalNconc: FixedValue=0.013
        Constant WaterContent: FixedValue=0.12; Units=g/g
        PhaseLookup NFillingRate
          PhaseLookupValue GrainFilling: Start=Flowering; End=EndGrainFill
            FillingRateFunction
              VariableReference NumberFunction: VariableName=[Grain].NumberFunction
              AddFunction FillingDuration
                VariableReference FloweringToGrainFilling: VariableName=[Phenology].FloweringToGrainFilling.Target
                VariableReference GrainFilling: VariableName=[Phenology].GrainFilling.Target
              VariableReference ThermalTime: VariableName=[Phenology].ThermalTime
              MultiplyFunction PotentialSizeIncrement
                VariableReference MaximumFinalNConc: VariableName=[Grain].MaximumNConc.LinearPhase.FinalNconc
                VariableReference MaximumSize: VariableName=[Grain].MaximumPotentialGrainSize
        MultiplyFunction NumberFunction
          VariableReference PotentialGrainNumber: VariableName=[MaximumGrainsPerCob]
          LinearInterpolationFunction GrowthRateFactor
            XYPairs: X=[0.55, 3.3, 6.6, 10]; Y=[0, 0.6, 1, 1]
            VariableReference XValue: VariableName=[GrowthRateGrainDevelopment]
          VariableReference Population: VariableName=[Maize].Population
        ExpressionFunction YieldBuPerAcre: Expression=[Grain].Live.Wt * 10 * 56 * 0.4536 * 2.471
        AccumulateFunction GrowthGrainDevelopment: StartStageName=FlagLeaf; EndStageName=StartGrainFill; FractionRemovedOnCut=0; FractionRemovedOnHarvest=0; FractionRemovedOnGraze=0; FractionRemovedOnPrune=0
          VariableReference DailyBiomassProduction: VariableName=[Arbitrator].DM.TotalFixationSupply
        AccumulateFunction DaysGrainDevelopment: StartStageName=FlagLeaf; EndStageName=StartGrainFill; FractionRemovedOnCut=0; FractionRemovedOnHarvest=0; FractionRemovedOnGraze=0; FractionRemovedOnPrune=0
          Constant LenthOfADay: FixedValue=1; Units=days/day
        DivideFunction GrowthRateGrainDevelopment
          VariableReference AccumulatedGrowth: VariableName=[GrowthGrainDevelopment]
          VariableReference GrowthDuration: VariableName=[DaysGrainDevelopment]
          VariableReference Population: VariableName=[Maize].Population
        BiomassRemoval BiomassRemovalDefaults: same as Replacements.Soybean.Grain.BiomassRemovalDefaults
        Constant CarbonConcentration: FixedValue=0.4
      Root: GrowthRespiration=0; MaintenanceRespiration=0
        RootShapeCylindre RootShape
        LinearInterpolationFunction KLModifier
          Memo
            The parameter KL is is described by Meinke et al (1993) to combine elements of soil conductivity (K) with root length (L) in determining root water uptake.  Peake et al (2013) demonstrated that in maize KL varied with plant population through impacts on root length density.  Here we adjust KL linearly with plant population.
          XYPairs: X=[0, 10]; Y=[1, 1]
          VariableReference XValue: VariableName=[Maize].Population
        Constant DMConversionEfficiency: FixedValue=1
        Constant RemobilisationCost: FixedValue=0
        Constant SoilWaterEffect: FixedValue=1
          Memo
            No effect of soil water content on root growth is currently captured in the model.
        Constant MaxDailyNUptake: FixedValue=20; Units=g/m2/d
          Memo
            Maximum daily N uptake is set to an arbitrarily high value.
        Constant SenescenceRate: FixedValue=0.005; Units=/d
          Memo
            Jones and Kiniry (1986) used a constant root senescence fraction in the CERES-Maize model.
        Constant MaximumRootDepth: FixedValue=1000000
        Constant MaximumNConc: FixedValue=0.01; Units=g/g
        Constant MinimumNConc: FixedValue=0.01; Units=g/g
        MultiplyFunction RootFrontVelocity
          PhaseLookup PotentialRootFrontVelocity
            Memo
              [Hammer_etal_2009] used a constant extraction front velocity of 2.5cm per day in their analysis of historical maize yield trends in the US corn belt.
            PhaseLookupValue PreFlowering: Start=Germination; End=Flowering
              Constant RootFrontVelocity: FixedValue=25; Units=mm/d
            PhaseLookupValue PostFlowering: Start=Flowering; End=Maturity
              Constant RootFrontVelocity: FixedValue=0; Units=mm/d
          WeightedTemperatureFunction TemperatureFactor: MaximumTemperatureWeighting=0.5
            XYPairs: X=[0, 8, 15, 35, 50]; Y=[0, 0, 1, 1, 0]
          LinearInterpolationFunction WaterFactor
            SoilWaterScale
            XYPairs: X=[0, 0.25, 1]; Y=[0, 1, 1]
            VariableReference XValue: VariableName=[SoilWaterScale]
        PhaseLookupValue NitrogenDemandSwitch: Start=Germination; End=Maturity
          Constant: FixedValue=1
        BiomassRemoval BiomassRemovalDefaults: same as Replacements.Soybean.Root.BiomassRemovalDefaults
        Constant SpecificRootLength: FixedValue=40; Units=m/g
        Constant KNO3: FixedValue=0.03
        Constant KNH4: FixedValue=0.02
        LinearInterpolationFunction NUptakeSWFactor
          XYPairs: X=[0, 1]; Y=[0, 1]
          VariableReference XValue: VariableName=[Root].RWC
        Constant MaintenanceRespirationFunction: FixedValue=0
        Constant CarbonConcentration: FixedValue=0.4
        BiomassDemand DMDemands
          MultiplyFunction Structural
            PartitionFractionDemandFunction DMDemandFunction
              LinearInterpolationFunction PartitionFraction
                XYPairs: X=[0, 2.99, 3, 6, 7]; Y=[0, 0, 0.2, 0.2, 0]
                VariableReference XValue: VariableName=[Phenology].Stage
            Constant StructuralFraction: FixedValue=1
          Constant Metabolic: FixedValue=0
          StorageDMDemandFunction Storage
            SubtractFunction StorageFraction
              Constant One: FixedValue=1
              VariableReference StructuralFraction: VariableName=[Root].DMDemands.Structural.StructuralFraction
        BiomassDemand NDemands: same as Replacements.Soybean.Root.NDemands
        VariableReference CriticalNConc: VariableName=[Root].MinimumNConc
        BiomassDemand InitialWt
          Constant Structural: FixedValue=0.2; Units=g/plant
          Constant Metabolic: FixedValue=0
          Constant Storage: FixedValue=0
        Constant RootDepthStressFactor: FixedValue=1
      Leaf: MaxCover=1; Albedo=0.18; Gsmax350=0.009; R50=160; KDead=0.03; MaximumMainStemLeafNumber=30
        zero: CurrentExpandingLeaf, StartFractionExpanded, FractionNextleafExpanded, DeadNodesYesterday, GrowthRespiration, LAI, Depth, Width, FRGR, PotentialEP, WaterDemand, TipsAtEmergence, CohortsAtInitialisation, FractionDied
        ExpressionFunction CO2internal: Expression=(163 - [IWeather].MeanT)/(5 - 0.1*[IWeather].MeanT)
        DivideFunction StomatalConductanceCO2Modifier
          VariableReference FCO2: VariableName=[Leaf].Photosynthesis.FCO2
          ExpressionFunction RelativeCO2Gradient
            Expression=([IWeather].CO2 - [Leaf].CO2internal)/(350 - [Leaf].CO2internal)
        LeafCohort InitialLeaves[1]: Rank=1; Area=380
          zero: NReallocationFactor, DMReallocationFactor, NRetranslocationFactor, DMRetranslocationFactor, ShadeInducedSenRate, SenescedFrac, DeltaPotentialArea, DeltaStressConstrainedArea, DeltaCarbonConstrainedArea, PotentialStructuralDMAllocation, PotentialMetabolicDMAllocation, MetabolicNReallocated, MetabolicWtReallocated, StorageNReallocated, StorageWtReallocated, MetabolicNRetranslocated, StorageNRetrasnlocated, DMRetranslocated, MetabolicNAllocation, StructuralDMAllocation, MetabolicDMAllocation, MaintenanceRespiration
        LeafCohort InitialLeaves[2]: same as Replacements.Soybean.Leaf.InitialLeaf2
        LeafCohortParameters CohortParameters: ExpansionStressValue=0; CellDivisionStressValue=0; DroughtInducedLagAccelerationValue=0; DroughtInducedSenAccelerationValue=0; ShadeInducedSenescenceRateValue=0; SenessingLeafRelativeSizeValue=0
          Constant DMReallocationFactor: FixedValue=1
          Constant RemobilisationCost: FixedValue=0
          Constant LeafSizeShapeParameter: FixedValue=0.01
          Constant MaintenanceRespirationFunction: FixedValue=0
          Constant SenessingLeafRelativeSize: FixedValue=1; Units=0-1
          BellCurveFunction MaxArea
            Memo
              Potential leaf area is calculated from leaf number using the approach of Keating and Wafula (1992).
              Individual leaf size is described using a bell-shaped curve, the parameters of which are derived from final leaf number.
            MultiplyFunction LargestLeafPosition
              VariableReference FinalLeafNumber: VariableName=[Structure].FinalLeafNumber
              Constant RelativePositionOfLargestLeaf: FixedValue=0.67
            LinearInterpolationFunction AreaMax
              XYPairs: X=[0, 2, 7, 12, 17, 22]; Y=[32530, 39259, 49659, 60000, 75000, 90000]
              VariableReference XValue: VariableName=[Structure].FinalLeafNumber
            LinearInterpolationFunction Breadth
              XYPairs: X=[5, 10, 15, 20, 25]; Y=[-0.377, -0.144, -0.059, -0.027, -0.016]
              VariableReference XValue: VariableName=[Structure].FinalLeafNumber
            Constant Skewness: FixedValue=0.00025
          Constant NReallocationFactor: FixedValue=1
          Constant NRetranslocationFactor: FixedValue=0
          Constant DMRetranslocationFactor: FixedValue=0.5
          LinearInterpolationFunction CellDivisionStress
            XYPairs: X=[0.9, 1]; Y=[1, 1]
            VariableReference XValue: VariableName=[Maize].Leaf.Fw
          MinimumFunction ExpansionStress
            LinearInterpolationFunction WaterStressEffect
              XYPairs: X=[0, 0.9, 1.3]; Y=[0, 1, 1]
              VariableReference XValue: VariableName=[Root].WaterTensionFactor
            LinearInterpolationFunction TemperatureEffect
              XYPairs: X=[0, 12, 14]; Y=[0, 1, 1]
              VariableReference XValue: VariableName=[IWeather].MeanT
            LinearInterpolationFunction NitrogenStressEffect
              XYPairs: X=[0, 0.5, 1]; Y=[0.1, 0.1, 1]
              VariableReference XValue: VariableName=[Maize].Leaf.Fn
          LinearInterpolationFunction GrowthDuration
            XYPairs: X=[0, 0.3, 0.5, 1]; Y=[1, 200, 250, 100]
            VariableReference XValue: VariableName=[Structure].RelativeNodeApperance
          LinearInterpolationFunction LagDuration
            XYPairs: X=[0, 0.5, 0.7, 0.8, 1]; Y=[300, 300, 700, 900, 1300]
            VariableReference XValue: VariableName=[Structure].RelativeNodeApperance
          LinearInterpolationFunction SenescenceDuration
            XYPairs: X=[0, 0.3, 0.5]; Y=[150, 150, 350]
            VariableReference XValue: VariableName=[Structure].RelativeNodeApperance
          Constant DetachmentLagDuration: FixedValue=1000000
          Constant DetachmentDuration: FixedValue=1000000
          AddFunction MaximumNConc
            VariableReference CriticalNConc: VariableName=[Leaf].CohortParameters.CriticalNConc
            MultiplyFunction StorageNConc
              LinearInterpolationFunction NonStructuralNConc
                XYPairs: X=[1, 10]; Y=[0.034, 0.01]
                VariableReference XValue: VariableName=[Structure].LeafTipsAppeared
              LinearInterpolationFunction WaterStressEffect
                XYPairs: X=[0.5, 0.95, 1]; Y=[0, 0, 1]
                VariableReference XValue: VariableName=[Root].WaterTensionFactor
          Constant CriticalNConc: FixedValue=0.01; Units=g/g
          Constant MinimumNConc: FixedValue=0.005; Units=g/g
          AddFunction DroughtInducedLagAcceleration
            Constant One: FixedValue=1
            MultiplyFunction Stress
              Constant StressResponseCoefficient: FixedValue=2
              LinearInterpolationFunction StressFactor
                XYPairs: X=[0.5, 1]; Y=[1, 0]
                VariableReference XValue: VariableName=[Maize].Leaf.Fw
          AddFunction DroughtInducedSenAcceleration
            Constant One: FixedValue=1
            MultiplyFunction Stress
              Constant StressResponseCoefficient: FixedValue=0
              LinearInterpolationFunction StressFactor
                XYPairs: X=[0, 1]; Y=[1, 0]
                VariableReference XValue: VariableName=[Root].WaterTensionFactor
          LinearInterpolationFunction SpecificLeafAreaMax
            XYPairs: X=[1, 9]; Y=[30000, 20000]
            VariableReference XValue: VariableName=[Structure].LeafTipsAppeared
          LinearInterpolationFunction SpecificLeafAreaMin
            XYPairs: X=[1, 9]; Y=[25000, 15000]
            VariableReference XValue: VariableName=[Structure].LeafTipsAppeared
          Constant StructuralFraction: FixedValue=0.3
          Constant StorageFraction: FixedValue=0.1
          LinearInterpolationFunction ShadeInducedSenescenceRate
            XYPairs: X=[0, 0.7, 0.8, 0.96, 0.99]; Y=[0, 0, 0, 0, 0]
            VariableReference XValue: VariableName=[Leaf].CohortCurrentRankCoverAbove
          Constant InitialNConc: FixedValue=0; Units=g/g
          ArrayFunction LagDurationAgeMultiplier: Values=1 1 1
          ArrayFunction SenescenceDurationAgeMultiplier: Values=1 1 1
          ArrayFunction LeafSizeAgeMultiplier: Values=1 1 1 1 1 1 1 1 1 1 1 1
        RUEModel Photosynthesis
          Constant RUE: FixedValue=2
          WeightedTemperatureFunction FT: MaximumTemperatureWeighting=0.75
            XYPairs: X=[0, 8, 15, 35, 50]; Y=[0, 0, 1, 1, 0]
          LinearInterpolationFunction FVPD
            XYPairs: X=[0, 10, 50]; Y=[1, 1, 1]
            VariableReference XValue: VariableName=[Leaf].Photosynthesis.VPD
          LinearInterpolationFunction FN
            XYPairs: X=[0, 1]; Y=[0.3, 1]
            VariableReference XValue: VariableName=[Leaf].Fn
          LinearInterpolationFunction FW
            XYPairs: X=[0, 0.3]; Y=[0, 1]
            VariableReference XValue: VariableName=[Leaf].Fw
          RUECO2Function FCO2: PhotosyntheticPathway=C4
          VariableReference RadnInt: VariableName=[Leaf].RadiationIntercepted
        MultiplyFunction ExtinctionCoeff
          Memo
            Extinction coefficient is specified in terms of a potential extinction coefficient which is then discounted during periods of water stress to account for the impact of leaf curling.
          LinearInterpolationFunction PotentialExtinctionCoeff
            XYPairs: X=[0.2, 0.5, 1]; Y=[0.7, 0.5, 0.4]
            VariableReference XValue: VariableName=[Maize].SowingData.RowSpacing
          LinearInterpolationFunction WaterStressImpact
            XYPairs: X=[0, 0.7]; Y=[0.5, 1]
            VariableReference XValue: VariableName=[Maize].Leaf.Fw
        LinearInterpolationFunction FrostFraction
          XYPairs: X=[-2, 2]; Y=[1, 0]
          VariableReference XValue: VariableName=[Weather].MinT
        VariableReference ThermalTime: VariableName=[Phenology].ThermalTime
        Constant RemobilisationCost: FixedValue=0
        MinimumFunction FRGRFunction
          VariableReference FT: VariableName=[Leaf].Photosynthesis.FT
          VariableReference FN: VariableName=[Leaf].Photosynthesis.FN
          VariableReference FVPD: VariableName=[Leaf].Photosynthesis.FVPD
        Constant StructuralFraction: FixedValue=0.7
        Constant DMConversionEfficiency: FixedValue=1; Units=0-1
        BiomassRemoval BiomassRemovalDefaults: same as Replacements.Soybean.Leaf.BiomassRemovalDefaults
        Constant CarbonConcentration: FixedValue=0.4
        Constant WidthFunction: FixedValue=0
        VariableReference DepthFunction: VariableName=[Leaf].Height
      GenericOrgan Husk: IsAboveGround=true
        Constant NReallocationFactor: FixedValue=0
        Constant RemobilisationCost: FixedValue=0
        Constant NRetranslocationFactor: FixedValue=0.1
        Constant MaximumNConc: FixedValue=0.007; Units=g/g
        Constant SenescenceRate: FixedValue=0; Units=/d
        Constant MinimumNConc: FixedValue=0.005; Units=g/g
        Constant DMRetranslocationFactor: FixedValue=0.1
        BiomassRemoval BiomassRemovalDefaults: same as Replacements.Soybean.Nodule.BiomassRemovalDefaults
        Constant DetachmentRateFunction: FixedValue=0; Units=/d
        Constant MaintenanceRespirationFunction: FixedValue=0; Units=0-1
        Constant DMConversionEfficiency: FixedValue=1; Units=0-1
        Constant DMReallocationFactor: FixedValue=0
        VariableReference CriticalNConc: VariableName=[Husk].MinimumNConc
        PhaseLookupValue NitrogenDemandSwitch: Start=Emergence; End=StartGrainFill
          Constant: FixedValue=1
        Constant CarbonConcentration: FixedValue=0.4
        BiomassDemand DMDemands
          MultiplyFunction Structural
            PopulationBasedDemandFunction DMDemandFunction
              VariableReference ThermalTime: VariableName=[Phenology].ThermalTime
              Constant StartStage: FixedValue=5.5
              Constant GrowthDuration: FixedValue=300
              Constant MaximumOrganWt: FixedValue=25
              VariableReference OrganPopulation: VariableName=[Rachis].CobNumber
              Constant SenescenceRate: FixedValue=0; Units=/d
              LinearInterpolationFunction ExpansionStress2
                XYPairs: X=[0, 0.35]; Y=[0, 1]
                VariableReference XValue: VariableName=[Maize].Leaf.Fw
              MinimumFunction ExpansionStress
                LinearInterpolationFunction WaterStressEffect
                  XYPairs: X=[0.1, 0.7, 1.3]; Y=[0, 1, 1]
                  VariableReference XValue: VariableName=[Root].WaterTensionFactor
                LinearInterpolationFunction TemperatureEffect
                  XYPairs: X=[0, 12, 14]; Y=[0, 1, 1]
                  VariableReference XValue: VariableName=[IWeather].MeanT
                LinearInterpolationFunction NitrogenStressEffect
                  XYPairs: X=[0, 0.5, 1]; Y=[0.1, 0.1, 1]
                  VariableReference XValue: VariableName=[Maize].Leaf.Fn
            PhaseLookup StructuralFraction
              PhaseLookupValue PreStemElongation: Start=Emergence; End=StartGrainFill
                Constant StemFraction: FixedValue=0.5
              PhaseLookupValue StemElongation: Start=StartGrainFill; End=HarvestRipe
                Constant StemFraction: FixedValue=1
          Constant Metabolic: FixedValue=0
          StorageDMDemandFunction Storage
            SubtractFunction StorageFraction
              Constant One: FixedValue=1
              VariableReference StructuralFraction: VariableName=[Husk].DMDemands.Structural.StructuralFraction
        BiomassDemand NDemands
          MultiplyFunction Structural
            VariableReference MinNconc: VariableName=[Husk].minimumNconc
            VariableReference PotentialDMAllocation: VariableName=[Husk].potentialDMAllocation.Structural
          MultiplyFunction Metabolic
            SubtractFunction MetabolicNconc
              VariableReference CritNconc: VariableName=[Husk].criticalNConc
              VariableReference MinNconc: VariableName=[Husk].minimumNconc
            VariableReference PotentialDMAllocation: VariableName=[Husk].potentialDMAllocation.Structural
          StorageNDemandFunction Storage
            VariableReference NitrogenDemandSwitch: VariableName=[Husk].nitrogenDemandSwitch
            VariableReference MaxNconc: VariableName=[Husk].maximumNconc
        RetranslocateNonStructural RetranslocateNitrogen
        BiomassDemand InitialWt
          Constant Structural: FixedValue=0; Units=g/m^2
          Constant Metabolic: FixedValue=0
          Constant Storage: FixedValue=0
        Constant Photosynthesis: FixedValue=0
        VariableReference initialNConcFunction: VariableName=[Husk].MinimumNConc
        BiomassDemand dmDemandPriorityFactors
          Constant Structural: FixedValue=1
          Constant Metabolic: FixedValue=1
          Constant Storage: FixedValue=1
      GenericOrgan Rachis: IsAboveGround=true
        MultiplyFunction CobNumber
          VariableReference StemNumber: VariableName=[Structure].TotalStemPopn
          Constant CobsPerStem: FixedValue=1.1
        DivideFunction CobSize
          VariableReference CobMass: VariableName=[Rachis].Live.Wt
          VariableReference CobNumber: VariableName=[Rachis].CobNumber
        Constant NReallocationFactor: FixedValue=0
        Constant RemobilisationCost: FixedValue=0
        Constant NRetranslocationFactor: FixedValue=0.1
        Constant MaximumNConc: FixedValue=0.008; Units=g/g
        Constant SenescenceRate: FixedValue=0; Units=/d
        Constant MinimumNConc: FixedValue=0.003; Units=g/g
        LinearInterpolationFunction ExpansionStress
          XYPairs: X=[0.1, 0.7]; Y=[0, 1]
          VariableReference XValue: VariableName=[Maize].Leaf.Fw
        BiomassRemoval BiomassRemovalDefaults: same as Replacements.Soybean.Nodule.BiomassRemovalDefaults
        Constant DetachmentRateFunction: FixedValue=0; Units=/d
        Constant MaintenanceRespirationFunction: FixedValue=0; Units=0-1
        Constant DMConversionEfficiency: FixedValue=1; Units=0-1
        Constant DMReallocationFactor: FixedValue=0
        Constant DMRetranslocationFactor: FixedValue=0
        VariableReference CriticalNConc: VariableName=[Rachis].MinimumNConc
        PhaseLookupValue NitrogenDemandSwitch: Start=Emergence; End=StartGrainFill
          Constant: FixedValue=1
        Constant CarbonConcentration: FixedValue=0.4
        BiomassDemand DMDemands
          MultiplyFunction Structural
            PopulationBasedDemandFunction DMDemandFunction
              VariableReference ThermalTime: VariableName=[Phenology].ThermalTime
              Constant StartStage: FixedValue=5.5
              Constant GrowthDuration: FixedValue=300
              Constant MaximumOrganWt: FixedValue=23
              VariableReference OrganPopulation: VariableName=[Rachis].CobNumber
              MinimumFunction ExpansionStress: same as Replacements.Maize.Husk.DMDemands.Structural.DMDemandFunction.ExpansionStress
            Constant StructuralFraction: FixedValue=1; Units=g/g
          Constant Metabolic: FixedValue=0
          StorageDMDemandFunction Storage
            SubtractFunction StorageFraction
              Constant One: FixedValue=1
              VariableReference StructuralFraction: VariableName=[Rachis].DMDemands.Structural.StructuralFraction
        BiomassDemand NDemands
          MultiplyFunction Structural
            VariableReference MinNconc: VariableName=[Rachis].minimumNconc
            VariableReference PotentialDMAllocation: VariableName=[Rachis].potentialDMAllocation.Structural
          MultiplyFunction Metabolic
            SubtractFunction MetabolicNconc
              VariableReference CritNconc: VariableName=[Rachis].criticalNConc
              VariableReference MinNconc: VariableName=[Rachis].minimumNconc
            VariableReference PotentialDMAllocation: VariableName=[Rachis].potentialDMAllocation.Structural
          StorageNDemandFunction Storage
            VariableReference NitrogenDemandSwitch: VariableName=[Rachis].nitrogenDemandSwitch
            VariableReference MaxNconc: VariableName=[Rachis].maximumNconc
        RetranslocateNonStructural RetranslocateNitrogen
        BiomassDemand InitialWt
          Constant Structural: FixedValue=0; Units=g/m^2
          Constant Metabolic: FixedValue=0
          Constant Storage: FixedValue=0
        Constant Photosynthesis: FixedValue=0
        VariableReference initialNConcFunction: VariableName=[Rachis].MinimumNConc
        BiomassDemand dmDemandPriorityFactors
          Constant Structural: FixedValue=1
          Constant Metabolic: FixedValue=1
          Constant Storage: FixedValue=1
      GenericOrgan Stem: IsAboveGround=true
        Constant RemobilisationCost: FixedValue=0
        LinearInterpolationFunction MaximumNConc
          XYPairs: X=[0, 0.7, 1]; Y=[0.025, 0.025, 0.005]
          VariableReference XValue: VariableName=[Structure].RelativeNodeApperance
        Constant MinimumNConc: FixedValue=0.004; Units=g/g
        PhaseLookupValue NitrogenDemandSwitch: Start=Emergence; End=StartGrainFill
          Constant: FixedValue=1
        Constant NReallocationFactor: FixedValue=0
        PhaseLookup NRetranslocationFactor
          PhaseLookupValue PreStemElongation: Start=Emergence; End=FlagLeaf
            Constant StemFraction: FixedValue=0
          PhaseLookupValue StemElongation: Start=FlagLeaf; End=HarvestRipe
            Constant NRetranslocationFactor: FixedValue=0.05
        Constant DMRetranslocationFactor: FixedValue=0.1
        BiomassRemoval BiomassRemovalDefaults: same as Replacements.Soybean.Nodule.BiomassRemovalDefaults
        Constant DetachmentRateFunction: FixedValue=0; Units=/d
        Constant SenescenceRate: FixedValue=0; Units=/d
        Constant MaintenanceRespirationFunction: FixedValue=0; Units=0-1
        Constant DMConversionEfficiency: FixedValue=1; Units=0-1
        Constant DMReallocationFactor: FixedValue=0
        AddFunction CriticalNConc
          VariableReference MinimumNConc: VariableName=[Stem].MinimumNConc
          MultiplyFunction MetabolicNConc
            SubtractFunction NonStructuralNConc
              VariableReference MaximumNConc: VariableName=[Stem].MaximumNConc
              VariableReference MinimumNConc: VariableName=[Stem].MinimumNConc
            Constant Proportion: FixedValue=0.2
        Constant CarbonConcentration: FixedValue=0.4
        BiomassDemand DMDemands
          MultiplyFunction Structural
            PartitionFractionDemandFunction DMDemandFunction
              LinearInterpolationFunction PartitionFraction
                XYPairs: X=[3, 5, 6, 7, 7.0001]; Y=[0.1, 0.1, 1, 1, 0]
                VariableReference XValue: VariableName=[Phenology].Stage
            PhaseLookup StructuralFraction: same as Replacements.Maize.Husk.DMDemands.Structural.StructuralFraction
          Constant Metabolic: FixedValue=0
          StorageDMDemandFunction Storage
            SubtractFunction StorageFraction
              Constant One: FixedValue=1
              VariableReference StructuralFraction: VariableName=[Stem].DMDemands.Structural.StructuralFraction
        BiomassDemand NDemands: same as Replacements.Soybean.Stem.NDemands
        RetranslocateNonStructural RetranslocateNitrogen
        BiomassDemand InitialWt
          Constant Structural: FixedValue=0; Units=g/m^2
          Constant Metabolic: FixedValue=0
          Constant Storage: FixedValue=0
        Constant Photosynthesis: FixedValue=0
        VariableReference initialNConcFunction: VariableName=[Stem].MinimumNConc
        BiomassDemand dmDemandPriorityFactors
          Constant Structural: FixedValue=1
          Constant Metabolic: FixedValue=1
          Constant Storage: FixedValue=1
      CompositeBiomass AboveGround: DMDOfStructural=0.6
        Propertys=[[Leaf].Live, [Leaf].Dead, [Stem].Live, [Stem].Dead, [Husk].Live, [Husk].Dead, [Grain].Live, [Grain].Dead, [Rachis].Live, [Rachis].Dead]
        Memo
          The AboveGround composite biomass object includes all organs occurring above the soil surface to allow output for total dry matter and Nutrient contents, including total structural, non-structural and metabolic pools.
      CompositeBiomass BelowGround: Propertys=[[Root].Live, [Root].Dead]; DMDOfStructural=0.6
        Memo
          The BelowGround composite biomass object includes all root biomass pools to allow output for total dry matter and Nutrient contents, including total structural, non-structural and metabolic pools.
      CompositeBiomass Total: DMDOfStructural=0.6
        Propertys=[[Leaf].Live, [Leaf].Dead, [Stem].Live, [Stem].Dead, [Husk].Live, [Husk].Dead, [Grain].Live, [Grain].Dead, [Rachis].Live, [Rachis].Dead, [Root].Live, [Root].Dead]
        Memo
          The Total composite biomass object includes all organs (above+below ground) to allow output for total dry matter and Nutrient contents, including total structural, non-structural and metabolic pools.
      CompositeBiomass TotalLive: DMDOfStructural=0.6
        Propertys=[[Leaf].Live, [Stem].Live, [Husk].Live, [Grain].Live, [Rachis].Live, [Root].Live]
        Memo
          The TotalLive composite biomass object includes the Live pools of all organs (above+below ground) to allow output for total dry matter and Nutrient contents, including total structural, non-structural and metabolic pools.
      CompositeBiomass TotalDead: DMDOfStructural=0.6
        Propertys=[[Leaf].Dead, [Stem].Dead, [Husk].Dead, [Grain].Dead, [Rachis].Dead, [Root].Dead]
        Memo
          The TotalDead composite biomass object includes the Dead pools of all organs (above+below ground) to allow output for total dry matter and Nutrient contents, including total structural, non-structural and metabolic pools.
      CompositeBiomass EarLive: Propertys=[[Husk].Live, [Grain].Live, [Rachis].Live]; DMDOfStructural=0.6
        Memo
          The EarLive composite biomass object includes the Live pools of all organs within the Ear to allow output for total dry matter and Nutrient contents, including total structural, non-structural and metabolic pools.
      CompositeBiomass AboveGroundLive: DMDOfStructural=0.6
        Propertys=[[Leaf].Live, [Stem].Live, [Husk].Live, [Grain].Live, [Rachis].Live]
        Memo
          The AboveGroundLive composite biomass object includes the Live pools of all organs occurring above the soil surface to allow output for total dry matter and Nutrient contents, including total structural, non-structural and metabolic pools.
      CompositeBiomass AboveGroundDead: DMDOfStructural=0.6
        Propertys=[[Leaf].Dead, [Stem].Dead, [Husk].Dead, [Grain].Dead, [Rachis].Dead]
        Memo
          The AboveGroundDead composite biomass object includes the Dead pools of all organs occurring above the soil surface to allow output for total dry matter and Nutrient contents, including total structural, non-structural and metabolic pools.
      Memo Future Development Needs
        #Future Development requirements

        * Phenology not responding to stress events.  Requires better data sets for quantifying the effects of water and nitrogen on leaf apperance and the timing of development stages.
        * Phosphorus response
        * Improved parameterisation of supply and demand for N and DM from organs and arbitration of these resources.
        * Heat Stress responses in grain number
        * More validation under a wider range of environments with more detailed datasets
        * Seedling mortality
        * Water demand (MicroClimate) needs validation
      CultivarFolder
        Cultivar Hycorn_53
          Command:
            [Phenology].Juvenile.Target.FixedValue = 190
            [Phenology].Photosensitive.Target.XYPairs.X = 0, 12.5, 24
            [Phenology].Photosensitive.Target.XYPairs.Y = 0, 0, 124
            [Phenology].FlagLeafToFlowering.Target.FixedValue = 10
            [Phenology].FloweringToGrainFilling.Target.FixedValue = 170
            [Phenology].GrainFilling.Target.FixedValue = 520
            [Rachis].DMDemands.Structural.DMDemandFunction.MaximumOrganWt.FixedValue = 25
            [Grain].MaximumGrainsPerCob.FixedValue =  550
        Cultivar Pioneer_33M54
          Command:
            [Phenology].GrainFilling.Target.FixedValue = 550
            [Phenology].Juvenile.Target.FixedValue = 270
        Cultivar Pioneer_38H20
          Command:
            [Phenology].Juvenile.Target.FixedValue = 210
            [Phenology].GrainFilling.Target.FixedValue = 550
        Cultivar Pioneer_34K77
          Command:
            [Phenology].Juvenile.Target.FixedValue = 280
            [Phenology].GrainFilling.Target.FixedValue = 550
          Memo
            VShort duration variety released in New Zealand by Pioneer
        Cultivar Pioneer_39V43
          Command:
            [Phenology].Juvenile.Target.FixedValue = 100
            [Phenology].GrainFilling.Target.FixedValue = 500
            [Phenology].FloweringToGrainFilling.Target.FixedValue = 170
            [Structure].Phyllochron.Phyllochron.Phyllochron.XYPairs.X = 1, 4, 4.2, 10.5, 11
            [Structure].Phyllochron.Phyllochron.Phyllochron.XYPairs.Y = 26, 26, 46, 46, 70
            [Rachis].DMDemands.Structural.DMDemandFunction.MaximumOrganWt.FixedValue = 18
            [Structure].HeightModel.PotentialHeight.XYPairs.X = 3, 4, 5, 6
            [Structure].HeightModel.PotentialHeight.XYPairs.Y = 20, 40, 50, 1300
          Memo
            VShort duration variety released in New Zealand by Pioneer
        Cultivar Atrium
          Command:
            [Phenology].Juvenile.Target.FixedValue = 150
            [Phenology].GrainFilling.Target.FixedValue = 500
            [Phenology].FloweringToGrainFilling.Target.FixedValue = 170
            [Structure].Phyllochron.Phyllochron.Phyllochron.XYPairs.X = 1, 4, 4.2, 10.5, 11
            [Structure].Phyllochron.Phyllochron.Phyllochron.XYPairs.Y = 26, 26, 46, 46, 70
            [Rachis].DMDemands.Structural.DMDemandFunction.MaximumOrganWt.FixedValue = 18
            [Structure].HeightModel.PotentialHeight.XYPairs.X = 3, 4, 5, 6
            [Structure].HeightModel.PotentialHeight.XYPairs.Y = 20, 40, 50, 2370
          Memo
            Maize variety used in trials at Wageningen University
        Cultivar Laila
          Command:
            [Phenology].Juvenile.Target.FixedValue = 211
            [Phenology].Photosensitive.Target.XYPairs.X = 0, 12.5, 24
            [Phenology].Photosensitive.Target.XYPairs.Y = 0, 0, 0
            [Phenology].FlagLeafToFlowering.Target.FixedValue = 1
            [Phenology].FloweringToGrainFilling.Target.FixedValue = 170
            [Phenology].GrainFilling.Target.FixedValue = 812
            [Phenology].Maturing.Target.FixedValue = 1
            [Phenology].MaturityToHarvestRipe.Target.FixedValue = 1
            [Rachis].DMDemands.Structural.DMDemandFunction.MaximumOrganWt.FixedValue = 36
            [Grain].MaximumGrainsPerCob.FixedValue =  720
        Cultivar GH_5019WX
          Command:
            [Phenology].Juvenile.Target.FixedValue = 225
            [Phenology].Photosensitive.Target.XYPairs.X = 0, 12.5, 24.0
            [Phenology].Photosensitive.Target.XYPairs.Y = 0, 0, 124
            [Phenology].FlagLeafToFlowering.Target.FixedValue = 101
            [Phenology].FloweringToGrainFilling.Target.FixedValue = 170
            [Phenology].GrainFilling.Target.FixedValue = 694
            [Rachis].DMDemands.Structural.DMDemandFunction.MaximumOrganWt.FixedValue = 25
            [Grain].MaximumGrainsPerCob.FixedValue = 550
        Cultivar Hycorn_40
          Command:
            [Phenology].Juvenile.Target.FixedValue = 190
            [Phenology].Photosensitive.Target.XYPairs.X = 0, 12.5, 24
            [Phenology].Photosensitive.Target.XYPairs.Y = 0, 0, 124
            [Phenology].FlagLeafToFlowering.Target.FixedValue = 50
            [Phenology].FloweringToGrainFilling.Target.FixedValue = 170
            [Phenology].GrainFilling.Target.FixedValue = 713
            [Rachis].DMDemands.Structural.DMDemandFunction.MaximumOrganWt.FixedValue = 25
            [Grain].MaximumGrainsPerCob.FixedValue =  550
        Cultivar GH_5009
          Command:
            [Phenology].Juvenile.Target.FixedValue = 190
            [Phenology].Photosensitive.Target.XYPairs.X = 0, 12.5, 24
            [Phenology].Photosensitive.Target.XYPairs.Y = 0, 0, 300
            [Phenology].FlagLeafToFlowering.Target.FixedValue = 50
            [Phenology].FloweringToGrainFilling.Target.FixedValue = 170
            [Phenology].GrainFilling.Target.FixedValue = 713
            [Rachis].DMDemands.Structural.DMDemandFunction.MaximumOrganWt.FixedValue = 25
            [Grain].MaximumGrainsPerCob.FixedValue =  550
        Cultivar Dekalb_XL82
          Command:
            [Phenology].Juvenile.Target.FixedValue = 211
            [Phenology].Photosensitive.Target.XYPairs.X = 0, 12.5, 24
            [Phenology].Photosensitive.Target.XYPairs.Y = 0, 0, 472
            [Phenology].FlagLeafToFlowering.Target.FixedValue = 101
            [Phenology].FloweringToGrainFilling.Target.FixedValue = 170
            [Phenology].GrainFilling.Target.FixedValue = 813
            [Rachis].DMDemands.Structural.DMDemandFunction.MaximumOrganWt.FixedValue = 25
            [Grain].MaximumGrainsPerCob.FixedValue = 550
        Cultivar malawi_local
          Command:
            [Phenology].Juvenile.Target.FixedValue = 280
            [Phenology].Photosensitive.Target.XYPairs.X = 0, 12.5, 24
            [Phenology].Photosensitive.Target.XYPairs.Y = 0, 0, 264.5
            [Phenology].FlagLeafToFlowering.Target.FixedValue = 10
            [Phenology].FloweringToGrainFilling.Target.FixedValue = 170
            [Phenology].GrainFilling.Target.FixedValue = 600
            [Rachis].DMDemands.Structural.DMDemandFunction.MaximumOrganWt.FixedValue = 14
            [Grain].MaximumGrainsPerCob.FixedValue = 360
            [Grain].MaximumPotentialGrainSize.FixedValue = 0.217
          Memo
            The variety malawi_local is a Malawian medium-late maturing local variety.  Photoperiod response is taken from Ellis et al Crop Sci 32:1225 for SR52.
        Cultivar mh19
          Command:
            [Phenology].Juvenile.Target.FixedValue = 290
            [Phenology].Photosensitive.Target.XYPairs.X = 0, 12.5, 24
            [Phenology].Photosensitive.Target.XYPairs.Y = 0, 0, 264.5
            [Phenology].FlagLeafToFlowering.Target.FixedValue = 10
            [Phenology].FloweringToGrainFilling.Target.FixedValue = 170
            [Phenology].GrainFilling.Target.FixedValue = 570
            [Rachis].DMDemands.Structural.DMDemandFunction.MaximumOrganWt.FixedValue = 14
            [Grain].MaximumGrainsPerCob.FixedValue = 504
            [Grain].MaximumPotentialGrainSize.FixedValue = 0.361
          Memo
            The variety mh19 is a Malawian medium-late maturing hybrid.  Photoperiod response is taken from Ellis et al Crop Sci 32:1225 for SR52.
        Cultivar mh17
          Command:
            [Phenology].Juvenile.Target.FixedValue = 290
            [Phenology].Photosensitive.Target.XYPairs.X = 0, 12.5, 24
            [Phenology].Photosensitive.Target.XYPairs.Y = 0, 0, 264.5
            [Phenology].FlagLeafToFlowering.Target.FixedValue = 10
            [Phenology].FloweringToGrainFilling.Target.FixedValue = 170
            [Phenology].GrainFilling.Target.FixedValue = 570
            [Rachis].DMDemands.Structural.DMDemandFunction.MaximumOrganWt.FixedValue = 14
            [Grain].MaximumGrainsPerCob.FixedValue = 504
            [Grain].MaximumPotentialGrainSize.FixedValue = 0.361
          Memo
            The variety mh17 is a Malawian medium-late maturing hybrid.  Photoperiod response is taken from Ellis et al Crop Sci 32:1225 for SR52.
        Cultivar mh16
          Command:
            [Phenology].Juvenile.Target.FixedValue = 290
            [Phenology].Photosensitive.Target.XYPairs.X = 0, 12.5, 24
            [Phenology].Photosensitive.Target.XYPairs.Y = 0, 0, 264.5
            [Phenology].FlagLeafToFlowering.Target.FixedValue = 10
            [Phenology].FloweringToGrainFilling.Target.FixedValue = 170
            [Phenology].GrainFilling.Target.FixedValue = 570
            [Rachis].DMDemands.Structural.DMDemandFunction.MaximumOrganWt.FixedValue = 14
            [Grain].MaximumGrainsPerCob.FixedValue = 504
            [Grain].MaximumPotentialGrainSize.FixedValue = 0.361
          Memo
            The variety mh16 is a Malawian medium-late maturing hybrid.  Photoperiod response is taken from Ellis et al Crop Sci 32:1225 for SR52.
        Cultivar mh12
          Command:
            [Phenology].Juvenile.Target.FixedValue = 290
            [Phenology].Photosensitive.Target.XYPairs.X = 0, 12.5, 24
            [Phenology].Photosensitive.Target.XYPairs.Y = 0, 0, 264.5
            [Phenology].FlagLeafToFlowering.Target.FixedValue = 10
            [Phenology].FloweringToGrainFilling.Target.FixedValue = 170
            [Phenology].GrainFilling.Target.FixedValue = 570
            [Rachis].DMDemands.Structural.DMDemandFunction.MaximumOrganWt.FixedValue = 14
            [Grain].MaximumGrainsPerCob.FixedValue = 504
            [Grain].MaximumPotentialGrainSize.FixedValue = 0.361
          Memo
            The variety mh12 is a Malawian medium-late maturing hybrid.  Photoperiod response is taken from Ellis et al Crop Sci 32:1225 for SR52.
        Cultivar sc623
          Command:
            [Phenology].Juvenile.Target.FixedValue = 280
            [Phenology].Photosensitive.Target.XYPairs.X = 0, 12.5, 24
            [Phenology].Photosensitive.Target.XYPairs.Y = 0, 0, 264.5
            [Phenology].FlagLeafToFlowering.Target.FixedValue = 10
            [Phenology].FloweringToGrainFilling.Target.FixedValue = 170
            [Phenology].GrainFilling.Target.FixedValue = 550
            [Rachis].DMDemands.Structural.DMDemandFunction.MaximumOrganWt.FixedValue = 14
            [Grain].MaximumGrainsPerCob.FixedValue = 504
            [Grain].MaximumPotentialGrainSize.FixedValue = 0.361
          Memo
            The variety sc623 is a Zimbabwean medium-late maturing hybrid.  Photoperiod response is taken from Ellis et al Crop Sci 32:1225 for SR52.
        Cultivar sc625
          Command:
            [Phenology].Juvenile.Target.FixedValue = 280
            [Phenology].Photosensitive.Target.XYPairs.X = 0, 12.5, 24
            [Phenology].Photosensitive.Target.XYPairs.Y = 0, 0, 264.5
            [Phenology].FlagLeafToFlowering.Target.FixedValue = 10
            [Phenology].FloweringToGrainFilling.Target.FixedValue = 170
            [Phenology].GrainFilling.Target.FixedValue = 570
            [Rachis].DMDemands.Structural.DMDemandFunction.MaximumOrganWt.FixedValue = 14
            [Grain].MaximumGrainsPerCob.FixedValue = 504
            [Grain].MaximumPotentialGrainSize.FixedValue = 0.361
          Memo
            The variety sc625 is a Zimbabwean medium-late maturing hybrid.  Photoperiod response is taken from Ellis et al Crop Sci 32:1225 for SR52.
        Cultivar sc601
          Command:
            [Phenology].Juvenile.Target.FixedValue = 280
            [Phenology].Photosensitive.Target.XYPairs.X = 0, 12.5, 24
            [Phenology].Photosensitive.Target.XYPairs.Y = 0, 0, 264.5
            [Phenology].FlagLeafToFlowering.Target.FixedValue = 10
            [Phenology].FloweringToGrainFilling.Target.FixedValue = 170
            [Phenology].GrainFilling.Target.FixedValue = 560
            [Rachis].DMDemands.Structural.DMDemandFunction.MaximumOrganWt.FixedValue = 14
            [Grain].MaximumGrainsPerCob.FixedValue = 495
            [Grain].MaximumPotentialGrainSize.FixedValue = 0.361
          Memo
            The variety sc601 is a Zimbabwean medium-late maturing hybrid.  Photoperiod response is taken from Ellis et al Crop Sci 32:1225 for SR52.
        Cultivar CG4141
          Command:
            [Phenology].Juvenile.Target.FixedValue = 233
            [Phenology].Photosensitive.Target.XYPairs.X = 0, 12.5, 24
            [Phenology].Photosensitive.Target.XYPairs.Y = 0, 0, 264.5
            [Phenology].FlagLeafToFlowering.Target.FixedValue = 10
            [Phenology].FloweringToGrainFilling.Target.FixedValue = 170
            [Phenology].GrainFilling.Target.FixedValue = 550
            [Rachis].DMDemands.Structural.DMDemandFunction.MaximumOrganWt.FixedValue = 14
            [Grain].MaximumGrainsPerCob.FixedValue = 468
            [Grain].MaximumPotentialGrainSize.FixedValue = 0.361
          Memo
            The variety CG4141 is a Zimbabwean early-medium maturing hybrid.  Photoperiod response is taken from Ellis et al Crop Sci 32:1225 for SR52.
        Cultivar mh18
          Command:
            [Phenology].Juvenile.Target.FixedValue = 260
            [Phenology].Photosensitive.Target.XYPairs.X = 0, 12.5, 24
            [Phenology].Photosensitive.Target.XYPairs.Y = 0, 0, 264.5
            [Phenology].FlagLeafToFlowering.Target.FixedValue = 10
            [Phenology].FloweringToGrainFilling.Target.FixedValue = 170
            [Phenology].GrainFilling.Target.FixedValue = 550
            [Rachis].DMDemands.Structural.DMDemandFunction.MaximumOrganWt.FixedValue = 14
            [Grain].MaximumGrainsPerCob.FixedValue = 486
            [Grain].MaximumPotentialGrainSize.FixedValue = 0.361
          Memo
            The variety mh18 is a Zimbabwean early-medium maturing hybrid.  Photoperiod response is taken from Ellis et al Crop Sci 32:1225 for SR52.
        Cultivar r215
          Command:
            [Phenology].Juvenile.Target.FixedValue = 250
            [Phenology].Photosensitive.Target.XYPairs.X = 0, 12.5, 24
            [Phenology].Photosensitive.Target.XYPairs.Y = 0, 0, 264.5
            [Phenology].FlagLeafToFlowering.Target.FixedValue = 10
            [Phenology].FloweringToGrainFilling.Target.FixedValue = 170
            [Phenology].GrainFilling.Target.FixedValue = 550
            [Rachis].DMDemands.Structural.DMDemandFunction.MaximumOrganWt.FixedValue = 14
            [Grain].MaximumGrainsPerCob.FixedValue = 468
            [Grain].MaximumPotentialGrainSize.FixedValue = 0.361
          Memo
            The variety r215 is a Zimbabwean early-medium maturing hybrid.  Photoperiod response is taken from Ellis et al Crop Sci 32:1225 for SR52.
        Cultivar Melkassa
          Command:
            [Phenology].Juvenile.Target.FixedValue = 230
            [Phenology].Photosensitive.Target.XYPairs.X = 0, 12.5, 24
            [Phenology].Photosensitive.Target.XYPairs.Y = 0, 0, 264.5
            [Phenology].FlagLeafToFlowering.Target.FixedValue = 10
            [Phenology].FloweringToGrainFilling.Target.FixedValue = 160
            [Phenology].GrainFilling.Target.FixedValue = 550
            [Rachis].DMDemands.Structural.DMDemandFunction.MaximumOrganWt.FixedValue = 14
            [Grain].MaximumGrainsPerCob.FixedValue = 387
            [Grain].MaximumPotentialGrainSize.FixedValue = 0.33
          Memo
            The variety Melkassa is a local early-medium maturing Ethiopian variety.
        Cultivar sr52
          Command:
            [Phenology].Juvenile.Target.FixedValue = 250
            [Phenology].Photosensitive.Target.XYPairs.X = 0, 12.5, 24
            [Phenology].Photosensitive.Target.XYPairs.Y = 0, 0, 264.5
            [Phenology].FlagLeafToFlowering.Target.FixedValue = 10
            [Phenology].FloweringToGrainFilling.Target.FixedValue = 170
            [Phenology].GrainFilling.Target.FixedValue = 550
            [Rachis].DMDemands.Structural.DMDemandFunction.MaximumOrganWt.FixedValue = 14
            [Grain].MaximumGrainsPerCob.FixedValue = 468
            [Grain].MaximumPotentialGrainSize.FixedValue = 0.361
          Memo
            The variety sr52 is a Zimbabwean early-medium maturing hybrid.  Photoperiod response is taken from Ellis et al Crop Sci 32:1225 for SR52.
        Cultivar sc501
          Command:
            [Phenology].Juvenile.Target.FixedValue = 250
            [Phenology].Photosensitive.Target.XYPairs.X = 0, 12.5, 24
            [Phenology].Photosensitive.Target.XYPairs.Y = 0, 0, 264.5
            [Phenology].FlagLeafToFlowering.Target.FixedValue = 10
            [Phenology].FloweringToGrainFilling.Target.FixedValue = 170
            [Phenology].GrainFilling.Target.FixedValue = 550
            [Rachis].DMDemands.Structural.DMDemandFunction.MaximumOrganWt.FixedValue = 14
            [Grain].MaximumGrainsPerCob.FixedValue = 468
            [Grain].MaximumPotentialGrainSize.FixedValue = 0.361
          Memo
            The variety sc501 is a Zimbabwean early-medium maturing hybrid.  Photoperiod response is taken from Ellis et al Crop Sci 32:1225 for SR52.
        Cultivar r201
          Command:
            [Phenology].Juvenile.Target.FixedValue = 230
            [Phenology].Photosensitive.Target.XYPairs.X = 0, 12.5, 24
            [Phenology].Photosensitive.Target.XYPairs.Y = 0, 0, 264.5
            [Phenology].FlagLeafToFlowering.Target.FixedValue = 10
            [Phenology].FloweringToGrainFilling.Target.FixedValue = 170
            [Phenology].GrainFilling.Target.FixedValue = 550
            [Rachis].DMDemands.Structural.DMDemandFunction.MaximumOrganWt.FixedValue = 14
            [Grain].MaximumGrainsPerCob.FixedValue = 450
            [Grain].MaximumPotentialGrainSize.FixedValue = 0.375
          Memo
            The variety r201 is a Zimbabwean early maturing hybrid.  Photoperiod response is taken from Ellis et al Crop Sci 32:1225 for SR52.
        Cultivar sc401
          Command:
            [Phenology].Juvenile.Target.FixedValue = 230
            [Phenology].Photosensitive.Target.XYPairs.X = 0, 12.5, 24
            [Phenology].Photosensitive.Target.XYPairs.Y = 0, 0, 264.5
            [Phenology].FlagLeafToFlowering.Target.FixedValue = 10
            [Phenology].FloweringToGrainFilling.Target.FixedValue = 170
            [Phenology].GrainFilling.Target.FixedValue = 550
            [Rachis].DMDemands.Structural.DMDemandFunction.MaximumOrganWt.FixedValue = 14
            [Grain].MaximumGrainsPerCob.FixedValue = 450
            [Grain].MaximumPotentialGrainSize.FixedValue = 0.375
          Memo
            The variety NSCM_41 is a Zimbabwean early maturing hybrid.  Photoperiod response is taken from Ellis et al Crop Sci 32:1225 for SR52.
        Cultivar NSCM_41: same as Replacements.Maize.CultivarFolder.sc401
        Cultivar Makueni
          Command:
            [Phenology].Juvenile.Target.FixedValue = 150
            [Phenology].Photosensitive.Target.XYPairs.X = 0, 12.5, 24
            [Phenology].Photosensitive.Target.XYPairs.Y = 0, 0, 115
            [Phenology].FlagLeafToFlowering.Target.FixedValue = 10
            [Phenology].FloweringToGrainFilling.Target.FixedValue = 120
            [Phenology].GrainFilling.Target.FixedValue = 530
            [Rachis].DMDemands.Structural.DMDemandFunction.MaximumOrganWt.FixedValue = 14
            [Grain].MaximumGrainsPerCob.FixedValue = 432
            [Grain].MaximumPotentialGrainSize.FixedValue = 0.375
          Memo
            The variety Makueni Composite is a kenyan variety with similar phenology but slightly higher cob size than Katumani composite.
        Cultivar Katumani
          Command:
            [Phenology].Juvenile.Target.FixedValue = 150
            [Phenology].Photosensitive.Target.XYPairs.X = 0, 12.5, 24
            [Phenology].Photosensitive.Target.XYPairs.Y = 0, 0, 115
            [Phenology].FlagLeafToFlowering.Target.FixedValue = 10
            [Phenology].FloweringToGrainFilling.Target.FixedValue = 120
            [Phenology].GrainFilling.Target.FixedValue = 530
            [Rachis].DMDemands.Structural.DMDemandFunction.MaximumOrganWt.FixedValue = 14
            [Grain].MaximumGrainsPerCob.FixedValue = 405
            [Grain].MaximumPotentialGrainSize.FixedValue = 0.375
          Memo
            The variety Katumani Composite B was formed in 1966 and released in 1968 as part of the maize breeding work undertaken at the Katumani Research Station in Kenya which started in 1956.  Katumani Composite B was an advanced generation of Katumani Synthetic V X Katumani Synthetic VI.  It has slight photoperiod sensitivity and relatively small potential cob size.
        Cultivar Pioneer_3153
        Cultivar Pioneer_39G12
          Command:
            [Phenology].Juvenile.Target.FixedValue = 180
            [Phenology].GrainFilling.Target.FixedValue = 500
            [Grain].MaximumGrainsPerCob.FixedValue = 550
            [Grain].NumberFunction.GrowthRateFactor.XYPairs.X = 0.2,2,4,10
            [Grain].NumberFunction.GrowthRateFactor.XYPairs.Y = 0,0.6,1,1
            [Grain].MaximumPotentialGrainSize.FixedValue = 0.25
      CompositeBiomass Spike: Propertys=[[Husk].Live, [Rachis].Live]; DMDOfStructural=0.6
        Memo
          The SpikeLive composite biomass object includes the Live pools of then non-grain organs within the reproductive spike to allow output for total dry matter and Nutrient contents, including total structural, non-structural and metabolic pools.
      Constant MortalityRate: FixedValue=0
  Simulation SimulationSoybean
    Clock: Start=2010-01-01; End=2017-12-31
    Summary SummaryFile
    Weather: FileName=Ames.met
    SoilArbitrator Soil Arbitrator
    Zone field: Area=1; Slope=0; AspectAngle=0; Altitude=50
      Report: EventNames=[Clock].EndOfDay
        VariableNames:
          [Clock].Today
          [Soybean].Total.Wt
          [Soybean].AboveGround.Wt
          [Soybean].Leaf.LAI
          [Soybean].Grain.Wt
          [Soybean].Grain.Nconc
          [Soybean].Grain.Number
      Fertiliser
      Soil: SoilType=Nicollet; LocalName=SoilAmesCorn; NearestTown=Ames; Region=Boone; State=Iowa; Country=US; ApsoilNumber=34; Latitude=42.02204; Longitude=-93.769115; DataSource=mesured data and web soil survey; Comments=hydrological parameters and BD from Saxton and Rawls, 2006
        Physical
          Thickness  BD    AirDry  LL15   DUL    SAT    KS
          25         1.25  0.135   0.174  0.31   0.49   151
          25         1.25  0.135   0.174  0.31   0.49   128
          50         1.25  0.15    0.174  0.3    0.47   239
          100        1.25  0.165   0.165  0.25   0.48   158
          100        1.25  0.12    0.12   0.22   0.39   144
          150        1.35  0.11    0.11   0.21   0.39   115
          150        1.35  0.102   0.102  0.22   0.39   103
          150        1.36  0.126   0.126  0.265  0.39   182
          150        1.36  0.133   0.133  0.261  0.39   168
          150        1.36  0.128   0.128  0.253  0.39   159
          150        1.4   0.128   0.128  0.2    0.38   2
          300        1.4   0.09    0.09   0.28   0.332  2
          300        1.4   0.09    0.09   0.18   0.242  2
          300        1.4   0.09    0.09   0.2    0.256  2
          400        1.4   0.09    0.09   0.191  0.234  2
          SoilCrop SoybeanSoil
            LL=[0.174, 0.174, 0.174, 0.165, 0.12, 0.11, 0.102, 0.126, 0.133, 0.128, 0.128, 0.09, 0.09, 0.09, 0.09]
            KL=[0.08, 0.08, 0.08, 0.08, 0.08, 0.08, 0.07, 0.06, 0.06, 0.04, 0.01, 0.01, 0.01, 0, 0]
            XF=[1, 1, 1, 1, 1, 1, 1, 1, 1, 1, 1, 1, 0.5, 0, 0]
        Organic: FOMCNRatio=46
          Thickness  Carbon  SoilCNRatio  FBiom  FInert  FOM
          25         2.43    12.5         0.191  0.4     483.114
          25         2.34    12.5         0.164  0.4     468.836
          50         2.44    12.5         0.162  0.4     441.533
          100        2.37    12.5         0.055  0.441   391.605
          100        1.98    12.5         0.017  0.52    347.322
          150        1.95    12.5         0.018  0.619   290.108
          150        0.97    12.5         0.034  0.738   242.318
          150        0.98    12.5         0.04   0.802   202.401
          150        0.49    12.5         0.061  0.797   169.06
          150        0.49    12.5         0.053  0.798   141.211
          150        0.49    12.5         0.011  0.808   117.949
          300        0.49    12.5         0.01   0.857   82.2903
          300        0.49    12.5         0.012  0.95    57.412
          300        0.49    12.5         0.016  0.99    40.055
          400        0.49    12.5         0.01   0.99    24.7854
        Chemical
          Thickness  NO3N       NH4N       PH
          25         4.7        8.8        7.48
          25         5          14.7       7.48
          50         3.5        2.9        7.48
          100        4.4        3.7        7.38
          100        5.1        2.19       7.43
          150        3.9        1.35       7.43
          150        2.9        0.84       7.73
          150        1.7        0.735294   7.73
          150        0.539216   0.735294   8.08
          150        0.441176   0.0490196  8.08
          150        0.380952   0.0952381  8.08
          300        0.261905   0.0714286  8.08
          300        0.119048   0.0952381  8.08
          300        0.0952381  0          8.08
          400        0          0          8.08
        Sample Initial nitrogen: SWUnits=Volumetric; OCUnits=Total; PHUnits=Water
          Thickness=[25, 25, 50, 100, 100, 150, 150, 150, 150, 150, 150, 300, 300, 300, 400]
          SW=[0.31, 0.31, 0.32, 0.25, 0.327, 0.304, 0.298, 0.285, 0.384, 0.335, 0.37, 0.332, 0.242, 0.256, 0.234]
        WaterBalance SoilWater: SummerDate=1-Nov; SummerU=6; SummerCona=3.5; WinterDate=1-Apr; WinterU=6; WinterCona=3.5; DiffusConst=88; DiffusSlope=35.4; Salb=0.2; CN2Bare=85; CNRed=20; CNCov=0.8; DischargeWidth=0; CatchmentArea=0; Thickness=[150, 150, 150, 150, 150, 150, 300, 300, 1000]; SWCON=[0.7, 0.7, 0.7, 0.7, 0.7, 0.7, 0.2, 0.2, 0.2]
        CERESSoilTemperature Temperature
        Nutrient
      SurfaceOrganicMatter: InitialResidueName=wheat_stubble; InitialResidueType=wheat; InitialResidueMass=500; InitialStandingFraction=0; InitialCPR=0; InitialCNR=100
      Plant Soybean
      MicroClimate: a_interception=0; b_interception=1; c_interception=0; d_interception=0; soil_albedo=0.3; SoilHeatFluxFraction=0.4; MinimumHeightDiffForNewLayer=0; NightInterceptionFraction=0.5; ReferenceHeight=2
      Manager SowingRule
        StartDate = 1-may
        EndDate = 1-may
        MinESW = 10
        MinRain = 2
        RainDays = 7
        CultivarName = PioneerP22T61_MG22
        SowingDepth = 30
        RowSpacing = 750
        Population = 30
```csharp
using Models.Interfaces;
using APSIM.Shared.Utilities;
using Models.Utilities;
using Models.Soils;
using Models.PMF;
using Models.Core;
using System;
using Models.Climate;

namespace Models
{
    [Serializable]
    public class Script : Model
    {
        [Link] private Clock Clock;
        [Link] private Fertiliser Fertiliser;
        [Link] private Summary Summary;
        [Link] private Plant Maize;
        [Link] private Soil Soil;
        private Accumulator accumulatedRain;
        [Link]
        private ISoilWater waterBalance;
        
        [Description("Start of sowing window (d-mmm)")]
        public string StartDate { get; set; }
        [Description("End of sowing window (d-mmm)")]
        public string EndDate { get; set; }
        [Description("Minimum extractable soil water for sowing (mm)")]
        public double MinESW { get; set; }
        [Description("Accumulated rainfall required for sowing (mm)")]
        public double MinRain { get; set; }
        [Description("Duration of rainfall accumulation (d)")]
        public int RainDays { get; set; }
        [Description("Cultivar to be sown")]
        public string CultivarName { get; set; }
        [Description("Sowing depth (mm)")]
        public double SowingDepth { get; set; }
        [Description("Row spacing (mm)")]
        public double RowSpacing { get; set; }
        [Description("Plant population (/m2)")]
        public double Population { get; set; }
        
        
        [EventSubscribe("StartOfSimulation")]
        private void OnSimulationCommencing(object sender, EventArgs e)
        {
            accumulatedRain = new Accumulator(this, "[Weather].Rain", RainDays);
        }
        

        [EventSubscribe("DoManagement")]
        private void OnDoManagement(object sender, EventArgs e)
        {
            accumulatedRain.Update();
            
            if (DateUtilities.WithinDates(StartDate, Clock.Today, EndDate) &&
                !Maize.IsAlive &&
                MathUtilities.Sum(waterBalance.ESW) > MinESW &&
                accumulatedRain.Sum > MinRain)
            {
                Maize.Sow(population: Population, cultivar: CultivarName, depth: SowingDepth, rowSpacing: RowSpacing);    
            }
        
        }
        
    }
}
```
      Manager Harvesting
        Crop = [Soybean]
```csharp
using APSIM.Shared.Utilities;
using Models.Utilities;
using Models.Soils;
using Models.PMF;
using Models.Core;
using System;

namespace Models
{
    [Serializable] 
    public class Script : Model
    {
        [Description("Crop")]
        public IPlant Crop { get; set; }
        
        [EventSubscribe("DoManagement")]
        private void OnDoManagement(object sender, EventArgs e)
        {
            if (Crop.IsReadyForHarvesting)
            {
                Crop.Harvest();
                Crop.EndCrop();
            }
        }
    }
}
```
  Simulation SimulationMaize
    Clock: Start=2010-01-01; End=2017-12-31
    Summary SummaryFile
    Weather: FileName=Ames.met
    SoilArbitrator Soil Arbitrator
    Zone field: Area=1; Slope=0; AspectAngle=0; Altitude=50
      Report: EventNames=[Clock].EndOfDay
        VariableNames:
          [Clock].Today
          [Maize].Total.Wt
      Fertiliser
      Soil: SoilType=Nicollet; LocalName=SoilAmesCorn; NearestTown=Ames; Region=Boone; State=Iowa; Country=US; ApsoilNumber=34; Latitude=42.02204; Longitude=-93.769115; DataSource=mesured data and web soil survey; Comments=hydrological parameters and BD from Saxton and Rawls, 2006
        Physical
          Thickness  BD    AirDry  LL15   DUL    SAT    KS
          25         1.25  0.135   0.174  0.31   0.49   151
          25         1.25  0.135   0.174  0.31   0.49   128
          50         1.25  0.15    0.174  0.3    0.47   239
          100        1.25  0.165   0.165  0.25   0.48   158
          100        1.25  0.12    0.12   0.22   0.39   144
          150        1.35  0.11    0.11   0.21   0.39   115
          150        1.35  0.102   0.102  0.22   0.39   103
          150        1.36  0.126   0.126  0.265  0.39   182
          150        1.36  0.133   0.133  0.261  0.39   168
          150        1.36  0.128   0.128  0.253  0.39   159
          150        1.4   0.128   0.128  0.2    0.38   2
          300        1.4   0.09    0.09   0.28   0.332  2
          300        1.4   0.09    0.09   0.18   0.242  2
          300        1.4   0.09    0.09   0.2    0.256  2
          400        1.4   0.09    0.09   0.191  0.234  2
          SoilCrop MaizeSoil
            LL=[0.174, 0.174, 0.174, 0.165, 0.12, 0.11, 0.102, 0.126, 0.133, 0.128, 0.128, 0.09, 0.09, 0.09, 0.09]
            KL=[0.08, 0.08, 0.08, 0.08, 0.08, 0.08, 0.07, 0.06, 0.06, 0.04, 0.01, 0.01, 0.01, 0, 0]
            XF=[1, 1, 1, 1, 1, 1, 1, 1, 1, 1, 1, 1, 0.5, 0, 0]
        Organic: same as SimulationSoybean.field.Soil.Organic
        Chemical: same as SimulationSoybean.field.Soil.Chemical
        Sample Initial nitrogen: same as SimulationSoybean.field.Soil.Initial nitrogen
        WaterBalance SoilWater: same as SimulationSoybean.field.Soil.SoilWater
        CERESSoilTemperature Temperature
        Nutrient
      SurfaceOrganicMatter: InitialResidueName=wheat_stubble; InitialResidueType=wheat; InitialResidueMass=500; InitialStandingFraction=0; InitialCPR=0; InitialCNR=100
      MicroClimate: a_interception=0; b_interception=1; c_interception=0; d_interception=0; soil_albedo=0.3; SoilHeatFluxFraction=0.4; MinimumHeightDiffForNewLayer=0; NightInterceptionFraction=0.5; ReferenceHeight=2
      Plant Maize
      Manager SowingRule
        StartDate = 1-may
        EndDate = 1-may
        MinESW = 10
        MinRain = 2
        RainDays = 7
        CultivarName = Laila
        SowingDepth = 30
        RowSpacing = 750
        Population = 8
        script: same as in SimulationSoybean.field.SowingRule
      Manager Harvesting
        Crop = [Maize]
        script: same as in SimulationSoybean.field.Harvesting
      Manager Fertilise on fixed dates
        FertiliserType = NO3N
        FertiliserDates = 15-may
        Amount = 160
        AmountType = False
```csharp
using APSIM.Shared.Utilities;
using Models.PMF;
using Models.Core;
using System;
namespace Models
{
    [Serializable]
    public class Script : Model
    {
        [Link] Clock Clock;
        [Link] Fertiliser Fertiliser;
        
        [Separator("A component to apply fertiliser on one or more dates on every year of the simulation")]

        [Description("Type of fertiliser to apply? ")] public Fertiliser.Types FertiliserType { get; set; }

        [Description("Enter the fertilisation dates as dd-mmm with comma separation (any year information entered will be ignored): ")] public string[] FertiliserDates { get; set; } 

        [Description("Amount of fertiliser to be applied (kg /ha)")] public double Amount { get; set; }

        [Description("Is the above amount to be applied each time? (yes/ticked)? Or is it the total annual amount across all dates (no/unticked)")] public bool AmountType { get; set; }
        
        [EventSubscribe("DoManagement")]
        private void OnDoManagement(object sender, EventArgs e)
        {
            foreach (string ddMMM in FertiliserDates)
            {
                if (DateUtilities.DatesEqual(ddMMM, Clock.Today))
                {
                    if (AmountType)
                        Fertiliser.Apply(Amount: Amount, Type: FertiliserType);
                    else
                        Fertiliser.Apply(Amount: Amount / FertiliserDates.Length, Type: FertiliserType);
                }
            }
        }
    }
}
```
      Manager Fertilise at sowing
        Crop =
        FertiliserType = UreaN
        Amount = 160
```csharp
using Models.PMF;
using Models.Core;
using System;
namespace Models
{
    [Serializable]
    public class Script : Model
    {
        [Link] Clock Clock;
        [Link] Fertiliser Fertiliser;
        
        [Description("Crop to be fertilised")]
        public IPlant Crop { get; set; }

        [Description("Type of fertiliser to apply? ")] public Fertiliser.Types FertiliserType { get; set; }

    
        [Description("Amount of fertiliser to be applied (kg/ha)")]
        public double Amount { get; set; }
        
        [EventSubscribe("Sowing")]
        private void OnSowing(object sender, EventArgs e)
        {
            Model crop = sender as Model;
            if (Crop != null && crop.Name.ToLower() == (Crop as IModel).Name.ToLower())
                Fertiliser.Apply(Amount: Amount, Type: FertiliserType);
        }
        
    }
}
```
  DataStore
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