Simulations: Version=137
  Replacements
    Plant Wheat: PlantType=Wheat; IsAlive=false; IsEnding=false; DaysAfterEnding=0
      Memo TitlePage
        # The APSIM Wheat Model

        _Brown, H.E., Huth, N.I. and Holzworth, D.P._

        The APSIM wheat model has been developed using the Plant Modelling Framework (PMF) of [brown_plant_2014]. This new framework provides a library of plant organ and process submodels that can be coupled, at runtime, to construct a model in much the same way that models can be coupled to construct a simulation. This means that dynamic composition of lower level process and organ classes (e.g. photosynthesis, leaf) into larger constructions (e.g. maize, wheat, sorghum) can be achieved by the model developer without additional coding.

        The model consists of:

        * a phenology model to simulate development between developmental phases
        * a structure model to simulate plant morphology
        * a collection of organs to simulate the various plant parts
        * an arbitrator to allocate resources (N, biomass) to the various plant organs
      OrganArbitrator Arbitrator
        BiomassTypeArbitrator DMArbitration
          Folder PotentialPartitioningMethods
            ReallocationMethod
            AllocateFixationMethod
            RetranslocationMethod
            SendPotentialDMAllocationsMethod
          Folder AllocationMethods
            NutrientConstrainedAllocationMethod
            DryMatterAllocationsMethod
          RelativeAllocation ArbitrationMethod
        BiomassTypeArbitrator NArbitration
          Folder PotentialPartitioningMethods
            ReallocationMethod
          Folder ActualPartitioningMethods
            AllocateFixationMethod
            RetranslocationMethod
          Folder AllocationMethods
            NitrogenAllocationsMethod
          RelativeAllocation ArbitrationMethod
          AllocateUptakesMethod
        WaterUptakeMethod
        NitrogenUptakeMethod
      Phenology
        Memo
          Wheat exhibits a range of developmental responses to environment and these are strongly influences by genotype characteristics.
          Temperature effects development increasing development rates and decreasing phase durations as temperatures increase.  Theset affects are captured by thermal time, .  However, wheat also exhibits vernalisation and photoperiod sensitivities in its Vegetative phase and further photoperiod sensitivity in the EarlyReproducivePhase.  Photoperiod responses are seen as a reduction in the length of a phase for a photoperiod sensitive genotype in response to a longer photoperiod.  Vernalisation responses are more complicated as they are driven by temperature but interact with photoperiod.  For vernalisation sensitive varieties (Winter types) exposure to cool temperatures or short photoperiods during the Vegetative phase will reduce the thermal time duration of the vegetative phase.

          We draw on the Kirby Framework to capture these vernalisation and photoperiod responses.  This framework assumes that the timing of anthesis is a result of the timing of flag leaf and an additional thermal time passage from there to anthesis.  It also assumes the timing of flag leaf is a result of the Final Leaf Number which sets a target, and leaf appearance rate, which sets the rate of progress toward this target.  Leaf appearance rate is a function of Thermal time and a genotype specific Phyllochron which changes with Haun stage as described by [Jamieson_LeafAppearance_1995].

          Final Leaf Number (FLN) is modeled as the sum of three numbers:

          FLN = MinLeafNumber + VernalLeaves + PhotoLeaves

          Where MinLeafNumber is the number of leaves that a wheat crop will produce when vernalisation is satisified early in the crops duration (before 2nd true leaf) and it is grown in a long photoperiod..  VernalLeaves are the number of leaves that are added due to vernalisation effects.  For insensitive varieties this will always be zero but this is potentially a larger number for sensitivie varieties and the number progresively decreases as the crop encounters more vernalisation.  PhotoLeaves are the number of leaves that are added to the minimum leaf number as a result of short day exposure.  For insensitive varieties this will be zero but is potential larger for more sensitivie varieties and decreases as day length increases.  More detailed explinations of the components of phenology are provided below.
        HourlyInterpolation ThermalTime: agregationMethod=0
          XYPairs Response: X=[0, 26, 37]; Y=[0, 26, 0]
          Memo
            Thermal time determines the rate of developmental progress through many of the crops phases and is used by organs to determing potential growth rates.
          ThreeHourSin InterpolationMethod
        MultiplyFunction DailyVernalisation
          Memo
            Vernalisation responses are based on those described by [Brown_Anthesis_2013].   Vernalisation is assumed to be related to the expression of the Vrn1 Gene.  Its experssion is accumulated daily and daily upregulation as a function of development (DeltaHaunStage) and a TempResponseProfile that declines exponentially from a maximum at 1^o^C to zero at 0^o^C and at 18^o^C.
          VariableReference DeltaHaunStage: VariableName=[Phenology].HaunStage.Delta
          HourlyInterpolation TempResponseProfile: agregationMethod=0
            XYPairs Response
              X=[0, 1, 2, 3, 4, 5, 6, 7, 8, 9, 10, 11, 12, 13, 14, 15, 16, 17, 18, 19, 20, 30, 32]
              Y=[0, 1.205, 1.037, 0.893, 0.768, 0.661, 0.569, 0.49, 0.422, 0.363, 0.312, 0.269, 0.231, 0.199, 0.171, 0.148, 0.127, 0.109, 0.094, 0.081, 0, 0, -0.5]
            ThreeHourSin InterpolationMethod
        PhotoperiodFunction Photoperiod: Twilight=-6; DayLength=0
        PhaseLookup PerceivedPhotoPeriod
          PhaseLookupValue ApexBelowGround: Start=Germination; End=Emergence
            Constant Photoperiod: FixedValue=0; Units=h
          PhaseLookupValue ApexAboveGround: Start=Emergence; End=HarvestRipe
            VariableReference Photoperiod: VariableName=[Phenology].Photoperiod
        MinimumFunction Vrn1
          Memo
            Vrn1 accumulation begins when Vrn4 experssion is down regulated to zero and stops, assuming vernalisation saturation, at a value of 1
          Constant Saturation: FixedValue=1; Units=Relative Experssion
          AccumulateFunction CurrentExpression: StartStageName=Germination; EndStageName=TerminalSpikelet; FractionRemovedOnCut=0; FractionRemovedOnHarvest=0; FractionRemovedOnGraze=0; FractionRemovedOnPrune=0
            LessThanFunction Vernalisation
              VariableReference If_Vrn4: VariableName=[Phenology].Vrn4
              VariableReference IsLessThanLag: VariableName=[Phenology].VernLag
              Constant Return_Zero: FixedValue=0
              VariableReference elseReturn_Vernalisation: VariableName=[Phenology].DailyVernalisation
        MinimumFunction Vrn4
          VariableReference MaxExpression: VariableName=[Phenology].VernLag
          AccumulateFunction CurrentExpression: StartStageName=Germination; EndStageName=TerminalSpikelet; FractionRemovedOnCut=0; FractionRemovedOnHarvest=0; FractionRemovedOnGraze=0; FractionRemovedOnPrune=0
            VariableReference VernalisationConditioning: VariableName=[Phenology].DailyVernalisation
        Constant MinimumLeafNumber: FixedValue=7; Units=Leaves
          Memo
            Number of leaves the plant will produce when fully vernalised early and grown in long photoperiod
        AccumulateFunction HaunStage: StartStageName=Emergence; EndStageName=FlagLeaf; FractionRemovedOnCut=0; FractionRemovedOnHarvest=0; FractionRemovedOnGraze=0; FractionRemovedOnPrune=0
          PhaseLookup Delta
            PhaseLookupValue Growing: Start=Germination; End=HarvestRipe
              DivideFunction Value
                VariableReference ThermalTime: VariableName=[Phenology].ThermalTime
                VariableReference Phyllochron: VariableName=[Structure].Phyllochron
        ExpressionFunction HaunStageTerminalSpikelet: Expression=([Structure].FinalLeafNumber - 2.85)/1.1
          Memo
            The Haun stage at which Terminal Spikelet occurs is determined from final leaf number using the approach described in [Brown_Anthesis_2013].
        HoldFunction FinalLeafNumber: WhenToHold=TerminalSpikelet
          AddFunction FinalNodeNumber
            VariableReference MinLeafNumber: VariableName=[Phenology].MinimumLeafNumber
            MultiplyFunction VernalLeaves
              VariableReference UnVernalisedLeaves: VariableName=[Phenology].VrnSensitivity
              SubtractFunction VernalisationReductionFactor
                Constant One: FixedValue=1
                VariableReference RelativeVrn1Expression: VariableName=[Phenology].Vrn1
            MultiplyFunction PhotoPLeaves
              VariableReference ShortPpLeaves: VariableName=[Phenology].PpSensitivity
              LinearInterpolationFunction PhotoPeriodReductionFactor
                XYPairs: X=[10, 16]; Y=[1, 0]
                VariableReference XValue: VariableName=[Phenology].Photoperiod
        Constant VrnSensitivity: FixedValue=0; Units=Leaves
          Memo
            The difference between Inherent earlyness leaf number and the number of leaves produced when the plant is unvernalised and grown in long photoperiod
        Constant VernLag: FixedValue=1; Units=Unitless
          Memo
            The amount of vernalising temperature required before vernalisation response will be evident.  Value of relative to the amount offl vernalisation temperature required from the end of the lag until vernalisation saturation.  A value of 0 means there is no lag, a value of 1 means the lag is the same (in vernal time) as the vernalisation requirement and a value of 2 means the lag is twice as long as the vernalisation response phase
        Constant PpSensitivity: FixedValue=3; Units=Leaves
          Memo
            The reduction in leaf number going from 8 to 16 h Pp
        Constant HeadEmergencePpSensitivity: FixedValue=0
          Memo
            The phyllochrons duration for the plant to go from flag leaf ligual appearance at 16 h Pp compared to the phyllochron duration for the same phase at 8 h Pp.
        Constant HeadEmergenceLongDayBase: FixedValue=2.5
          Memo
            The phyllochrons duration for the plant to go from flag leaf ligual appearance at 16 h Pp.
        GerminatingPhase Germinating: Start=Sowing; End=Germination
        EmergingPhase Emerging: ShootLag=40; ShootRate=1.5; Start=Germination; End=Emergence; TTForTimeStep=0
          VariableReference ThermalTime: VariableName=[Phenology].ThermalTime
        NodeNumberPhase Vernalising: Start=Emergence; End=VernalSaturation
          VariableReference ThermalTime: VariableName=[Phenology].ThermalTime
          VariableReference CompletionNodeNumber: VariableName=[Phenology].HaunStageTerminalSpikelet
          VariableReference LeafTipNumber: VariableName=[Structure].LeafTipsAppeared
        GenericPhase SpikeletDifferentiation: Start=VernalSaturation; End=TerminalSpikelet
          VariableReference Progression: VariableName=[Phenology].ThermalTime
          Constant Target: FixedValue=0
        LeafAppearancePhase StemElongation: Start=TerminalSpikelet; End=FlagLeaf
          Memo
            The Final leaf number is fixed at Terminal Spikelet and leaves contune to appear at a rate set by thermal time and phyllochron until flag leaf liguale appears and this phase is completed.
          VariableReference ThermalTime: VariableName=[Phenology].ThermalTime
          VariableReference FinalLeafNumber: VariableName=[Structure].FinalLeafNumber
          ExpressionFunction LeafNumber
            Expression=[Leaf].ExpandedCohortNo + [Leaf].NextExpandingLeafProportion
          VariableReference FullyExpandedLeafNo: VariableName=[Leaf].ExpandedCohortNo
          VariableReference InitialisedLeafNumber: VariableName=[Leaf].InitialisedCohortNo
        GenericPhase HeadEmergence: Start=FlagLeaf; End=Heading
          VariableReference Progression: VariableName=[Phenology].ThermalTime
          MultiplyFunction Target
            VariableReference Phyllochron: VariableName=[Structure].Phyllochron.BasePhyllochron
            AddFunction Phyllochrons
              VariableReference LongDayBase: VariableName=[Phenology].HeadEmergenceLongDayBase
              MultiplyFunction IncreaseDueToShortPhotoPeriod
                LinearInterpolationFunction PhotoPeriodResponse
                  XYPairs: X=[11, 16]; Y=[1, 0]
                  VariableReference XValue: VariableName=[Phenology].Photoperiod
                VariableReference PpSensitivity: VariableName=[Phenology].HeadEmergencePpSensitivity
        GenericPhase EarlyFlowering: Start=Heading; End=Flowering
          VariableReference Progression: VariableName=[Phenology].ThermalTime
          Constant Target: FixedValue=0
        GenericPhase GrainDevelopment: Start=Flowering; End=StartGrainFill
          Constant Target: FixedValue=120
          VariableReference Progression: VariableName=[Phenology].ThermalTime
        GenericPhase GrainFilling: Start=StartGrainFill; End=EndGrainFill
          Constant Target: FixedValue=545
          VariableReference Progression: VariableName=[Phenology].ThermalTime
        GenericPhase Maturing: Start=EndGrainFill; End=Maturity
          Constant Target: FixedValue=35
          VariableReference Progression: VariableName=[Phenology].ThermalTime
        GenericPhase Ripening: Start=Maturity; End=HarvestRipe
          Constant Target: FixedValue=300
          VariableReference Progression: VariableName=[Phenology].ThermalTime
        EndPhase ReadyForHarvesting: Start=HarvestRipe; End=Unused
          VariableReference ThermalTime: VariableName=[Phenology].ThermalTime
        ZadokPMFWheat Zadok
        OnEventFunction TerminalSpikeletDAS: SetEvent=TerminalSpikelet; ReSetEvent=never
          Memo
            A function is used to provide flowering date as days after sowing(DAS).
          Constant PreEventValue: FixedValue=0
          VariableReference PostEventValue: VariableName=[Plant].DaysAfterSowing
        OnEventFunction FlagLeafDAS: SetEvent=FlagLeaf; ReSetEvent=never
          Memo
            A function is used to provide flowering date as days after sowing(DAS).
          Constant PreEventValue: FixedValue=0
          VariableReference PostEventValue: VariableName=[Plant].DaysAfterSowing
        OnEventFunction HeadingDAS: SetEvent=Heading; ReSetEvent=never
          Memo
            A function is used to provide heading date as days after sowing(DAS).
          Constant PreEventValue: FixedValue=0
          VariableReference PostEventValue: VariableName=[Plant].DaysAfterSowing
        OnEventFunction FloweringDAS: SetEvent=Flowering; ReSetEvent=never
          Memo
            A function is used to provide flowering date as days after sowing(DAS).
          Constant PreEventValue: FixedValue=0
          VariableReference PostEventValue: VariableName=[Plant].DaysAfterSowing
        OnEventFunction MaturityDAS: SetEvent=Maturity; ReSetEvent=never
          Memo
            A function is used to provide maturity date as days after sowing(DAS).
          Constant PreEventValue: FixedValue=0
          VariableReference PostEventValue: VariableName=[Plant].DaysAfterSowing
        OnEventFunction EmergenceDAS: SetEvent=Emergence; ReSetEvent=never
          Memo
            A function is used to provide flowering date as days after sowing(DAS).
          Constant PreEventValue: FixedValue=0
          VariableReference PostEventValue: VariableName=[Plant].DaysAfterSowing
      Structure: CohortInitialisationStage=Germination; LeafInitialisationStage=Emergence
        VariableReference ThermalTime: VariableName=[Phenology].ThermalTime
        MultiplyFunction Phyllochron
          Memo Rational
            This is the thermal time between the emergence of leaf tips.  The model used here is based on [Jamieson_SIRIUS_1998] where leaf appearace could be described by a base phyllochron determined between leaves 2 and 7 and a phyllochron that was 70% of base phyllochron for leaves < 2 and 130% of base phyllochron for leaves > 7
          LinearInterpolationFunction LeafStageFactor
            XYPairs: X=[0, 2, 3, 7, 8, 11, 12]; Y=[0.75, 0.75, 1, 1, 1.4, 1.4, 1.4]
            VariableReference XValue: VariableName=[Leaf].AppearedCohortNo
          Constant BasePhyllochron: FixedValue=120; Units=oC.d
          LinearInterpolationFunction PhotoPeriodEffect
            XYPairs: X=[8, 12, 14]; Y=[1.6, 1, 1]
            VariableReference XValue: VariableName=[Phenology].Photoperiod
        MultiplyFunction BranchingRate
          Memo
            Potential branching rate is determined by the commonly observed pattern of tillering in wheat, in which each tiller emerges with the third leaf on its parent axis (e.g. first tiller emerges at the same time as the third leaf on the main stem, the first secondary tiller appears with the third leaf on tiller 1).  This is described as a simple function of main stem leaf number.
          PhaseLookup PotentialBranchingRate
            PhaseLookupValue Vegetative: Start=Emergence; End=TerminalSpikelet
              LinearInterpolationFunction PotentialBranchingRate
                XYPairs: X=[1, 2, 3, 4, 5, 6, 7, 8]; Y=[0, 0, 1, 2, 4, 7, 12, 20]
                VariableReference XValue: VariableName=[Structure].LeafTipsAppeared
            PhaseLookupValue Reproductive: Start=TerminalSpikelet; End=HarvestRipe
              Constant Zero: FixedValue=0
          MinimumFunction StressFactors
            LinearInterpolationFunction NitrogenEffect
              Memo
                Inadequate Nitrogen supply is assumed to affect tillering prior to any effect on photosynthesis or leaf size.
              XYPairs: X=[0.5, 2, 3]; Y=[0, 1, 1]
              VariableReference XValue: VariableName=[Arbitrator].FN
            LinearInterpolationFunction CoverEffect
              Memo
                Tillering is said to cease once a threshold fraction of incoming radiation has been achieved.  This captures shading effects on tillering described by [evers2006cessation].
              XYPairs: X=[0, 0.1, 0.25]; Y=[1, 1, 0]
              VariableReference XValue: VariableName=[Leaf].CoverTotal
            LinearInterpolationFunction WaterStressEffect
              XYPairs: X=[0, 1]; Y=[0, 1]
              VariableReference XValue: VariableName=[Root].WaterTensionFactor
        PhaseLookup BranchMortality
          PhaseLookupValue MortalityPhase: Start=FlagLeaf; End=Flowering
            MultiplyFunction Mortality
              LinearInterpolationFunction MortalityPerDegDay
                XYPairs: X=[0, 0.005]; Y=[0.002, 0]
                VariableReference XValue: VariableName=[Structure].MeanTillerGrowthRate
              VariableReference ThermalTime: VariableName=[Phenology].ThermalTime
        HeightFunction HeightModel
          LinearInterpolationFunction PotentialHeight
            XYPairs: X=[3, 4, 5, 6, 7, 8, 9]; Y=[10, 200, 200, 1000, 1000, 1000, 1000]
            VariableReference XValue: VariableName=[Phenology].Stage
          LinearInterpolationFunction WaterStress
            XYPairs: X=[0.3, 1]; Y=[0, 1]
            VariableReference XValue: VariableName=[Leaf].Fw
        MovingAverageFunction MeanTillerGrowthRate: NumberOfDays=5; StageToStartMovingAverage=Emergence
          Memo
            This is calculated to represent the supply of asslimilate to individual tillers over the past 5 days to use as an index to determine tiller mortality.  When tiller numbers are high or total crop assimilate supply is small there will not be enough assimilate to maintain all of the tillers so the model will senesce some.
          DivideFunction TillerGrowthRate
            VariableReference DailyGrowth: VariableName=[Arbitrator].DM.TotalFixationSupply
            VariableReference ThermalTime: VariableName=[Phenology].ThermalTime
            VariableReference StemPopulation: VariableName=[Structure].TotalStemPopn
        MovingAverageFunction MeanPhyllochron: NumberOfDays=300; StageToStartMovingAverage=Emergence
          VariableReference Phyllochron: VariableName=[Structure].Phyllochron
        AddFunction HaunStage
          VariableReference AppearedLeaves: VariableName=[Leaf].ExpandedCohortNo
          VariableReference ProportionOfExpandingLeaf: VariableName=[Leaf].NextExpandingLeafProportion
        Constant StemSenescenceAge: FixedValue=0
        DivideFunction PTQ
          MultiplyFunction Radn_mol_per_m2
            VariableReference SolarRadiation: VariableName=[IWeather].Radn
            Constant: FixedValue=2.285
            VariableReference RUE Temp factor: VariableName=[Leaf].Photosynthesis.FT
            Memo
              Multiply Radn (MJ/m2/d) by 4.57 to convert to mol/m2/day and divide by 2 to convert to mol PAR/m2/d
          VariableReference ThermalTime: VariableName=[Phenology].ThermalTime
        Constant MaxLAR: FixedValue=0.021
        VariableReference FinalLeafNumber: VariableName=[Phenology].FinalLeafNumber
      ReproductiveOrgan Grain: GrowthRespiration=0; MaintenanceRespiration=0; RipeStage=Ripe
        Biomass Live: DMDOfStructural=0.6
        Biomass Dead: DMDOfStructural=0.6
        HoldFunction NumberFunction: WhenToHold=Flowering
          MultiplyFunction GrainNumber
            Constant GrainsPerGramOfStem: FixedValue=26; Units=grains
            VariableReference StemMass: VariableName=[StemPlusSpike].Wt
        Constant DMConversionEfficiency: FixedValue=1
        Constant RemobilisationCost: FixedValue=0
        Constant InitialGrainProportion: FixedValue=0.05
        Constant MaximumPotentialGrainSize: FixedValue=0.05; Units=g
        PhaseLookup DMDemandFunction
          PhaseLookupValue InitialPhase: Start=Flowering; End=StartGrainFill
            FillingRateFunction
              VariableReference NumberFunction: VariableName=[Grain].NumberFunction
              VariableReference FillingDuration: VariableName=[Phenology].GrainDevelopment.Target
              VariableReference ThermalTime: VariableName=[Phenology].ThermalTime
              MultiplyFunction PotentialSizeIncrement
                VariableReference InitialProportion: VariableName=[Grain].InitialGrainProportion
                VariableReference MaximumSize: VariableName=[Grain].MaximumPotentialGrainSize
          PhaseLookupValue LinearPhase: Start=StartGrainFill; End=EndGrainFill
            FillingRateFunction
              VariableReference NumberFunction: VariableName=[Grain].NumberFunction
              VariableReference FillingDuration: VariableName=[Phenology].GrainFilling.Target
              VariableReference ThermalTime: VariableName=[Phenology].ThermalTime
              MultiplyFunction PotentialSizeIncrement
                SubtractFunction ProportionLinearPhase
                  Constant One: FixedValue=1
                  VariableReference InitialProportion: VariableName=[Grain].InitialGrainProportion
                VariableReference MaximumSize: VariableName=[Grain].MaximumPotentialGrainSize
        Constant MinimumNConc: FixedValue=0.0123
        Constant MaxNConcDailyGrowth: FixedValue=0.03
        Constant MaximumNConc: FixedValue=0.03
        PhaseLookup NFillingRate
          PhaseLookupValue GrainFilling: Start=Flowering; End=EndGrainFill
            FillingRateFunction
              VariableReference NumberFunction: VariableName=[Grain].NumberFunction
              AddFunction FillingDuration
                VariableReference FloweringToGrainFilling: VariableName=[Phenology].GrainDevelopment.Target
                VariableReference GrainFilling: VariableName=[Phenology].GrainFilling.Target
              VariableReference ThermalTime: VariableName=[Phenology].ThermalTime
              MultiplyFunction PotentialSizeIncrement
                VariableReference MaximumSize: VariableName=[Grain].MaximumPotentialGrainSize
                VariableReference MaximumNConc: VariableName=[Grain].MaximumNConc
        Constant WaterContent: FixedValue=0.12
        AccumulateFunction AccumThermalTime: StartStageName=Flowering; EndStageName=Maturity; FractionRemovedOnCut=0; FractionRemovedOnHarvest=0; FractionRemovedOnGraze=0; FractionRemovedOnPrune=0
          VariableReference DailyThermalTimeValue: VariableName=[Phenology].ThermalTime
        ExpressionFunction Protein
          Expression=([Grain].Live.N + [Grain].Dead.N)/([Grain].Live.Wt + [Grain].Dead.Wt) * 100 * 5.71
        BiomassRemoval BiomassRemovalDefaults
          OrganBiomassRemovalType Harvest: FractionLiveToRemove=1; FractionDeadToRemove=0; FractionLiveToResidue=0; FractionDeadToResidue=0
          OrganBiomassRemovalType Cut: FractionLiveToRemove=1; FractionDeadToRemove=0; FractionLiveToResidue=0; FractionDeadToResidue=0
          OrganBiomassRemovalType Prune: FractionLiveToRemove=0; FractionDeadToRemove=0; FractionLiveToResidue=0.8; FractionDeadToResidue=0
          OrganBiomassRemovalType Graze: FractionLiveToRemove=0.6; FractionDeadToRemove=0; FractionLiveToResidue=0.2; FractionDeadToResidue=0
          OrganBiomassRemovalType Thin: FractionLiveToRemove=0; FractionDeadToRemove=0; FractionLiveToResidue=0.05; FractionDeadToResidue=0
        Constant CarbonConcentration: FixedValue=0.4
      Root: GrowthRespiration=0; MaintenanceRespiration=0
        RootShapeCylinder RootShape
        Constant DMConversionEfficiency: FixedValue=1
        Constant RemobilisationCost: FixedValue=0
        Constant KLModifier: FixedValue=1
        Constant SoilWaterEffect: FixedValue=1
        Constant MaxDailyNUptake: FixedValue=20
        Constant SenescenceRate: FixedValue=0.005
        Constant MaximumRootDepth: FixedValue=1000000
        Constant MaximumNConc: FixedValue=0.01
        Constant MinimumNConc: FixedValue=0.01
        PhaseLookupValue NitrogenDemandSwitch: Start=Germination; End=Maturity
          Constant: FixedValue=1
        BiomassRemoval BiomassRemovalDefaults
          OrganBiomassRemovalType Harvest: FractionLiveToRemove=0; FractionDeadToRemove=0; FractionLiveToResidue=0.2; FractionDeadToResidue=0
          OrganBiomassRemovalType Cut: FractionLiveToRemove=0; FractionDeadToRemove=0; FractionLiveToResidue=0.3; FractionDeadToResidue=0
          OrganBiomassRemovalType Prune: FractionLiveToRemove=0; FractionDeadToRemove=0; FractionLiveToResidue=0.1; FractionDeadToResidue=0
          OrganBiomassRemovalType Graze: FractionLiveToRemove=0; FractionDeadToRemove=0; FractionLiveToResidue=0.15; FractionDeadToResidue=0
          OrganBiomassRemovalType Thin: FractionLiveToRemove=0; FractionDeadToRemove=0; FractionLiveToResidue=0.05; FractionDeadToResidue=0
        Constant KNO3: FixedValue=0.02
        Constant KNH4: FixedValue=0.01
        Constant SpecificRootLength: FixedValue=105; Units=m/g
        MultiplyFunction RootFrontVelocity
          PhaseLookup PotentialRootFrontVelocity
            PhaseLookupValue PreEmergence: Start=Germination; End=Emergence
              Constant Value: FixedValue=5; Units=mm/d
            PhaseLookupValue PostEmergence: Start=Emergence; End=Maturity
              Constant Value: FixedValue=20; Units=mm/d
          WeightedTemperatureFunction TemperatureFactor: MaximumTemperatureWeighting=0.5
            XYPairs: X=[0, 15, 25, 35]; Y=[0, 1, 1, 0]
          LinearInterpolationFunction WaterFactor
            SoilWaterScale
            XYPairs: X=[0, 0.25, 1]; Y=[0, 1, 1]
            VariableReference XValue: VariableName=[SoilWaterScale]
        LinearInterpolationFunction NUptakeSWFactor
          SoilWaterScale
          XYPairs: X=[0, 1]; Y=[0, 1]
          Memo
            This is modelled in the same way as the old wheat model where potential N uptake is decreased as the soil dries as described by NUptakeSWFactor
          VariableReference XValue: VariableName=[SoilWaterScale]
        Constant CarbonConcentration: FixedValue=0.4
        Constant MaintenanceRespirationFunction: FixedValue=0
        BiomassDemand DMDemands
          MultiplyFunction Structural
            PartitionFractionDemandFunction DMDemandFunction
              PhaseLookup PartitionFraction
                PhaseLookupValue PreEmergence: Start=Germination; End=Emergence
                  Constant Value: FixedValue=0
                PhaseLookupValue PreFlowering: Start=Emergence; End=Flowering
                  LinearInterpolationFunction AgeFactor
                    XYPairs: X=[3, 4, 5]; Y=[0.5, 0.2, 0.2]
                    VariableReference XValue: VariableName=[Phenology].Stage
                PhaseLookupValue PostFlowering: Start=Flowering; End=EndGrainFill
                  Constant Value: FixedValue=0.2
            Constant StructuralFraction: FixedValue=1
          Constant Metabolic: FixedValue=0
          StorageDMDemandFunction Storage
            SubtractFunction StorageFraction
              Constant One: FixedValue=1
              VariableReference StructuralFraction: VariableName=[Root].DMDemands.Structural.StructuralFraction
        BiomassDemand NDemands
          MultiplyFunction Structural
            VariableReference MinNconc: VariableName=[Root].minimumNconc
            VariableReference PotentialDMAllocation: VariableName=[Root].potentialDMAllocation.Structural
          MultiplyFunction Metabolic
            SubtractFunction MetabolicNconc
              VariableReference CritNconc: VariableName=[Root].criticalNConc
              VariableReference MinNconc: VariableName=[Root].minimumNconc
            VariableReference PotentialDMAllocation: VariableName=[Root].potentialDMAllocation.Structural
          StorageNDemandFunction Storage
            VariableReference NitrogenDemandSwitch: VariableName=[Root].nitrogenDemandSwitch
            VariableReference MaxNconc: VariableName=[Root].maximumNconc
        VariableReference CriticalNConc: VariableName=[Root].MinimumNConc
        BiomassDemand InitialWt
          Constant Structural: FixedValue=0.005; Units=g/plant
          Constant Metabolic: FixedValue=0
          Constant Storage: FixedValue=0
        Constant RootDepthStressFactor: FixedValue=1
      Leaf: MaxCover=1; Albedo=0.25; Gsmax350=0.011; R50=150; KDead=0.1; MaximumMainStemLeafNumber=30
        zero: CurrentExpandingLeaf, StartFractionExpanded, FractionNextleafExpanded, DeadNodesYesterday, GrowthRespiration, LAI, Depth, Width, FRGR, PotentialEP, WaterDemand, TipsAtEmergence, CohortsAtInitialisation, FractionDied
        ExpressionFunction CO2internal: Expression=(163 - [IWeather].MeanT)/(5 - 0.1*[IWeather].MeanT)
        DivideFunction StomatalConductanceCO2Modifier
          VariableReference FCO2: VariableName=[Leaf].Photosynthesis.FCO2
          ExpressionFunction RelativeCO2Gradient
            Expression=([IWeather].CO2 - [Leaf].CO2internal)/(350 - [Leaf].CO2internal)
        LeafCohort InitialLeaves[1]: Rank=1; Area=200
          zero: NReallocationFactor, DMReallocationFactor, NRetranslocationFactor, DMRetranslocationFactor, ShadeInducedSenRate, SenescedFrac, DeltaPotentialArea, DeltaStressConstrainedArea, DeltaCarbonConstrainedArea, PotentialStructuralDMAllocation, PotentialMetabolicDMAllocation, MetabolicNReallocated, MetabolicWtReallocated, StorageNReallocated, StorageWtReallocated, MetabolicNRetranslocated, StorageNRetrasnlocated, DMRetranslocated, MetabolicNAllocation, StructuralDMAllocation, MetabolicDMAllocation, MaintenanceRespiration
        LeafCohort InitialLeaves[2]: Rank=2
          zero: NReallocationFactor, DMReallocationFactor, NRetranslocationFactor, DMRetranslocationFactor, ShadeInducedSenRate, SenescedFrac, DeltaPotentialArea, DeltaStressConstrainedArea, DeltaCarbonConstrainedArea, PotentialStructuralDMAllocation, PotentialMetabolicDMAllocation, MetabolicNReallocated, MetabolicWtReallocated, StorageNReallocated, StorageWtReallocated, MetabolicNRetranslocated, StorageNRetrasnlocated, DMRetranslocated, MetabolicNAllocation, StructuralDMAllocation, MetabolicDMAllocation, Area, MaintenanceRespiration
        LeafCohortParameters CohortParameters: ExpansionStressValue=0; CellDivisionStressValue=0; LagAccelerationValue=0; SenescenceAccelerationValue=0; ShadeInducedSenescenceRateValue=0; SenessingLeafRelativeSizeValue=0
          Constant NReallocationFactor: FixedValue=1
          Constant RemobilisationCost: FixedValue=0
          Constant MaintenanceRespirationFunction: FixedValue=0
          Constant NRetranslocationFactor: FixedValue=0.03
          Constant DMReallocationFactor: FixedValue=1
          Constant DMRetranslocationFactor: FixedValue=1
          MinimumFunction CellDivisionStress
            LinearInterpolationFunction WaterStressEffect
              XYPairs: X=[0.5, 1]; Y=[0.1, 1]
              VariableReference XValue: VariableName=[Leaf].Fw
            LinearInterpolationFunction NitrogenStressEffect
              XYPairs: X=[0, 0.5, 1]; Y=[0.1, 0.1, 1]
              VariableReference XValue: VariableName=[Wheat].Leaf.Fn
          MinimumFunction ExpansionStress
            LinearInterpolationFunction WaterStressEffect
              XYPairs: X=[0.1, 1.1, 1.3]; Y=[0, 1, 1]
              VariableReference XValue: VariableName=[Root].WaterTensionFactor
            LinearInterpolationFunction TemperatureEffect
              XYPairs: X=[0, 12, 14]; Y=[0, 1, 1]
              VariableReference XValue: VariableName=[IWeather].MeanT
            LinearInterpolationFunction NitrogenStressEffect
              XYPairs: X=[0, 0.5, 1]; Y=[0.1, 0.1, 1]
              VariableReference XValue: VariableName=[Wheat].Leaf.Fn
          MultiplyFunction MaxArea
            Constant AreaLargestLeaves: FixedValue=2600; Units=mm^2
            LinearInterpolationFunction AgeFactor
              XYPairs: X=[3, 3.45, 4, 5]; Y=[0.1, 0.5, 1, 1]
              VariableReference XValue: VariableName=[Phenology].Stage
          MultiplyFunction GrowthDuration
            Constant Multiplier: FixedValue=1.3
            VariableReference Phyllochron: VariableName=[Structure].Phyllochron
          MultiplyFunction LagDuration
            LinearInterpolationFunction AgeFactor
              XYPairs: X=[3, 4, 5]; Y=[0.4, 1, 1]
              VariableReference XValue: VariableName=[Phenology].Stage
            SubtractFunction LastLeafDuration
              AddFunction ThermalTimeToRipe
                VariableReference HeadEmergence: VariableName=[Phenology].HeadEmergence.Target
                VariableReference EarlyFlowering: VariableName=[Phenology].EarlyFlowering.Target
                VariableReference GrainDevelopment: VariableName=[Phenology].GrainDevelopment.Target
                VariableReference GrainFilling: VariableName=[Phenology].GrainFilling.Target
                VariableReference Maturing: VariableName=[Phenology].Maturing.Target
                VariableReference Ripening: VariableName=[Phenology].Ripening.Target
              VariableReference SenescenceDuration: VariableName=[Leaf].CohortParameters.SenescenceDuration
          MultiplyFunction SenescenceDuration
            Constant Multiplier: FixedValue=3
            VariableReference Phyllochron: VariableName=[Structure].Phyllochron
          Constant DetachmentLagDuration: FixedValue=1000000
          Constant DetachmentDuration: FixedValue=1000000
          Constant RelativeBranchLeafSize: FixedValue=1
          LinearInterpolationFunction MaximumNConc
            XYPairs: X=[3, 4, 5, 6, 7, 8]; Y=[0.05, 0.05, 0.05, 0.035, 0.02, 0.02]
            VariableReference XValue: VariableName=[Phenology].Stage
          MultiplyFunction CriticalNConc
            LinearInterpolationFunction CriticalNConcAt350ppm
              XYPairs: X=[3, 4, 5, 6, 7, 8]; Y=[0.04, 0.04, 0.04, 0.0275, 0.015, 0.015]
              VariableReference XValue: VariableName=[Phenology].Stage
            LinearInterpolationFunction CO2Factor
              XYPairs: X=[350, 700]; Y=[1, 0.93]
              VariableReference XValue: VariableName=[IWeather].CO2
          LinearInterpolationFunction MinimumNConc
            XYPairs: X=[3, 4, 5, 6, 7, 8]; Y=[0.01, 0.01, 0.01, 0.01, 0.01, 0.01]
            VariableReference XValue: VariableName=[Phenology].Stage
          AddFunction LagAcceleration
            Constant One: FixedValue=1
            MultiplyFunction Stress
              Constant StressResponseCoefficient: FixedValue=1
              LinearInterpolationFunction StressFactor
                XYPairs: X=[0, 1]; Y=[2, 0]
                VariableReference XValue: VariableName=[Leaf].Fw
          AddFunction SenescenceAcceleration: same as Replacements.Wheat.Leaf.CohortParameters.LagAcceleration
          LinearInterpolationFunction SpecificLeafAreaMax
            XYPairs: X=[3, 4, 5, 6, 7, 8]; Y=[17000, 20000, 20000, 18500, 17000, 17000]
            VariableReference XValue: VariableName=[Phenology].Stage
          LinearInterpolationFunction SpecificLeafAreaMin
            XYPairs: X=[0.4, 1]; Y=[14000, 14000]
            VariableReference XValue: VariableName=[Leaf].Fn
          Constant InitialNConc: FixedValue=0
          Constant StructuralFraction: FixedValue=0.5
          Constant StorageFraction: FixedValue=0.3
          Constant LeafSizeShapeParameter: FixedValue=0.3
          Constant SenessingLeafRelativeSize: FixedValue=1; Units=0-1
          Constant ShadeInducedSenescenceRate: FixedValue=0
          ArrayFunction LagDurationAgeMultiplier: Values=1 1 1
          ArrayFunction SenescenceDurationAgeMultiplier: Values=1 1 1
          ArrayFunction LeafSizeAgeMultiplier: Values=1 1 1 1 1 1 1 1 1 1 1 1
        RUEModel Photosynthesis
          Constant RUE: FixedValue=1.2
          WeightedTemperatureFunction FT: MaximumTemperatureWeighting=0.75
            XYPairs: X=[0, 15, 25, 35]; Y=[0, 1, 1, 0]
          LinearInterpolationFunction FN
            XYPairs: X=[0, 1, 1.5]; Y=[0, 1, 1]
            VariableReference XValue: VariableName=[Leaf].Fn
          LinearInterpolationFunction FW
            XYPairs: X=[0, 1, 1]; Y=[0, 1, 1]
            VariableReference XValue: VariableName=[Leaf].Fw
          LinearInterpolationFunction FVPD
            DailyMeanVPD DailyVPD: MaximumVPDWeight=0.66
            XYPairs: X=[0, 10, 40]; Y=[1, 1, 0]
            VariableReference XValue: VariableName=[DailyVPD]
          RUECO2Function FCO2: PhotosyntheticPathway=C3
          VariableReference RadnInt: VariableName=[Leaf].RadiationIntercepted
        Constant FrostFraction: FixedValue=0
        Constant RemobilisationCost: FixedValue=0
        VariableReference ThermalTime: VariableName=[Phenology].ThermalTime
        MinimumFunction FRGRFunction
          WeightedTemperatureFunction FT: MaximumTemperatureWeighting=0.75
            XYPairs: X=[0, 15, 25, 35]; Y=[0, 1, 1, 0]
          LinearInterpolationFunction FN
            XYPairs: X=[0, 1, 1.5]; Y=[0, 1, 1]
            VariableReference XValue: VariableName=[Leaf].Fn
          LinearInterpolationFunction FVPD
            DailyMeanVPD DailyVPD: MaximumVPDWeight=0.66
            XYPairs: X=[0, 10, 40]; Y=[1, 1, 0]
            VariableReference XValue: VariableName=[DailyVPD]
        BiomassRemoval BiomassRemovalDefaults
          OrganBiomassRemovalType Harvest: FractionLiveToRemove=0; FractionDeadToRemove=0; FractionLiveToResidue=0.3; FractionDeadToResidue=0.3
          OrganBiomassRemovalType Cut: FractionLiveToRemove=0.8; FractionDeadToRemove=0.8; FractionLiveToResidue=0; FractionDeadToResidue=0
          OrganBiomassRemovalType Prune: FractionLiveToRemove=0; FractionDeadToRemove=0; FractionLiveToResidue=0.6; FractionDeadToResidue=0.6
          OrganBiomassRemovalType Graze: FractionLiveToRemove=0.6; FractionDeadToRemove=0.6; FractionLiveToResidue=0.1; FractionDeadToResidue=0.1
          OrganBiomassRemovalType Thin: FractionLiveToRemove=0; FractionDeadToRemove=0; FractionLiveToResidue=0.05; FractionDeadToResidue=0.05
        MultiplyFunction ExtinctionCoeff
          Constant VegetativePhase: FixedValue=0.5
          LinearInterpolationFunction DevelopmentFactor
            XYPairs: X=[3, 4, 5, 5.7, 6]; Y=[1, 1, 1, 1, 1.2]
            Memo
              Exntiction coefficient increases at stem extension as leaves become more prostrate
            VariableReference XValue: VariableName=[Phenology].Stage
        Constant StructuralFraction: FixedValue=0.5
        Constant DMConversionEfficiency: FixedValue=1
        Constant CarbonConcentration: FixedValue=0.4
        Constant WidthFunction: FixedValue=0
        VariableReference DepthFunction: VariableName=[Leaf].Height
      GenericOrgan Spike: IsAboveGround=true
        Constant NReallocationFactor: FixedValue=0
        Constant RemobilisationCost: FixedValue=0
        PhaseLookup NRetranslocationFactor
          PhaseLookupValue EarlyGrowth: Start=Emergence; End=StartGrainFill
            Constant ValueDuringEarlyGrowth: FixedValue=0
          PhaseLookupValue ReproductiveGrowth: Start=StartGrainFill; End=EndGrainFill
            Constant ValueDuringGrainFill: FixedValue=0.5
        LinearInterpolationFunction MaximumNConc
          XYPairs: X=[3, 4, 5, 5.5, 6.5, 7, 8]; Y=[0.01, 0.01, 0.01, 0.01, 0.025, 0.025, 0.025]
          VariableReference XValue: VariableName=[Phenology].Stage
        Constant MinimumNConc: FixedValue=0.004
        BiomassRemoval BiomassRemovalDefaults
          OrganBiomassRemovalType Harvest: FractionLiveToRemove=0.5; FractionDeadToRemove=0; FractionLiveToResidue=0.1; FractionDeadToResidue=0
          OrganBiomassRemovalType Cut: FractionLiveToRemove=0.8; FractionDeadToRemove=0; FractionLiveToResidue=0; FractionDeadToResidue=0
          OrganBiomassRemovalType Prune: FractionLiveToRemove=0; FractionDeadToRemove=0; FractionLiveToResidue=0.6; FractionDeadToResidue=0
          OrganBiomassRemovalType Graze: FractionLiveToRemove=0.6; FractionDeadToRemove=0; FractionLiveToResidue=0.2; FractionDeadToResidue=0
          OrganBiomassRemovalType Thin: FractionLiveToRemove=0; FractionDeadToRemove=0; FractionLiveToResidue=0.05; FractionDeadToResidue=0
        PhaseLookupValue NitrogenDemandSwitch: Start=Emergence; End=StartGrainFill
          Constant: FixedValue=1
        PhaseLookup DMRetranslocationFactor
          PhaseLookupValue VegetativeGrowth: Start=Emergence; End=StartGrainFill
            Constant DMRetranslocationFactor: FixedValue=0
          PhaseLookupValue ReproductiveGrowth: Start=StartGrainFill; End=EndGrainFill
            Constant DMRetranslocationFactor: FixedValue=0.5
        Constant DetachmentRateFunction: FixedValue=0; Units=/d
        Constant MaintenanceRespirationFunction: FixedValue=0; Units=0-1
        Constant DMConversionEfficiency: FixedValue=1; Units=0-1
        VariableReference HeadNumber: VariableName=[Structure].TotalStemPopn
        Constant DMReallocationFactor: FixedValue=0
        AddFunction CriticalNConc
          VariableReference MinimumNConc: VariableName=[Spike].MinimumNConc
          MultiplyFunction MetabolicNconc
            SubtractFunction NonStructuralN
              VariableReference MaximumNConc: VariableName=[Spike].MaximumNConc
              VariableReference MinimumNConc: VariableName=[Spike].MinimumNConc
            Constant Proportion: FixedValue=0.8
        LinearInterpolationFunction SenescenceRate
          XYPairs: X=[3, 4, 5, 6, 7, 8]; Y=[0.07, 0.04, 0.04, 0.015, 0.012, 0.012]
          VariableReference XValue: VariableName=[Phenology].Stage
        Constant CarbonConcentration: FixedValue=0.4
        BiomassDemand DMDemands
          MultiplyFunction Structural
            PartitionFractionDemandFunction DMDemandFunction
              LinearInterpolationFunction PartitionFraction
                XYPairs: X=[3, 4, 5, 5.7, 6, 7, 8, 9, 9.000001]; Y=[0, 0, 0, 0.01, 0.7, 0.7, 0.7, 0.7, 0]
                VariableReference XValue: VariableName=[Phenology].Stage
            PhaseLookup StructuralFraction
              PhaseLookupValue VegetativeGrowth: Start=Emergence; End=StartGrainFill
                Constant StructuralFractionEG: FixedValue=0.3
              PhaseLookupValue ReproductiveGrowth: Start=StartGrainFill; End=EndGrainFill
                Constant StructuralFractionGF: FixedValue=0
          Constant Metabolic: FixedValue=0
          StorageDMDemandFunction Storage
            SubtractFunction StorageFraction
              Constant One: FixedValue=1
              VariableReference StructuralFraction: VariableName=[Spike].DMDemands.Structural.StructuralFraction
        BiomassDemand NDemands
          MultiplyFunction Structural
            VariableReference MinNconc: VariableName=[Spike].minimumNconc
            VariableReference PotentialDMAllocation: VariableName=[Spike].potentialDMAllocation.Structural
          MultiplyFunction Metabolic
            SubtractFunction MetabolicNconc
              VariableReference CritNconc: VariableName=[Spike].criticalNConc
              VariableReference MinNconc: VariableName=[Spike].minimumNconc
            VariableReference PotentialDMAllocation: VariableName=[Spike].potentialDMAllocation.Structural
          StorageNDemandFunction Storage
            VariableReference NitrogenDemandSwitch: VariableName=[Spike].nitrogenDemandSwitch
            VariableReference MaxNconc: VariableName=[Spike].maximumNconc
        RetranslocateNonStructural RetranslocateNitrogen
        BiomassDemand InitialWt
          Constant Structural: FixedValue=0; Units=g/m^2
          Constant Metabolic: FixedValue=0
          Constant Storage: FixedValue=0
        Constant Photosynthesis: FixedValue=0
        VariableReference initialNConcFunction: VariableName=[Spike].MinimumNConc
        BiomassDemand dmDemandPriorityFactors
          Constant Structural: FixedValue=1
          Constant Metabolic: FixedValue=1
          Constant Storage: FixedValue=1
      GenericOrgan Stem: IsAboveGround=true
        LinearInterpolationFunction SenescenceRate
          XYPairs: X=[3, 4, 5, 6, 7, 8, 9, 10, 11]; Y=[0, 0, 0, 0, 0, 0, 0, 0.2, 0.5]
          VariableReference XValue: VariableName=[Phenology].Stage
        Constant RemobilisationCost: FixedValue=0
        LinearInterpolationFunction MaximumNConc
          XYPairs: X=[3, 4, 5, 6, 7, 8]; Y=[0.07, 0.04, 0.04, 0.015, 0.012, 0.012]
          VariableReference XValue: VariableName=[Phenology].Stage
        Constant MinimumNConc: FixedValue=0.0025
        PhaseLookupValue NitrogenDemandSwitch: Start=Emergence; End=StartGrainFill
          Constant: FixedValue=1
        Constant NReallocationFactor: FixedValue=0
        PhaseLookup NRetranslocationFactor
          PhaseLookupValue VegetativeGrowth: Start=Sowing; End=Flowering
            Constant Fraction: FixedValue=0
          PhaseLookupValue ReproductiveGrowth: Start=Flowering; End=HarvestRipe
            Constant Fraction: FixedValue=0.5
        PhaseLookup DMRetranslocationFactor: same as Replacements.Wheat.Spike.DMRetranslocationFactor
        BiomassRemoval BiomassRemovalDefaults: same as Replacements.Wheat.Spike.BiomassRemovalDefaults
        DivideFunction PercentWSC
          VariableReference WSC: VariableName=[Stem].Live.StorageWt
          VariableReference StemWt: VariableName=[Stem].Live.Wt
        Constant DetachmentRateFunction: FixedValue=0; Units=/d
        Constant MaintenanceRespirationFunction: FixedValue=0; Units=0-1
        Constant DMConversionEfficiency: FixedValue=1; Units=0-1
        Constant DMReallocationFactor: FixedValue=0
        AddFunction CriticalNConc
          VariableReference MinimumNConc: VariableName=[Stem].MinimumNConc
          MultiplyFunction MetabolicNconc
            SubtractFunction NonStructuralN
              VariableReference MaximumNConc: VariableName=[Stem].MaximumNConc
              VariableReference MinimumNConc: VariableName=[Stem].MinimumNConc
            Constant Proportion: FixedValue=0.5
        Constant CarbonConcentration: FixedValue=0.4
        BiomassDemand DMDemands
          MultiplyFunction Structural
            PartitionFractionDemandFunction DMDemandFunction
              PhaseLookup PartitionFraction
                PhaseLookupValue PreStemElongation: Start=Emergence; End=TerminalSpikelet
                  Constant StemFraction: FixedValue=0.2
                PhaseLookupValue StemElongation: Start=TerminalSpikelet; End=StartGrainFill
                  Constant StemFraction: FixedValue=0.7; Units=0
                PhaseLookupValue EarEmergence: Start=StartGrainFill; End=HarvestRipe
                  Constant StemFraction: FixedValue=0
            PhaseLookup StructuralFraction
              PhaseLookupValue VegetativeGrowth: Start=Sowing; End=StartGrainFill
                Constant Fraction: FixedValue=0.3
              PhaseLookupValue ReproductiveGrowth: Start=StartGrainFill; End=HarvestRipe
                Constant Fraction: FixedValue=0.01
          Constant Metabolic: FixedValue=0
          StorageDMDemandFunction Storage
            SubtractFunction StorageFraction
              Constant One: FixedValue=1
              VariableReference StructuralFraction: VariableName=[Stem].DMDemands.Structural.StructuralFraction
        BiomassDemand NDemands
          MultiplyFunction Structural
            VariableReference MinNconc: VariableName=[Stem].minimumNconc
            VariableReference PotentialDMAllocation: VariableName=[Stem].potentialDMAllocation.Structural
          MultiplyFunction Metabolic
            SubtractFunction MetabolicNconc
              VariableReference CritNconc: VariableName=[Stem].criticalNConc
              VariableReference MinNconc: VariableName=[Stem].minimumNconc
            VariableReference PotentialDMAllocation: VariableName=[Stem].potentialDMAllocation.Structural
          StorageNDemandFunction Storage
            VariableReference NitrogenDemandSwitch: VariableName=[Stem].nitrogenDemandSwitch
            VariableReference MaxNconc: VariableName=[Stem].maximumNconc
        RetranslocateNonStructural RetranslocateNitrogen
        BiomassDemand InitialWt
          Constant Structural: FixedValue=0; Units=g/m^2
          Constant Metabolic: FixedValue=0
          Constant Storage: FixedValue=0
        Constant Photosynthesis: FixedValue=0
        VariableReference initialNConcFunction: VariableName=[Stem].MinimumNConc
        BiomassDemand dmDemandPriorityFactors
          Constant Structural: FixedValue=1
          Constant Metabolic: FixedValue=1
          Constant Storage: FixedValue=1
      CompositeBiomass AboveGround: DMDOfStructural=0.6
        Propertys=[[Leaf].Live, [Leaf].Dead, [Stem].Live, [Stem].Dead, [Spike].Live, [Spike].Dead, [Grain].Live, [Grain].Dead]
      CompositeBiomass AboveGroundLive: Propertys=[[Leaf].Live, [Stem].Live, [Spike].Live, [Grain].Live]; DMDOfStructural=0.6
      CompositeBiomass AboveGroundDead: Propertys=[[Leaf].Dead, [Stem].Dead, [Spike].Dead, [Grain].Dead]; DMDOfStructural=0.6
      CompositeBiomass BelowGround: Propertys=[[Root].Live, [Root].Dead]; DMDOfStructural=0.6
      CompositeBiomass Total: DMDOfStructural=0.6
        Propertys=[[Leaf].Live, [Leaf].Dead, [Stem].Live, [Stem].Dead, [Root].Live, [Root].Dead, [Spike].Live, [Spike].Dead, [Grain].Live, [Grain].Dead]
      CompositeBiomass TotalLive: DMDOfStructural=0.6
        Propertys=[[Leaf].Live, [Stem].Live, [Root].Live, [Spike].Live, [Grain].Live]
      CompositeBiomass TotalDead: DMDOfStructural=0.6
        Propertys=[[Leaf].Dead, [Stem].Dead, [Root].Dead, [Spike].Dead, [Grain].Dead]
      CompositeBiomass Ear: Propertys=[[Spike].Live, [Grain].Live, [Spike].Dead, [Grain].Dead]; DMDOfStructural=0.6
        Memo
          The Ear composite biomass object includes the Live and dead pools of all organs within the Ear to allow output for total dry matter and Nutrient contents, including total structural, non-structural and metabolic pools.
      CompositeBiomass StemPlusSpike: Propertys=[[Stem].Live, [Spike].Live, [Stem].Dead, [Spike].Dead]; DMDOfStructural=0.6
      CultivarFolder Cultivars
        CultivarFolder New Zealand
          Cultivar Alberic
            Command:
              [Phenology].MinimumLeafNumber.FixedValue = 9
              [Phenology].VrnSensitivity.FixedValue = 7
              [Phenology].PpSensitivity.FixedValue = 3
          Cultivar Amarok
            Command:
              [Phenology].MinimumLeafNumber.FixedValue = 9
              [Phenology].VrnSensitivity.FixedValue = 10
              [Phenology].PpSensitivity.FixedValue = 6
              [Phenology].HeadEmergencePpSensitivity.FixedValue = 5
              [Structure].Phyllochron.BasePhyllochron.FixedValue = 80
          Cultivar Aspiring
            Command:
              [Phenology].MinimumLeafNumber.FixedValue = 9
              [Phenology].VrnSensitivity.FixedValue = 7
              [Phenology].PpSensitivity.FixedValue = 3
          Cultivar BattenWinter
            Command:
              [Phenology].MinimumLeafNumber.FixedValue = 8
              [Phenology].VrnSensitivity.FixedValue = 8
              [Phenology].PpSensitivity.FixedValue = 5
              [Phenology].HeadEmergencePpSensitivity.FixedValue = 3
              [Structure].Phyllochron.BasePhyllochron.FixedValue = 100
              [Leaf].ExtinctionCoeff.VegetativePhase.FixedValue = 0.7
              [Grain].NumberFunction.GrainNumber.GrainsPerGramOfStem.FixedValue = 22
          Cultivar BattenSpring
            Command:
              [Phenology].MinimumLeafNumber.FixedValue = 7
              [Phenology].VrnSensitivity.FixedValue = 0
              [Phenology].PpSensitivity.FixedValue = 5
              [Phenology].HeadEmergencePpSensitivity.FixedValue = 3
              [Structure].Phyllochron.BasePhyllochron.FixedValue = 100
              [Leaf].ExtinctionCoeff.VegetativePhase.FixedValue = 0.7
              [Grain].NumberFunction.GrainNumber.GrainsPerGramOfStem.FixedValue = 22
          Cultivar Centaur
            Command:
              [Phenology].MinimumLeafNumber.FixedValue = 9
              [Phenology].VrnSensitivity.FixedValue = 7
              [Phenology].PpSensitivity.FixedValue = 3
          Cultivar Claire
            Command:
              [Phenology].MinimumLeafNumber.FixedValue = 8
              [Phenology].VrnSensitivity.FixedValue = 8
              [Phenology].PpSensitivity.FixedValue = 8
              [Phenology].HeadEmergencePpSensitivity.FixedValue = 3
              [Structure].Phyllochron.BasePhyllochron.FixedValue = 100
          Cultivar Conquest
            Command:
              [Phenology].MinimumLeafNumber.FixedValue = 7
              [Phenology].VrnSensitivity.FixedValue = 0
              [Phenology].PpSensitivity.FixedValue = 3
              [Structure].Phyllochron.BasePhyllochron.FixedValue = 100
          Cultivar CRWT153
            Command:
              [Phenology].MinimumLeafNumber.FixedValue = 14
              [Phenology].VrnSensitivity.FixedValue = 1
              [Phenology].PpSensitivity.FixedValue = 2
          Cultivar Discovery
            Command:
              [Phenology].MinimumLeafNumber.FixedValue = 8.5
              [Phenology].VrnSensitivity.FixedValue = 0
              [Phenology].PpSensitivity.FixedValue = 0
              [Structure].Phyllochron.BasePhyllochron.FixedValue = 80
              [Leaf].CohortParameters.MaxArea.AreaLargestLeaves.FixedValue = 1600
              [Grain].MaximumPotentialGrainSize.FixedValue = 0.051
              [Grain].NumberFunction.GrainNumber.GrainsPerGramOfStem.FixedValue = 35
              [Leaf].ExtinctionCoeff.VegetativePhase.FixedValue = 0.5
              [Structure].BranchingRate.PotentialBranchingRate.Vegetative.PotentialBranchingRate.XYPairs.Y = 0,0,0,0,4,7,12,20
              [Grain].MaximumNConc.FixedValue = 0.025
              [Grain].MaxNConcDailyGrowth.FixedValue = 0.025
              [Leaf].ExtinctionCoeff.DevelopmentFactor.XYPairs.Y = 1,1,1,1,1.4
              [Leaf].CohortParameters.MinimumNConc.XYPairs.Y = 0.01,0.008, 0.008,0.008, 0.008, 0.008
              [Stem].MinimumNConc.FixedValue = 0.006
              [Spike].DMRetranslocationFactor.ReproductiveGrowth.DMRetranslocationFactor.FixedValue = 0.05
            Memo
              This is a spring wheat with a high grain number and later tillering
          Cultivar Einstein
            Command:
              [Phenology].MinimumLeafNumber.FixedValue = 9
              [Phenology].VrnSensitivity.FixedValue = 7
              [Phenology].PpSensitivity.FixedValue = 3
          Cultivar Exceed
            Command:
              [Phenology].MinimumLeafNumber.FixedValue = 9
              [Phenology].VrnSensitivity.FixedValue = 7
              [Phenology].PpSensitivity.FixedValue = 3
          Cultivar Majestic
            Command:
              [Phenology].MinimumLeafNumber.FixedValue = 9
              [Phenology].VrnSensitivity.FixedValue = 7
              [Phenology].PpSensitivity.FixedValue = 3
          Cultivar Option
            Command:
              [Phenology].MinimumLeafNumber.FixedValue = 9
              [Phenology].VrnSensitivity.FixedValue = 7
              [Phenology].PpSensitivity.FixedValue = 3
          Cultivar Otane
            Command:
              [Phenology].MinimumLeafNumber.FixedValue = 6
              [Phenology].VrnSensitivity.FixedValue = 0
              [Phenology].PpSensitivity.FixedValue = 4
              [Phenology].HeadEmergencePpSensitivity.FixedValue = 2
              [Structure].Phyllochron.BasePhyllochron.FixedValue = 100
          Cultivar Pennant
            Command:
              [Phenology].MinimumLeafNumber.FixedValue = 9
              [Phenology].VrnSensitivity.FixedValue = 7
              [Phenology].PpSensitivity.FixedValue = 3
          Cultivar Regency
            Command:
              [Phenology].MinimumLeafNumber.FixedValue = 9
              [Phenology].VrnSensitivity.FixedValue = 7
              [Phenology].PpSensitivity.FixedValue = 3
          Cultivar Richmond
            Command:
              [Phenology].MinimumLeafNumber.FixedValue = 9
              [Phenology].VrnSensitivity.FixedValue = 7
              [Phenology].PpSensitivity.FixedValue = 3
          Cultivar Robigus
            Command:
              [Phenology].MinimumLeafNumber.FixedValue = 9
              [Phenology].VrnSensitivity.FixedValue = 7
              [Phenology].PpSensitivity.FixedValue = 3
          Cultivar Rongotea
            Command:
              [Phenology].MinimumLeafNumber.FixedValue = 7
              [Phenology].VrnSensitivity.FixedValue = 0
              [Phenology].PpSensitivity.FixedValue = 2
              [Phenology].HeadEmergencePpSensitivity.FixedValue = 3
              [Structure].Phyllochron.BasePhyllochron.FixedValue = 100
          Cultivar Rubric
            Command:
              [Phenology].MinimumLeafNumber.FixedValue = 9
              [Phenology].VrnSensitivity.FixedValue = 7
              [Phenology].PpSensitivity.FixedValue = 3
          Cultivar Sage
            Command:
              [Phenology].MinimumLeafNumber.FixedValue = 9
              [Phenology].VrnSensitivity.FixedValue = 7
              [Phenology].PpSensitivity.FixedValue = 3
          Cultivar Saracen
            Command:
              [Phenology].MinimumLeafNumber.FixedValue = 9
              [Phenology].VrnSensitivity.FixedValue = 7
              [Phenology].PpSensitivity.FixedValue = 3
          Cultivar Savannah
            Command:
              [Phenology].MinimumLeafNumber.FixedValue = 9
              [Phenology].VrnSensitivity.FixedValue = 7
              [Phenology].PpSensitivity.FixedValue = 3
          Cultivar Solstice
            Command:
              [Phenology].MinimumLeafNumber.FixedValue = 9
              [Phenology].VrnSensitivity.FixedValue = 7
              [Phenology].PpSensitivity.FixedValue = 3
          Cultivar Tanker
            Command:
              [Phenology].MinimumLeafNumber.FixedValue = 9
              [Phenology].VrnSensitivity.FixedValue = 7
              [Phenology].PpSensitivity.FixedValue = 3
          Cultivar Tribute
            Command:
              [Phenology].MinimumLeafNumber.FixedValue = 9
              [Phenology].VrnSensitivity.FixedValue = 7
              [Phenology].PpSensitivity.FixedValue = 3
          Cultivar Wakanui
            Command:
              [Phenology].MinimumLeafNumber.FixedValue = 8
              [Phenology].VrnSensitivity.FixedValue = 10
              [Phenology].PpSensitivity.FixedValue = 0
              [Phenology].HeadEmergenceLongDayBase.FixedValue = 4
              [Structure].Phyllochron.BasePhyllochron.FixedValue = 100
              [Phenology].DailyVernalisation.TempResponseProfile.Response.X = 0,1,8
              [Phenology].DailyVernalisation.TempResponseProfile.Response.Y = 0,1.204,0
              [Leaf].ExtinctionCoeff.VegetativePhase.FixedValue = 0.7
              [Grain].NumberFunction.GrainNumber.GrainsPerGramOfStem.FixedValue = 22
              [Grain].MaximumPotentialGrainSize.FixedValue = 0.035
              [Leaf].CohortParameters.MaxArea.AreaLargestLeaves.FixedValue = 3000
          Cultivar Weston
            Command:
              [Phenology].MinimumLeafNumber.FixedValue = 9
              [Phenology].VrnSensitivity.FixedValue = 7
              [Phenology].PpSensitivity.FixedValue = 3
        CultivarFolder Australia
          Cultivar Axe
            Command:
              [Phenology].MinimumLeafNumber.FixedValue = 5
              [Phenology].VrnSensitivity.FixedValue = 0
              [Phenology].PpSensitivity.FixedValue = 4
              [Phenology].HeadEmergencePpSensitivity.FixedValue = 0
              [Structure].Phyllochron.BasePhyllochron.FixedValue = 100
          Cultivar Bolac
            Command:
              [Phenology].MinimumLeafNumber.FixedValue = 6
              [Phenology].VrnSensitivity.FixedValue = 0
              [Phenology].PpSensitivity.FixedValue = 4
              [Structure].Phyllochron.BasePhyllochron.FixedValue = 100
          Cultivar Cunningham
            Command:
              [Phenology].MinimumLeafNumber.FixedValue = 6
              [Phenology].VrnSensitivity.FixedValue = 0
              [Phenology].PpSensitivity.FixedValue = 4
              [Structure].Phyllochron.BasePhyllochron.FixedValue = 100
            Alias Anlace
            Alias Arrivato
            Alias Babbler
            Alias Barham
            Alias Baxter
            Alias Bowie
            Alias Buckley
            Alias Burunga
            Alias Camm
            Alias Carinya
            Alias Chief
            Alias Dagger
            Alias Aurora
            Alias Elmore
            Alias Espada
            Alias Frame
            Alias Gazelle
            Alias Halberd
            Alias Meteor
            Alias Preston
            Alias Saphire
            Alias Stiletto
            Alias Wallup
          Cultivar Derrimut
            Command:
              [Phenology].MinimumLeafNumber.FixedValue = 6
              [Phenology].VrnSensitivity.FixedValue = 0
              [Phenology].PpSensitivity.FixedValue = 4
              [Structure].Phyllochron.BasePhyllochron.FixedValue = 100
          Cultivar Gregory
            Command:
              [Phenology].MinimumLeafNumber.FixedValue = 6
              [Phenology].VrnSensitivity.FixedValue = 1
              [Phenology].PpSensitivity.FixedValue = 4
              [Structure].Phyllochron.BasePhyllochron.FixedValue = 85
            Alias Suneca
          Cultivar Gamenya
            Command:
              [Phenology].MinimumLeafNumber.FixedValue = 5
              [Phenology].VrnSensitivity.FixedValue = 0
              [Phenology].PpSensitivity.FixedValue = 3.5
              [Structure].Phyllochron.BasePhyllochron.FixedValue = 100
              [Phenology].HeadEmergencePpSensitivity.FixedValue = 0
              [Phenology].HeadEmergenceLongDayBase.FixedValue
          Cultivar Gauntlet
            Command:
              [Phenology].MinimumLeafNumber.FixedValue = 5
              [Phenology].VrnSensitivity.FixedValue = 0
              [Phenology].PpSensitivity.FixedValue = 4
              [Structure].Phyllochron.BasePhyllochron.FixedValue = 100
            Alias Chara
            Alias Drysdale
            Alias Envoy
            Alias Estoc
            Alias Giles
            Alias Harper
            Alias Krichauff
            Alias Phantom
            Alias Pugsley
            Alias Sentinel
            Alias Silverstar
            Alias Sunlin
            Alias Sunvale
          Cultivar Gladius
            Command:
              [Phenology].MinimumLeafNumber.FixedValue = 6
              [Phenology].VrnSensitivity.FixedValue = 0
              [Phenology].PpSensitivity.FixedValue = 5
              [Structure].Phyllochron.BasePhyllochron.FixedValue = 100
          Cultivar Gutha
            Command:
              [Phenology].MinimumLeafNumber.FixedValue = 6
              [Phenology].VrnSensitivity.FixedValue = 0
              [Phenology].PpSensitivity.FixedValue = 5
              [Structure].Phyllochron.BasePhyllochron.FixedValue = 100
              [Grain].MaximumPotentialGrainSize.FixedValue = 0.041
              [Grain].NumberFunction.GrainNumber.GrainsPerGramOfStem.FixedValue = 17
          Cultivar H45
            Command:
              [Phenology].MinimumLeafNumber.FixedValue = 6
              [Phenology].VrnSensitivity.FixedValue = 0
              [Phenology].PpSensitivity.FixedValue = 4
              [Structure].Phyllochron.BasePhyllochron.FixedValue = 100
              [Grain].NumberFunction.GrainNumber.GrainsPerGramOfStem.FixedValue = 20
            Alias Saintly
            Alias Tamarinrock
            Alias Waagin
            Alias Wollaroi
            Alias Zippy
          Cultivar H46
            Command:
              [Phenology].MinimumLeafNumber.FixedValue = 8
              [Phenology].VrnSensitivity.FixedValue = 0
              [Phenology].PpSensitivity.FixedValue = 4
              [Structure].Phyllochron.BasePhyllochron.FixedValue = 100
          Cultivar Hartog
            Command:
              [Phenology].MinimumLeafNumber.FixedValue = 6
              [Phenology].VrnSensitivity.FixedValue = 0
              [Phenology].PpSensitivity.FixedValue = 5
              [Structure].Phyllochron.BasePhyllochron.FixedValue = 100
              [Grain].MaximumPotentialGrainSize.FixedValue = 0.041
            Alias Annuello
            Alias Carnamah
            Alias Cobra
            Alias Corack
            Alias Correll
            Alias Diamondbird
            Alias Goroke
            Alias Guardian
            Alias Impala
            Alias Justica
            Alias Kord
            Alias Merlin
            Alias Mitre
            Alias Shield
            Alias Sunguard
            Alias Yallaroi
            Alias Yawa
          Cultivar Wills
            Command:
              [Phenology].MinimumLeafNumber.FixedValue = 7
              [Phenology].VrnSensitivity.FixedValue = 0
              [Phenology].PpSensitivity.FixedValue = 4
              [Phenology].HeadEmergenceLongDayBase.FixedValue = 3.5
              [Structure].Phyllochron.BasePhyllochron.FixedValue = 70
          Cultivar Mercury
            Command:
              [Phenology].MinimumLeafNumber.FixedValue = 7
              [Phenology].VrnSensitivity.FixedValue = 0
              [Phenology].PpSensitivity.FixedValue = 4
              [Phenology].HeadEmergenceLongDayBase.FixedValue = 3.5
              [Structure].Phyllochron.BasePhyllochron.FixedValue = 80
            Alias Arrino
            Alias BonnieRock
            Alias Bowerbird
            Alias Dart
            Alias Dollarbird
            Alias EmuRock
            Alias Hyperno
            Alias Impose
            Alias Kalka
            Alias Kukri
            Alias Hunter
            Alias Arrow
            Alias Tamaroi
            Alias Katana
          Cultivar Batavia
            Command:
              [Phenology].MinimumLeafNumber.FixedValue = 7
              [Phenology].VrnSensitivity.FixedValue = 0
              [Phenology].PpSensitivity.FixedValue = 5
              [Structure].Phyllochron.BasePhyllochron.FixedValue = 100
          Cultivar Egret
            Command:
              [Phenology].MinimumLeafNumber.FixedValue = 7
              [Phenology].VrnSensitivity.FixedValue = 0
              [Phenology].PpSensitivity.FixedValue = 5
              [Structure].Phyllochron.BasePhyllochron.FixedValue =80
          Cultivar Janz
            Command:
              [Phenology].MinimumLeafNumber.FixedValue = 6
              [Phenology].VrnSensitivity.FixedValue = 1
              [Phenology].PpSensitivity.FixedValue = 4
              [Structure].Phyllochron.BasePhyllochron.FixedValue = 100
          Cultivar Kellalac
            Command:
              [Phenology].MinimumLeafNumber.FixedValue = 8
              [Phenology].VrnSensitivity.FixedValue = 0
              [Phenology].PpSensitivity.FixedValue = 4
              [Structure].Phyllochron.BasePhyllochron.FixedValue = 100
            Alias Endure
            Alias Scenario
            Alias Zen
          Cultivar Kennedy
            Command:
              [Phenology].MinimumLeafNumber.FixedValue = 8
              [Phenology].VrnSensitivity.FixedValue = 0
              [Phenology].PpSensitivity.FixedValue = 4
              [Structure].Phyllochron.BasePhyllochron.FixedValue = 100
          Cultivar Lang
            Command:
              [Phenology].MinimumLeafNumber.FixedValue = 6
              [Phenology].VrnSensitivity.FixedValue = 0
              [Phenology].PpSensitivity.FixedValue = 5
              [Structure].Phyllochron.BasePhyllochron.FixedValue = 100
          Cultivar Livingston
            Command:
              [Phenology].MinimumLeafNumber.FixedValue = 5
              [Phenology].VrnSensitivity.FixedValue = 0
              [Phenology].PpSensitivity.FixedValue = 4
              [Structure].Phyllochron.BasePhyllochron.FixedValue = 100
          Cultivar Lincoln
            Command:
              [Phenology].MinimumLeafNumber.FixedValue = 6
              [Phenology].VrnSensitivity.FixedValue = 0
              [Phenology].PpSensitivity.FixedValue = 4
              [Structure].Phyllochron.BasePhyllochron.FixedValue = 100
          Cultivar Mace
            Command:
              [Phenology].MinimumLeafNumber.FixedValue = 6
              [Phenology].VrnSensitivity.FixedValue = 0
              [Phenology].PpSensitivity.FixedValue = 4
              [Structure].Phyllochron.BasePhyllochron.FixedValue = 100
          Cultivar MacKellar
            Command:
              [Phenology].MinimumLeafNumber.FixedValue = 7
              [Phenology].VrnSensitivity.FixedValue = 5
              [Phenology].PpSensitivity.FixedValue = 5
              [Phenology].HeadEmergenceLongDayBase.FixedValue = 3.5
              [Structure].Phyllochron.BasePhyllochron.FixedValue = 100
            Alias Adagio
            Alias Brennan
            Alias Declic
          Cultivar Matong
            Command:
              [Phenology].MinimumLeafNumber.FixedValue = 7
              [Phenology].VrnSensitivity.FixedValue = 1
              [Phenology].PpSensitivity.FixedValue = 4
              [Structure].Phyllochron.BasePhyllochron.FixedValue = 100
              [Grain].NumberFunction.GrainNumber.GrainsPerGramOfStem.FixedValue = 22
          Cultivar McCubbin
            Command:
              [Phenology].MinimumLeafNumber.FixedValue = 8
              [Phenology].VrnSensitivity.FixedValue = 0
              [Phenology].PpSensitivity.FixedValue = 5
              [Structure].Phyllochron.BasePhyllochron.FixedValue = 90
          Cultivar Ruby
            Command:
              [Phenology].MinimumLeafNumber.FixedValue = 8
              [Phenology].VrnSensitivity.FixedValue = 0
              [Phenology].PpSensitivity.FixedValue = 4
              [Structure].Phyllochron.BasePhyllochron.FixedValue = 100
          Cultivar Spear
            Command:
              [Phenology].MinimumLeafNumber.FixedValue = 7
              [Phenology].VrnSensitivity.FixedValue = 0
              [Phenology].PpSensitivity.FixedValue = 4
              [Structure].Phyllochron.BasePhyllochron.FixedValue = 100
              [Grain].MaximumPotentialGrainSize.FixedValue = 0.045
          Cultivar Sunbri
            Command:
              [Phenology].MinimumLeafNumber.FixedValue = 7
              [Phenology].VrnSensitivity.FixedValue = 0
              [Phenology].PpSensitivity.FixedValue = 5
              [Structure].Phyllochron.BasePhyllochron.FixedValue = 100
          Cultivar Sunco
            Command:
              [Phenology].MinimumLeafNumber.FixedValue = 6.5
              [Phenology].VrnSensitivity.FixedValue = 0
              [Phenology].PpSensitivity.FixedValue = 3.5
              [Phenology].HeadEmergencePpSensitivity.FixedValue = 4
              [Structure].Phyllochron.BasePhyllochron.FixedValue = 100
            Alias Advantage
            Alias Bellaroi
            Alias Caparoi
          Cultivar Ventura
            Command:
              [Phenology].MinimumLeafNumber.FixedValue = 8
              [Phenology].VrnSensitivity.FixedValue = 0
              [Phenology].PpSensitivity.FixedValue = 4
              [Structure].Phyllochron.BasePhyllochron.FixedValue = 100
          Cultivar Eaglehawk
            Command:
              [Phenology].MinimumLeafNumber.FixedValue = 8
              [Phenology].VrnSensitivity.FixedValue = 0
              [Phenology].PpSensitivity.FixedValue = 4
              [Structure].Phyllochron.BasePhyllochron.FixedValue = 90
          Cultivar Wedgetail
            Command:
              [Phenology].MinimumLeafNumber.FixedValue = 8
              [Phenology].VrnSensitivity.FixedValue = 0
              [Phenology].PpSensitivity.FixedValue = 4
              [Structure].Phyllochron.BasePhyllochron.FixedValue = 100
            Alias Lorikeet
            Alias Wylah
          Cultivar Westonia
            Command:
              [Phenology].MinimumLeafNumber.FixedValue = 5
              [Phenology].VrnSensitivity.FixedValue = 0
              [Phenology].PpSensitivity.FixedValue = 4
              [Structure].Phyllochron.BasePhyllochron.FixedValue = 100
          Cultivar Wilgoyne
            Command:
              [Phenology].MinimumLeafNumber.FixedValue = 6
              [Phenology].VrnSensitivity.FixedValue = 0
              [Phenology].PpSensitivity.FixedValue = 4
              [Structure].Phyllochron.BasePhyllochron.FixedValue = 100
              [Grain].NumberFunction.GrainNumber.GrainsPerGramOfStem.FixedValue = 20
              [Grain].MaximumPotentialGrainSize.FixedValue = 0.045
          Cultivar Wyalkatchem
            Command:
              [Phenology].MinimumLeafNumber.FixedValue = 8
              [Phenology].VrnSensitivity.FixedValue = 0
              [Phenology].PpSensitivity.FixedValue = 4
              [Structure].Phyllochron.BasePhyllochron.FixedValue = 100
          Cultivar Yitpi
            Command:
              [Phenology].MinimumLeafNumber.FixedValue = 8
              [Phenology].VrnSensitivity.FixedValue = 0
              [Phenology].PpSensitivity.FixedValue = 5
              [Phenology].HeadEmergenceLongDayBase.FixedValue = 2.5
              [Phenology].HeadEmergencePpSensitivity.FixedValue = 5
              [Structure].Phyllochron.BasePhyllochron.FixedValue = 80
          Cultivar Young
            Command:
              [Phenology].MinimumLeafNumber.FixedValue = 8
              [Phenology].VrnSensitivity.FixedValue = 0
              [Phenology].PpSensitivity.FixedValue = 4
              [Structure].Phyllochron.BasePhyllochron.FixedValue = 100
          Cultivar Scepter
            Command:
              [Phenology].MinimumLeafNumber.FixedValue = 6.3
              [Phenology].PpSensitivity.FixedValue = 1.7
              [Phenology].VrnSensitivity.FixedValue = 5.0
          Cultivar Cutlass
            Command:
              [Phenology].MinimumLeafNumber.FixedValue = 5.7
              [Phenology].PpSensitivity.FixedValue = 5.3
              [Phenology].VrnSensitivity.FixedValue = 2.3
          Cultivar Longsword
            Command:
              [Phenology].MinimumLeafNumber.FixedValue = 8.0
              [Phenology].PpSensitivity.FixedValue = 1.7
              [Phenology].VrnSensitivity.FixedValue = 8.0
          Cultivar CSIROW007
            Command:
              [Phenology].MinimumLeafNumber.FixedValue = 7.3
              [Phenology].PpSensitivity.FixedValue = 0.0
              [Phenology].VrnSensitivity.FixedValue = 6.3
          Cultivar CSIROW023
            Command:
              [Phenology].MinimumLeafNumber.FixedValue = 7.0
              [Phenology].PpSensitivity.FixedValue = 1.7
              [Phenology].VrnSensitivity.FixedValue = 5.3
          Cultivar CSIROW073
            Command:
              [Phenology].MinimumLeafNumber.FixedValue = 7.7
              [Phenology].PpSensitivity.FixedValue = 1.3
              [Phenology].VrnSensitivity.FixedValue = 6.3
        CultivarFolder Turkey
          Cultivar Konya
            Command:
              [Phenology].MinimumLeafNumber.FixedValue = 7
              [Phenology].VrnSensitivity.FixedValue = 4
              [Phenology].PpSensitivity.FixedValue = 4
              [Structure].Phyllochron.BasePhyllochron.FixedValue = 100
              [Grain].NumberFunction.GrainNumber.GrainsPerGramOfStem.FixedValue = 16
              [Grain].MaximumPotentialGrainSize.FixedValue = 0.050
              [Grain].MaximumNConc.FixedValue = 0.026
              [Phenology].GrainFilling.Target.FixedValue = 450
              [Stem].DMRetranslocationFactor.ReproductiveGrowth.DMRetranslocationFactor.FixedValue = 0.2
              [Stem].DMDemands.Structural.StructuralFraction.VegetativeGrowth.Fraction.FixedValue = 0.6
              [Leaf].ExtinctionCoeff.VegetativePhase.FixedValue = 0.8
        CultivarFolder China
          Cultivar Keyu13
            Command:
              [Phenology].MinimumLeafNumber.FixedValue = 7
              [Phenology].VrnSensitivity.FixedValue = 5
              [Phenology].PpSensitivity.FixedValue = 3
              [Structure].Phyllochron.BasePhyllochron.FixedValue = 100
        CultivarFolder USA
          Cultivar Yecora
            Command:
              [Phenology].MinimumLeafNumber.FixedValue = 6
              [Phenology].VrnSensitivity.FixedValue = 0
              [Phenology].PpSensitivity.FixedValue = 4
              [Structure].Phyllochron.BasePhyllochron.FixedValue  = 120
              [Leaf].CohortParameters.MaxArea.AreaLargestLeaves.FixedValue = 4000
          Cultivar Rex
            Command:
              [Phenology].MinimumLeafNumber.FixedValue = 7
              [Phenology].VrnSensitivity.FixedValue = 6
              [Phenology].PpSensitivity.FixedValue = 4
              [Grain].NumberFunction.GrainNumber.GrainsPerGramOfStem.FixedValue = 18
              [Grain].MaximumNConc.FixedValue = 0.02
          Cultivar Nugaines
            Command:
              [Phenology].MinimumLeafNumber.FixedValue = 7
              [Phenology].VrnSensitivity.FixedValue = 6
              [Phenology].PpSensitivity.FixedValue = 4
              [Grain].NumberFunction.GrainNumber.GrainsPerGramOfStem.FixedValue = 20
              [Grain].MaximumNConc.FixedValue = 0.02
          Cultivar Hyslop
            Command:
              [Phenology].MinimumLeafNumber.FixedValue = 7
              [Phenology].VrnSensitivity.FixedValue = 6
              [Phenology].PpSensitivity.FixedValue = 4
              [Grain].NumberFunction.GrainNumber.GrainsPerGramOfStem.FixedValue = 22
              [Grain].MaximumNConc.FixedValue = 0.02
          Cultivar Stephens
            Command:
              [Phenology].MinimumLeafNumber.FixedValue = 7
              [Phenology].VrnSensitivity.FixedValue = 6
              [Phenology].PpSensitivity.FixedValue = 4
              [Grain].NumberFunction.GrainNumber.GrainsPerGramOfStem.FixedValue = 25
              [Grain].MaximumNConc.FixedValue = 0.02
        CultivarFolder Europe
          Cultivar Dekan
            Command:
              [Phenology].MinimumLeafNumber.FixedValue = 9
              [Phenology].VrnSensitivity.FixedValue = 7
              [Phenology].PpSensitivity.FixedValue = 3
              [Phenology].HeadEmergencePpSensitivity.FixedValue = 3
              [Structure].Phyllochron.BasePhyllochron.FixedValue = 100
              [Leaf].ExtinctionCoeff.VegetativePhase.FixedValue = 0.8
          Cultivar Rosario
            Command:
              [Phenology].MinimumLeafNumber.FixedValue = 9
              [Phenology].VrnSensitivity.FixedValue = 7
              [Phenology].PpSensitivity.FixedValue = 3
              [Phenology].HeadEmergencePpSensitivity.FixedValue = 3
              [Structure].Phyllochron.BasePhyllochron.FixedValue = 100
              [Leaf].ExtinctionCoeff.VegetativePhase.FixedValue = 0.8
          Cultivar Ararat
            Command:
              [Phenology].MinimumLeafNumber.FixedValue = 9
              [Phenology].VrnSensitivity.FixedValue = 7
              [Phenology].PpSensitivity.FixedValue = 3
              [Phenology].HeadEmergencePpSensitivity.FixedValue = 3
              [Structure].Phyllochron.BasePhyllochron.FixedValue = 100
              [Leaf].ExtinctionCoeff.VegetativePhase.FixedValue = 0.8
          Cultivar Tybalt
            Command:
              [Phenology].MinimumLeafNumber.FixedValue = 9
              [Phenology].VrnSensitivity.FixedValue = 0
              [Phenology].PpSensitivity.FixedValue = 0
              [Structure].Phyllochron.BasePhyllochron.FixedValue = 90
        CultivarFolder Africa
          Cultivar HAR1685
            Command:
              [Phenology].MinimumLeafNumber.FixedValue = 7
              [Phenology].VrnSensitivity.FixedValue = 0
              [Phenology].PpSensitivity.FixedValue = 3
              [Structure].Phyllochron.BasePhyllochron.FixedValue = 100
              [Grain].NumberFunction.GrainNumber.GrainsPerGramOfStem.FixedValue = 17
              [Phenology].GrainFilling.Target.FixedValue = 350
        CultivarFolder Iran
          Cultivar Gorgan
            Command:
              [Phenology].MinimumLeafNumber.FixedValue = 7
              [Phenology].VrnSensitivity.FixedValue = 0
              [Phenology].PpSensitivity.FixedValue = 4
              [Structure].Phyllochron.BasePhyllochron.FixedValue = 100
        CultivarFolder Just Added
          Cultivar Adv08_0008
            Command:
              [Structure].Phyllochron.BasePhyllochron.FixedValue = 100.4
              [Phenology].MinimumLeafNumber.FixedValue = 8.0
              [Phenology].PpSensitivity.FixedValue = 1.7
              [Phenology].VrnSensitivity.FixedValue = 5.0
          Cultivar Bennett
            Command:
              [Structure].Phyllochron.BasePhyllochron.FixedValue = 95.1
              [Phenology].MinimumLeafNumber.FixedValue = 8.3
              [Phenology].PpSensitivity.FixedValue = 0.7
              [Phenology].VrnSensitivity.FixedValue = 5.7
          Cultivar Scythe
            Command:
              [Structure].Phyllochron.BasePhyllochron.FixedValue = 84.4
              [Phenology].MinimumLeafNumber.FixedValue = 6.7
              [Phenology].PpSensitivity.FixedValue = 2.0
              [Phenology].VrnSensitivity.FixedValue = 5.7
          Cultivar Beaufort
            Command:
              [Structure].Phyllochron.BasePhyllochron.FixedValue = 100.0
              [Phenology].MinimumLeafNumber.FixedValue = 9.0
              [Phenology].PpSensitivity.FixedValue = 1.0
              [Phenology].VrnSensitivity.FixedValue = 6.3
          Cultivar Braewood
            Command:
              [Structure].Phyllochron.BasePhyllochron.FixedValue = 91.5
              [Phenology].MinimumLeafNumber.FixedValue = 7.3
              [Phenology].PpSensitivity.FixedValue = 3.7
              [Phenology].VrnSensitivity.FixedValue = 1.3
          Cultivar Calingiri
            Command:
              [Structure].Phyllochron.BasePhyllochron.FixedValue = 80.8
              [Phenology].MinimumLeafNumber.FixedValue = 7.7
              [Phenology].PpSensitivity.FixedValue = 1.0
              [Phenology].VrnSensitivity.FixedValue = 3.7
          Cultivar Catalina
            Command:
              [Structure].Phyllochron.BasePhyllochron.FixedValue = 91.8
              [Phenology].MinimumLeafNumber.FixedValue = 6.0
              [Phenology].PpSensitivity.FixedValue = 2.3
              [Phenology].VrnSensitivity.FixedValue = 1.0
          Cultivar Condo
            Command:
              [Structure].Phyllochron.BasePhyllochron.FixedValue = 73.6
              [Phenology].MinimumLeafNumber.FixedValue = 7.0
              [Phenology].PpSensitivity.FixedValue = 1.7
              [Phenology].VrnSensitivity.FixedValue = 4.0
          Cultivar Crusader
            Command:
              [Structure].Phyllochron.BasePhyllochron.FixedValue = 76.0
              [Phenology].MinimumLeafNumber.FixedValue = 6.0
              [Phenology].PpSensitivity.FixedValue = 2.0
              [Phenology].VrnSensitivity.FixedValue = 6.7
          Cultivar CSIROW002
            Command:
              [Structure].Phyllochron.BasePhyllochron.FixedValue = 88.9
              [Phenology].MinimumLeafNumber.FixedValue = 6.3
              [Phenology].PpSensitivity.FixedValue = 1.0
              [Phenology].VrnSensitivity.FixedValue = 3.7
          Cultivar CSIROW003
            Command:
              [Structure].Phyllochron.BasePhyllochron.FixedValue = 90.1
              [Phenology].MinimumLeafNumber.FixedValue = 6.0
              [Phenology].PpSensitivity.FixedValue = 0.7
              [Phenology].VrnSensitivity.FixedValue = 4.0
          Cultivar CSIROW005
            Command:
              [Structure].Phyllochron.BasePhyllochron.FixedValue = 81.3
              [Phenology].MinimumLeafNumber.FixedValue = 6.7
              [Phenology].PpSensitivity.FixedValue = 0.7
              [Phenology].VrnSensitivity.FixedValue = 5.0
          Cultivar CSIROW011
            Command:
              [Structure].Phyllochron.BasePhyllochron.FixedValue = 93.0
              [Phenology].MinimumLeafNumber.FixedValue = 6.0
              [Phenology].PpSensitivity.FixedValue = 1.0
              [Phenology].VrnSensitivity.FixedValue = 0.0
          Cultivar CSIROW018
            Command:
              [Structure].Phyllochron.BasePhyllochron.FixedValue = 89.2
              [Phenology].MinimumLeafNumber.FixedValue = 6.0
              [Phenology].PpSensitivity.FixedValue = 1.3
              [Phenology].VrnSensitivity.FixedValue = 3.7
          Cultivar CSIROW021
            Command:
              [Structure].Phyllochron.BasePhyllochron.FixedValue = 85.1
              [Phenology].MinimumLeafNumber.FixedValue = 8.0
              [Phenology].PpSensitivity.FixedValue = 1.3
              [Phenology].VrnSensitivity.FixedValue = 5.3
          Cultivar CSIROW027
            Command:
              [Structure].Phyllochron.BasePhyllochron.FixedValue = 89.2
              [Phenology].MinimumLeafNumber.FixedValue = 5.7
              [Phenology].PpSensitivity.FixedValue = 1.0
              [Phenology].VrnSensitivity.FixedValue = 0.3
          Cultivar CSIROW029
            Command:
              [Structure].Phyllochron.BasePhyllochron.FixedValue = 96.6
              [Phenology].MinimumLeafNumber.FixedValue = 5.7
              [Phenology].PpSensitivity.FixedValue = 0.3
              [Phenology].VrnSensitivity.FixedValue = 0.3
          Cultivar CSIROW077
            Command:
              [Structure].Phyllochron.BasePhyllochron.FixedValue = 93.7
              [Phenology].MinimumLeafNumber.FixedValue = 5.3
              [Phenology].PpSensitivity.FixedValue = 0.7
              [Phenology].VrnSensitivity.FixedValue = 0.7
          Cultivar CSIROW087
            Command:
              [Structure].Phyllochron.BasePhyllochron.FixedValue = 91.5
              [Phenology].MinimumLeafNumber.FixedValue = 6.0
              [Phenology].PpSensitivity.FixedValue = 1.3
              [Phenology].VrnSensitivity.FixedValue = 0.0
          Cultivar CSIROW102
            Command:
              [Structure].Phyllochron.BasePhyllochron.FixedValue = 92.9
              [Phenology].MinimumLeafNumber.FixedValue = 6.0
              [Phenology].PpSensitivity.FixedValue = 1.0
              [Phenology].VrnSensitivity.FixedValue = 2.0
          Cultivar CSIROW105
            Command:
              [Structure].Phyllochron.BasePhyllochron.FixedValue = 94.0
              [Phenology].MinimumLeafNumber.FixedValue = 5.0
              [Phenology].PpSensitivity.FixedValue = 1.0
              [Phenology].VrnSensitivity.FixedValue = 1.0
          Cultivar Hume
            Command:
              [Structure].Phyllochron.BasePhyllochron.FixedValue = 97.0
              [Phenology].MinimumLeafNumber.FixedValue = 6.0
              [Phenology].PpSensitivity.FixedValue = 2.7
              [Phenology].VrnSensitivity.FixedValue = 1.0
          Cultivar Ellison
            Command:
              [Structure].Phyllochron.BasePhyllochron.FixedValue = 103.7
              [Phenology].MinimumLeafNumber.FixedValue = 6.0
              [Phenology].PpSensitivity.FixedValue = 4.0
              [Phenology].VrnSensitivity.FixedValue = 4.7
          Cultivar Emu_Rock
            Command:
              [Structure].Phyllochron.BasePhyllochron.FixedValue = 95.7
              [Phenology].MinimumLeafNumber.FixedValue = 6.0
              [Phenology].PpSensitivity.FixedValue = 1.3
              [Phenology].VrnSensitivity.FixedValue = 0.0
          Cultivar Forrest
            Command:
              [Structure].Phyllochron.BasePhyllochron.FixedValue = 88.0
              [Phenology].MinimumLeafNumber.FixedValue = 6.0
              [Phenology].PpSensitivity.FixedValue = 5.0
              [Phenology].VrnSensitivity.FixedValue = 1.3
          Cultivar Grenade
            Command:
              [Structure].Phyllochron.BasePhyllochron.FixedValue = 97.5
              [Phenology].MinimumLeafNumber.FixedValue = 6.0
              [Phenology].PpSensitivity.FixedValue = 2.7
              [Phenology].VrnSensitivity.FixedValue = 1.3
          Cultivar Kittyhawk
            Command:
              [Structure].Phyllochron.BasePhyllochron.FixedValue = 82.8
              [Phenology].MinimumLeafNumber.FixedValue = 8.0
              [Phenology].PpSensitivity.FixedValue = 3.0
              [Phenology].VrnSensitivity.FixedValue = 9.0
          Cultivar Lancer
            Command:
              [Structure].Phyllochron.BasePhyllochron.FixedValue = 92.3
              [Phenology].MinimumLeafNumber.FixedValue = 7.0
              [Phenology].PpSensitivity.FixedValue = 3.7
              [Phenology].VrnSensitivity.FixedValue = 0.7
          Cultivar Nighthawk
            Command:
              [Structure].Phyllochron.BasePhyllochron.FixedValue = 91.7
              [Phenology].MinimumLeafNumber.FixedValue = 8.0
              [Phenology].PpSensitivity.FixedValue = 1.7
              [Phenology].VrnSensitivity.FixedValue = 4.0
          Cultivar Magenta
            Command:
              [Structure].Phyllochron.BasePhyllochron.FixedValue = 99.4
              [Phenology].MinimumLeafNumber.FixedValue = 6.7
              [Phenology].PpSensitivity.FixedValue = 1.7
              [Phenology].VrnSensitivity.FixedValue = 5.7
          Cultivar Manning
            Command:
              [Structure].Phyllochron.BasePhyllochron.FixedValue = 109.8
              [Phenology].MinimumLeafNumber.FixedValue = 9.0
              [Phenology].PpSensitivity.FixedValue = 2.3
              [Phenology].VrnSensitivity.FixedValue = 5.0
          Cultivar Merinda
            Command:
              [Structure].Phyllochron.BasePhyllochron.FixedValue = 94.9
              [Phenology].MinimumLeafNumber.FixedValue = 7.3
              [Phenology].PpSensitivity.FixedValue = 1.0
              [Phenology].VrnSensitivity.FixedValue = 0.0
          Cultivar Mitch
            Command:
              [Structure].Phyllochron.BasePhyllochron.FixedValue = 76.6
              [Phenology].MinimumLeafNumber.FixedValue = 7.0
              [Phenology].PpSensitivity.FixedValue = 2.0
              [Phenology].VrnSensitivity.FixedValue = 4.0
          Cultivar Ouyen
            Command:
              [Structure].Phyllochron.BasePhyllochron.FixedValue = 81.7
              [Phenology].MinimumLeafNumber.FixedValue = 6.7
              [Phenology].PpSensitivity.FixedValue = 3.3
              [Phenology].VrnSensitivity.FixedValue = 1.0
          Cultivar Peake
            Command:
              [Structure].Phyllochron.BasePhyllochron.FixedValue = 79.3
              [Phenology].MinimumLeafNumber.FixedValue = 6.0
              [Phenology].PpSensitivity.FixedValue = 2.3
              [Phenology].VrnSensitivity.FixedValue = 1.0
          Cultivar Revenue
            Command:
              [Structure].Phyllochron.BasePhyllochron.FixedValue = 109.7
              [Phenology].MinimumLeafNumber.FixedValue = 9.0
              [Phenology].PpSensitivity.FixedValue = 1.5
              [Phenology].VrnSensitivity.FixedValue = 7.5
          Cultivar Rosella
            Command:
              [Structure].Phyllochron.BasePhyllochron.FixedValue = 85.4
              [Phenology].MinimumLeafNumber.FixedValue = 8.7
              [Phenology].PpSensitivity.FixedValue = 2.7
              [Phenology].VrnSensitivity.FixedValue = 8.8
          Cultivar Scout
            Command:
              [Structure].Phyllochron.BasePhyllochron.FixedValue = 75.8
              [Phenology].MinimumLeafNumber.FixedValue = 7.0
              [Phenology].PpSensitivity.FixedValue = 1.3
              [Phenology].VrnSensitivity.FixedValue = 5.3
          Cultivar Spitfire
            Command:
              [Structure].Phyllochron.BasePhyllochron.FixedValue = 84.4
              [Phenology].MinimumLeafNumber.FixedValue = 7.0
              [Phenology].PpSensitivity.FixedValue = 1.3
              [Phenology].VrnSensitivity.FixedValue = 4.0
          Cultivar Strzelecki
            Command:
              [Structure].Phyllochron.BasePhyllochron.FixedValue = 82.7
              [Phenology].MinimumLeafNumber.FixedValue = 7.3
              [Phenology].PpSensitivity.FixedValue = 1.7
              [Phenology].VrnSensitivity.FixedValue = 5.3
          Cultivar Sunbee
            Command:
              [Structure].Phyllochron.BasePhyllochron.FixedValue = 91.3
              [Phenology].MinimumLeafNumber.FixedValue = 6.0
              [Phenology].PpSensitivity.FixedValue = 1.3
              [Phenology].VrnSensitivity.FixedValue = 4.0
          Cultivar Sunlamb
            Command:
              [Structure].Phyllochron.BasePhyllochron.FixedValue = 93.8
              [Phenology].MinimumLeafNumber.FixedValue = 7.3
              [Phenology].PpSensitivity.FixedValue = 3.7
              [Phenology].VrnSensitivity.FixedValue = 6.7
          Cultivar Sunstate
            Command:
              [Structure].Phyllochron.BasePhyllochron.FixedValue = 84.1
              [Phenology].MinimumLeafNumber.FixedValue = 6.7
              [Phenology].PpSensitivity.FixedValue = 1.0
              [Phenology].VrnSensitivity.FixedValue = 3.3
          Cultivar Suntop
            Command:
              [Structure].Phyllochron.BasePhyllochron.FixedValue = 92.2
              [Phenology].MinimumLeafNumber.FixedValue = 7.0
              [Phenology].PpSensitivity.FixedValue = 1.3
              [Phenology].VrnSensitivity.FixedValue = 1.0
          Cultivar Trojan
            Command:
              [Structure].Phyllochron.BasePhyllochron.FixedValue = 85.8
              [Phenology].MinimumLeafNumber.FixedValue = 6.7
              [Phenology].PpSensitivity.FixedValue = 3.3
              [Phenology].VrnSensitivity.FixedValue = 4.0
          Cultivar Illabo
            Command:
              [Structure].Phyllochron.BasePhyllochron.FixedValue = 92.0
              [Phenology].MinimumLeafNumber.FixedValue = 8.0
              [Phenology].PpSensitivity.FixedValue = 1.0
              [Phenology].VrnSensitivity.FixedValue = 6.7
          Cultivar Whistler
            Command:
              [Structure].Phyllochron.BasePhyllochron.FixedValue = 91.5
              [Phenology].MinimumLeafNumber.FixedValue = 8.3
              [Phenology].PpSensitivity.FixedValue = 2.0
              [Phenology].VrnSensitivity.FixedValue = 6.2
      Constant MortalityRate: FixedValue=0
    Plant Soybean: PlantType=Soybean; IsAlive=false; IsEnding=false; DaysAfterEnding=0
      OrganArbitrator Arbitrator: same as Replacements.Wheat.Arbitrator
      Phenology
        LinearInterpolationFunction PhotoperiodModifier
          XYPairs: X=[14.43, 21.19]; Y=[1, 0]
          VariableReference XValue: VariableName=[Phenology].Photoperiod
        HourlyInterpolation VegetativeThermalTime: agregationMethod=0
          XYPairs Response: X=[10, 20, 30, 40]; Y=[0, 10, 20, 0]
          ThreeHourSin InterpolationMethod
        HourlyInterpolation ReproductiveThermalTime: agregationMethod=0
          XYPairs Response: X=[10, 15, 30, 40]; Y=[5, 5, 20, 0]
          ThreeHourSin InterpolationMethod
        PhaseLookup ThermalTime
          PhaseLookupValue PreEmergence: Start=Sowing; End=Emergence
            VariableReference Base: VariableName=[Phenology].VegetativeThermalTime
          PhaseLookupValue VegetativeGrowth: Start=Emergence; End=EndCanopyDevelopment
            MultiplyFunction TT
              VariableReference Base: VariableName=[Phenology].VegetativeThermalTime
              VariableReference PPModifier: VariableName=[Phenology].PhotoperiodModifier
          PhaseLookupValue ReproductiveGrowth: Start=EndCanopyDevelopment; End=HarvestRipe
            MultiplyFunction TT
              VariableReference Base: VariableName=[Phenology].ReproductiveThermalTime
              VariableReference PPModifier: VariableName=[Phenology].PhotoperiodModifier
        PhotoperiodFunction Photoperiod: Twilight=0; DayLength=0
        GerminatingPhase Germinating: Start=Sowing; End=Germination
        EmergingPhase Emerging: ShootLag=10; ShootRate=1; Start=Germination; End=Emergence; TTForTimeStep=0
          VariableReference ThermalTime: VariableName=[Phenology].VegetativeThermalTime
        GenericPhase Vegetative: Start=Emergence; End=StartFlowering
          Constant Target: FixedValue=200
          VariableReference Progression: VariableName=[Phenology].ThermalTime
        GenericPhase EarlyFlowering: Start=StartFlowering; End=StartPodDevelopment
          Memo
            The duration of the grain filling phase has been taken from the model of Robertson et al (2002).
          Constant Target: FixedValue=200
          VariableReference Progression: VariableName=[Phenology].ThermalTime
        GenericPhase EarlyPodDevelopment: Start=StartPodDevelopment; End=StartGrainFilling
          Memo
            The duration of the grain filling phase has been taken from the model of Robertson et al (2002).
          Constant Target: FixedValue=140
          VariableReference Progression: VariableName=[Phenology].ThermalTime
        GenericPhase EarlyGrainFilling: Start=StartGrainFilling; End=EndCanopyDevelopment
          MultiplyFunction Target
            Constant FractionofGrainfilling: FixedValue=0.05
            VariableReference EntireGrainfilling
              VariableName=[Phenology].LateGrainFilling.Target.EntireGrainfillPeriod.FixedValue
          VariableReference Progression: VariableName=[Phenology].ThermalTime
        GenericPhase MidGrainFilling: Start=EndCanopyDevelopment; End=EndPodDevelopment
          MultiplyFunction Target
            Constant FractionofMidToLateGrainfilling: FixedValue=0.5
            SubtractFunction
              VariableReference EntireGrainfilling
                VariableName=[Phenology].LateGrainFilling.Target.EntireGrainfillPeriod.FixedValue
              VariableReference EarlyGrainfilling: VariableName=[Phenology].EarlyGrainFilling.Target
          VariableReference Progression: VariableName=[Phenology].ThermalTime
        GenericPhase LateGrainFilling: Start=EndPodDevelopment; End=EndGrainFill
          SubtractFunction Target
            Constant EntireGrainfillPeriod: FixedValue=500
            VariableReference EarlyGrainFillingTarget: VariableName=[Phenology].EarlyGrainFilling.Target
            VariableReference MidGrainFillingTarget: VariableName=[Phenology].MidGrainFilling.Target
          VariableReference Progression: VariableName=[Phenology].ThermalTime
        GenericPhase Maturing: Start=EndGrainFill; End=Maturity
          Constant Target: FixedValue=45
          VariableReference Progression: VariableName=[Phenology].ThermalTime
        GenericPhase Ripening: Start=Maturity; End=HarvestRipe
          Constant Target: FixedValue=45
          VariableReference Progression: VariableName=[Phenology].ThermalTime
        EndPhase ReadyForHarvesting: Start=HarvestRipe; End=Unused
          VariableReference ThermalTime: VariableName=[Phenology].ThermalTime
        OnEventFunction EmergenceDAS: SetEvent=Emergence; ReSetEvent=never
          Memo
            A function is used to provide maturity date as days after sowing(DAS).
          Constant PreEventValue: FixedValue=0
          VariableReference PostEventValue: VariableName=[Plant].DaysAfterSowing
        OnEventFunction FloweringDAS: SetEvent=StartFlowering; ReSetEvent=never
          Memo
            A function is used to provide flowering date as days after sowing(DAS).
          Constant PreEventValue: FixedValue=0
          VariableReference PostEventValue: VariableName=[Plant].DaysAfterSowing
        OnEventFunction MaturityDAS: SetEvent=Maturity; ReSetEvent=never
          Memo
            A function is used to provide maturity date as days after sowing(DAS).
          Constant PreEventValue: FixedValue=0
          VariableReference PostEventValue: VariableName=[Plant].DaysAfterSowing
      Structure: CohortInitialisationStage=Germination; LeafInitialisationStage=Emergence
        VariableReference ThermalTime: VariableName=[Phenology].VegetativeThermalTime
        Constant DroughtInducedBranchMortality: FixedValue=0
        LinearInterpolationFunction HeightModel
          XYPairs: X=[0, 300]; Y=[10, 750]
          VariableReference XValue: VariableName=[Stem].Live.Wt
        MultiplyFunction BranchingRate
          LinearInterpolationFunction Potential_Branching_Rate
            XYPairs: X=[0, 6, 7, 8, 9]; Y=[0, 0, 1, 0, 0]
            VariableReference XValue: VariableName=[Structure].LeafTipsAppeared
          LinearInterpolationFunction Cover_response
            XYPairs: X=[0, 0.17, 0.25]; Y=[1, 1, 0]
            VariableReference XValue: VariableName=[leaf].CoverGreen
          LinearInterpolationFunction CHO_response
            XYPairs: X=[0, 1, 10]; Y=[1, 1, 1]
            VariableReference XValue: VariableName=[Stem].Live.StorageWt
        Constant BranchMortality: FixedValue=0
        Constant StemSenescenceAge: FixedValue=0
        PhaseLookup FinalLeafNumber
          PhaseLookupValue VegetativeGrowth: Start=Sowing; End=EndCanopyDevelopment
            Constant MaximumValue: FixedValue=40
          PhaseLookupValue ReproductiveGrowth: Start=EndCanopyDevelopment; End=HarvestRipe
            VariableReference AppearedLeaves: VariableName=[Leaf].AppearedCohortNo
        Constant Phyllochron: FixedValue=45
      ReproductiveOrgan Grain: GrowthRespiration=0; MaintenanceRespiration=0
        Biomass Live: DMDOfStructural=0.6
        Biomass Dead: DMDOfStructural=0.6
        Constant PotentialHarvestIndex: FixedValue=0.5
        AddFunction FillingDuration
          VariableReference EarlyGrainFillingDuration: VariableName=[Phenology].EarlyGrainFilling.Target
          VariableReference MidGrainFillingDuration: VariableName=[Phenology].MidGrainFilling.Target
          VariableReference LateGrainFillingDuration: VariableName=[Phenology].LateGrainFilling.Target
        Constant MaximumPotentialGrainSize: FixedValue=0.19
        PhaseLookup DMDemandFunction
          PhaseLookupValue GrainFilling: Start=StartGrainFilling; End=EndGrainFill
            MultiplyFunction HIGrainDemand
              VariableReference AboveGroundWt: VariableName=[AboveGround].Wt
              DivideFunction HarvestIndexIncrease
                VariableReference PotentialHarvestIndex: VariableName=[Grain].PotentialHarvestIndex
                VariableReference FillingDuration: VariableName=[Grain].FillingDuration
              VariableReference ThermalTime: VariableName=[Phenology].ThermalTime
            FillingRateFunction
              VariableReference NumberFunction: VariableName=[Grain].NumberFunction
              VariableReference ThermalTime: VariableName=[Phenology].ThermalTime
              VariableReference PotentialSizeIncrement: VariableName=[Grain].MaximumPotentialGrainSize
              VariableReference FillingDuration: VariableName=[Grain].FillingDuration
        Constant MinimumNConc: FixedValue=0.05
        Constant MaximumNConc: FixedValue=0.058
        Constant WaterContent: FixedValue=0.12
        MultiplyFunction NFillingRate
          VariableReference NConc: VariableName=[Grain].MaximumNConc
          VariableReference DMDemand: VariableName=[Grain].DMDemandFunction
          VariableReference DMConversionEfficiency: VariableName=[Grain].DMConversionEfficiency
        PhaseLookup NFillingRateOLD
          PhaseLookupValue GrainFilling: Start=StartGrainFilling; End=EndGrainFill
            FillingRateFunction
              VariableReference NumberFunction: VariableName=[Grain].NumberFunction
              VariableReference ThermalTime: VariableName=[Phenology].ThermalTime
              MultiplyFunction PotentialSizeIncrement
                Constant MaximumFinalNConc: FixedValue=0.04
                VariableReference MaximumSize: VariableName=[Grain].MaximumPotentialGrainSize
              AddFunction FillingDuration
                VariableReference LatePodDevelopmentDuration: VariableName=[Phenology].LatePodDevelopment.Target
                VariableReference LateGrainFillingDuration1: VariableName=[Phenology].LateGrainFilling.Target
        MultiplyFunction NumberFunction
          Constant PeasPerPod: FixedValue=1
          VariableReference PodNumber: VariableName=[Shell].PodNumber
        BiomassRemoval BiomassRemovalDefaults
          OrganBiomassRemovalType Harvest: FractionLiveToRemove=1; FractionDeadToRemove=0; FractionLiveToResidue=0; FractionDeadToResidue=0
          OrganBiomassRemovalType Cut: FractionLiveToRemove=1; FractionDeadToRemove=0; FractionLiveToResidue=0; FractionDeadToResidue=0
          OrganBiomassRemovalType Prune: FractionLiveToRemove=0; FractionDeadToRemove=0; FractionLiveToResidue=0.8; FractionDeadToResidue=0
          OrganBiomassRemovalType Graze: FractionLiveToRemove=0.6; FractionDeadToRemove=0; FractionLiveToResidue=0.2; FractionDeadToResidue=0
        Constant DMConversionEfficiency: FixedValue=0.89
        Constant RemobilisationCost: FixedValue=0
        Constant CarbonConcentration: FixedValue=0.4
        DivideFunction HarvestIndex
          VariableReference GrainWt: VariableName=[Grain].Wt
          VariableReference AboveGroundWt: VariableName=[AboveGround].Wt
      Root: GrowthRespiration=0; MaintenanceRespiration=0
        RootShapeCylinder RootShape
        LinearInterpolationFunction KLModifier
          XYPairs: X=[0, 3]; Y=[1, 1]
          VariableReference XValue: VariableName=[Leaf].LAI
        HourlyInterpolation TemperatureEffect: agregationMethod=0
          XYPairs Response: X=[0, 26, 35]; Y=[1, 1, 1]
          ThreeHourSin InterpolationMethod
        Constant MaxDailyNUptake: FixedValue=6
        Constant SenescenceRate: FixedValue=0.005
        Constant MaximumRootDepth: FixedValue=1000000
        PhaseLookup RootFrontVelocity
          PhaseLookupValue PreEmergence: Start=Germination; End=Emergence
            Constant Function: FixedValue=5
          PhaseLookupValue early: Start=Emergence; End=StartGrainFilling
            Constant Function: FixedValue=30
          PhaseLookupValue late: Start=StartGrainFilling; End=Maturity
            Constant Function: FixedValue=5
        Constant MaximumNConc: FixedValue=0.01
        Constant MinimumNConc: FixedValue=0.005
        PhaseLookupValue NitrogenDemandSwitch: Start=Emergence; End=EndGrainFill
          Constant: FixedValue=1
        LinearInterpolationFunction KNO3
          XYPairs: X=[0, 0.003]; Y=[0.02, 0.02]
          VariableReference XValue: VariableName=[Root].LengthDensity
        LinearInterpolationFunction KNH4
          XYPairs: X=[0, 0.003]; Y=[0, 0]
          VariableReference XValue: VariableName=[Root].LengthDensity
        BiomassRemoval BiomassRemovalDefaults
          OrganBiomassRemovalType Harvest: FractionLiveToRemove=0; FractionDeadToRemove=0; FractionLiveToResidue=0.2; FractionDeadToResidue=0
          OrganBiomassRemovalType Cut: FractionLiveToRemove=0; FractionDeadToRemove=0; FractionLiveToResidue=0.3; FractionDeadToResidue=0
          OrganBiomassRemovalType Prune: FractionLiveToRemove=0; FractionDeadToRemove=0; FractionLiveToResidue=0.1; FractionDeadToResidue=0
          OrganBiomassRemovalType Graze: FractionLiveToRemove=0; FractionDeadToRemove=0; FractionLiveToResidue=0.15; FractionDeadToResidue=0
        LinearInterpolationFunction NUptakeSWFactor
          XYPairs: X=[0, 1]; Y=[0, 1]
          VariableReference XValue: VariableName=[Root].RWC
        Constant SpecificRootLength: FixedValue=40; Units=m/g
        Constant DMConversionEfficiency: FixedValue=1
        Constant MaintenanceRespirationFunction: FixedValue=1
        Constant RemobilisationCost: FixedValue=0
        Constant CarbonConcentration: FixedValue=0.4
        BiomassDemand DMDemands
          MultiplyFunction Structural
            PartitionFractionDemandFunction DMDemandFunction
              PhaseLookup PartitionFraction
                PhaseLookupValue Early: Start=Emergence; End=StartFlowering
                  Constant Function: FixedValue=0.2
                PhaseLookupValue Middle: Start=StartFlowering; End=StartGrainFilling
                  Constant Function: FixedValue=0.2
                PhaseLookupValue Late: Start=StartGrainFilling; End=Maturity
                  Constant Function: FixedValue=0.05
            Constant StructuralFraction: FixedValue=1
          Constant Metabolic: FixedValue=0
          StorageDMDemandFunction Storage
            SubtractFunction StorageFraction
              Constant One: FixedValue=1
              VariableReference StructuralFraction: VariableName=[Root].DMDemands.Structural.StructuralFraction
        BiomassDemand NDemands: same as Replacements.Wheat.Root.NDemands
        VariableReference CriticalNConc: VariableName=[Root].MinimumNConc
        BiomassDemand InitialWt
          Constant Structural: FixedValue=0.2; Units=g/plant
          Constant Metabolic: FixedValue=0
          Constant Storage: FixedValue=0
        Constant RootDepthStressFactor: FixedValue=1
      Nodule
        Constant FixationMetabolicCost: FixedValue=0
        Constant MaximumNConc: FixedValue=0.02
        Constant MinimumNConc: FixedValue=0.01
        Constant SenescenceRate: FixedValue=0
        Constant NReallocationFactor: FixedValue=0
        PhaseLookupValue NitrogenDemandSwitch: Start=Emergence; End=EndGrainFill
          Constant: FixedValue=1
        BiomassRemoval BiomassRemovalDefaults
          OrganBiomassRemovalType Harvest: FractionLiveToRemove=0.5; FractionDeadToRemove=0; FractionLiveToResidue=0.1; FractionDeadToResidue=0
          OrganBiomassRemovalType Cut: FractionLiveToRemove=0.8; FractionDeadToRemove=0; FractionLiveToResidue=0; FractionDeadToResidue=0
          OrganBiomassRemovalType Prune: FractionLiveToRemove=0; FractionDeadToRemove=0; FractionLiveToResidue=0.6; FractionDeadToResidue=0
          OrganBiomassRemovalType Graze: FractionLiveToRemove=0.6; FractionDeadToRemove=0; FractionLiveToResidue=0.2; FractionDeadToResidue=0
        Constant InitialWtFunction: FixedValue=0; Units=g/m^2
        Constant DetachmentRateFunction: FixedValue=0; Units=/d
        MultiplyFunction FixationRateOLD
          VariableReference NoduleWt: VariableName=[Nodule].Live.Wt
          Constant SpecificNitrogenaseActivity: FixedValue=0.1
          MinimumFunction StressFactor
            HourlyInterpolation FT: agregationMethod=0
              XYPairs Response: X=[0, 20, 30, 40]; Y=[0, 1, 1, 0]
              ThreeHourSin InterpolationMethod
            LinearInterpolationFunction FW
              XYPairs: X=[0, 1, 1.5]; Y=[0, 1, 1]
              VariableReference XValue: VariableName=[Leaf].Fw
        Constant MaintenanceRespirationFunction: FixedValue=0; Units=0-1
        Constant DMConversionEfficiency: FixedValue=1; Units=0-1
        Constant NRetranslocationFactor: FixedValue=0
        Constant DMReallocationFactor: FixedValue=0
        Constant DMRetranslocationFactor: FixedValue=0
        VariableReference CriticalNConc: VariableName=[Nodule].MinimumNConc
        Constant RemobilisationCost: FixedValue=0
        Constant CarbonConcentration: FixedValue=0.4
        HoldFunction FixationRate: WhenToHold=StartGrainFilling
          MinimumFunction DailyPotentialFixationRate
            MultiplyFunction PotentialFixationRate
              VariableReference Biomass: VariableName=[AboveGround].Wt
              PhaseLookup SpecificFixationRate
                PhaseLookupValue VegetativeGrowth: Start=Emergence; End=StartFlowering
                  Constant Rate: FixedValue=0.006
                PhaseLookupValue ReproductiveGrowth: Start=StartFlowering; End=EndGrainFill
                  Constant Rate: FixedValue=0.002
            Constant MaximumFixationRate: FixedValue=0.6
        BiomassDemand DMDemands
          MultiplyFunction Structural
            PartitionFractionDemandFunction DMDemandFunction
              PhaseLookup PartitionFraction
                PhaseLookupValue Early: Start=Emergence; End=StartFlowering
                  Constant Function: FixedValue=0.03
                PhaseLookupValue Middle: Start=StartFlowering; End=StartGrainFilling
                  Constant Function: FixedValue=0.02
                PhaseLookupValue Late: Start=StartGrainFilling; End=Maturity
                  Constant Function: FixedValue=0
            Constant StructuralFraction: FixedValue=1; Units=g/g
          Constant Metabolic: FixedValue=0
          StorageDMDemandFunction Storage
            SubtractFunction StorageFraction
              Constant One: FixedValue=1
              VariableReference StructuralFraction: VariableName=[Nodule].DMDemands.Structural.StructuralFraction
        BiomassDemand NDemands
          MultiplyFunction Structural
            VariableReference MinNconc: VariableName=[Nodule].minimumNconc
            VariableReference PotentialDMAllocation: VariableName=[Nodule].potentialDMAllocation.Structural
          MultiplyFunction Metabolic
            SubtractFunction MetabolicNconc
              VariableReference CritNconc: VariableName=[Nodule].criticalNConc
              VariableReference MinNconc: VariableName=[Nodule].minimumNconc
            VariableReference PotentialDMAllocation: VariableName=[Nodule].potentialDMAllocation.Structural
          StorageNDemandFunction Storage
            VariableReference NitrogenDemandSwitch: VariableName=[Nodule].nitrogenDemandSwitch
            VariableReference MaxNconc: VariableName=[Nodule].maximumNconc
      GenericOrgan Shell: IsAboveGround=true
        AccumulateFunction PodNumber: StartStageName=StartPodDevelopment; EndStageName=EndCanopyDevelopment; FractionRemovedOnCut=0; FractionRemovedOnHarvest=0; FractionRemovedOnGraze=0; FractionRemovedOnPrune=0
          MultiplyFunction DailyPodAppearanceRate
            DivideFunction PodAppearanceRate
              Constant PodsPerNode: FixedValue=8
              VariableReference NodeAppearanceRate: VariableName=[Structure].Phyllochron
            VariableReference ThermalTime: VariableName=[Phenology].ThermalTime
            VariableReference PlantPopulation: VariableName=[Soybean].SowingData.Population
        Constant NReallocationFactor: FixedValue=0.5
        Constant NRetranslocationFactor: FixedValue=0.5
        Constant MaximumNConc: FixedValue=0.045
        VariableReference CriticalNConc: VariableName=[Shell].MinimumNConc
        Constant MinimumNConc: FixedValue=0.01
        Constant DMRetranslocationFactor: FixedValue=0.1
        PhaseLookupValue NitrogenDemandSwitch: Start=StartPodDevelopment; End=EndPodDevelopment
          Constant: FixedValue=1
        BiomassRemoval BiomassRemovalDefaults: same as Replacements.Soybean.Nodule.BiomassRemovalDefaults
        PhaseLookup SenescenceRate
          PhaseLookupValue ReproductivePhase: Start=StartPodDevelopment; End=Maturity
            MinimumFunction Rate
              DivideFunction Fraction
                VariableReference TT: VariableName=[Phenology].ThermalTime
                SubtractFunction TTRemaining
                  ExpressionFunction ReproductiveTT
                    Expression=[Phenology].EarlyPodDevelopment.Target+[Phenology].EarlyGrainFilling.Target+[Phenology].MidGrainFilling.Target+[Phenology].LateGrainFilling.Target
                  ExpressionFunction ReproductiveTT1Complete
                    Expression=[Phenology].EarlyPodDevelopment.ProgressThroughPhase+[Phenology].EarlyGrainFilling.ProgressThroughPhase+[Phenology].MidGrainFilling.ProgressThroughPhase+[Phenology].LateGrainFilling.ProgressThroughPhase
              Constant One: FixedValue=1
        Constant DetachmentRateFunction: FixedValue=0; Units=/d
        Constant MaintenanceRespirationFunction: FixedValue=0; Units=0-1
        Constant DMConversionEfficiency: FixedValue=1; Units=0-1
        Constant DMReallocationFactor: FixedValue=0
        Constant RemobilisationCost: FixedValue=0
        Constant CarbonConcentration: FixedValue=0.4
        MultiplyFunction PodNumberOld
          Constant PodsPerNode: FixedValue=1
          VariableReference StemPopulation: VariableName=[Structure].TotalStemPopn
          PhaseLookupValue FloweringNodes: Start=StartFlowering; End=HarvestRipe
            SubtractFunction FloweringNodes
              VariableReference TotalNodes: VariableName=[Structure].LeafTipsAppeared
              VariableReference VegetativeNodes: VariableName=[Phenology].NFF
        HoldFunction PodNumberByStem: WhenToHold=StartGrainFilling
          MultiplyFunction Value
            Constant PodsPerGStem: FixedValue=5
            VariableReference StemMass: VariableName=[Stem].Live.Wt
        PopulationBasedDemandFunction DMDemandFunctionOLD
          VariableReference ThermalTime: VariableName=[Phenology].ThermalTime
          VariableReference OrganPopulation: VariableName=[Shell].PodNumber
          Constant ExpansionStress: FixedValue=1
          AddFunction GrowthDuration
            VariableReference EarlyPodDevelopmentDuration: VariableName=[Phenology].EarlyPodDevelopment.Target
            VariableReference EarlyGrainFillingDuration: VariableName=[Phenology].EarlyGrainFilling.Target
            VariableReference MidGrainFillingDuration: VariableName=[Phenology].MidGrainFilling.Target
          Constant StartStage: FixedValue=5
          Constant MaximumOrganWt: FixedValue=0.08
        Constant PotentialHarvestIndex: FixedValue=0.2
        AddFunction FillingDuration: same as Replacements.Soybean.Shell.DMDemandFunctionOLD.GrowthDuration
        BiomassDemand DMDemands
          MultiplyFunction Structural
            PhaseLookup DMDemandFunction
              PhaseLookupValue PodDevelopment: Start=StartPodDevelopment; End=EndPodDevelopment
                MultiplyFunction HIPodDemand
                  VariableReference AboveGroundWt: VariableName=[AboveGround].Wt
                  DivideFunction HarvestIndexIncrease
                    VariableReference PotentialHarvestIndex: VariableName=[Shell].PotentialHarvestIndex
                    VariableReference FillingDuration: VariableName=[Shell].FillingDuration
                  VariableReference ThermalTime: VariableName=[Phenology].ThermalTime
                FillingRateFunction: same as Replacements.Soybean.Grain.DMDemandFunction.GrainFilling.FillingRateFunction
            Constant StructuralFraction: FixedValue=1
          Constant Metabolic: FixedValue=0
          StorageDMDemandFunction Storage
            SubtractFunction StorageFraction
              Constant One: FixedValue=1
              VariableReference StructuralFraction: VariableName=[Shell].DMDemands.Structural.StructuralFraction
        BiomassDemand NDemands
          MultiplyFunction Structural
            VariableReference MinNconc: VariableName=[Shell].minimumNconc
            VariableReference PotentialDMAllocation: VariableName=[Shell].potentialDMAllocation.Structural
          StorageNDemandFunction Storage
            VariableReference NitrogenDemandSwitch: VariableName=[Shell].nitrogenDemandSwitch
            VariableReference MaxNconc: VariableName=[Shell].maximumNconc
          Constant Metabolic: FixedValue=0
        RetranslocateNonStructural RetranslocateNitrogen
        BiomassDemand InitialWt
          Constant Structural: FixedValue=0; Units=g/m^2
          Constant Metabolic: FixedValue=0
          Constant Storage: FixedValue=0
        Constant Photosynthesis: FixedValue=0
        VariableReference initialNConcFunction: VariableName=[Shell].MinimumNConc
        BiomassDemand dmDemandPriorityFactors
          Constant Structural: FixedValue=1
          Constant Metabolic: FixedValue=1
          Constant Storage: FixedValue=1
      Leaf: MaxCover=1; Albedo=0.25; Gsmax350=0.011; R50=150; KDead=0.3; MaximumMainStemLeafNumber=40
        zero: CurrentExpandingLeaf, StartFractionExpanded, FractionNextleafExpanded, DeadNodesYesterday, GrowthRespiration, LAI, Depth, Width, FRGR, PotentialEP, WaterDemand, TipsAtEmergence, CohortsAtInitialisation, FractionDied
        LeafCohort InitialLeaf1: Rank=1; Area=100
          zero: NReallocationFactor, DMReallocationFactor, NRetranslocationFactor, DMRetranslocationFactor, ShadeInducedSenRate, SenescedFrac, DeltaPotentialArea, DeltaStressConstrainedArea, DeltaCarbonConstrainedArea, PotentialStructuralDMAllocation, PotentialMetabolicDMAllocation, MetabolicNReallocated, MetabolicWtReallocated, StorageNReallocated, StorageWtReallocated, MetabolicNRetranslocated, StorageNRetrasnlocated, DMRetranslocated, MetabolicNAllocation, StructuralDMAllocation, MetabolicDMAllocation, MaintenanceRespiration
        LeafCohort InitialLeaf2: same as Replacements.Wheat.Leaf.InitialLeaves[2]
        PhaseLookup ThermalTime
          PhaseLookupValue VegetativeGrowth: Start=Sowing; End=EndCanopyDevelopment
            VariableReference ThermalTime: VariableName=[Phenology].VegetativeThermalTime
          PhaseLookupValue ReproductiveGrowth: Start=EndCanopyDevelopment; End=HarvestRipe
            MultiplyFunction PPAcceleratedTT
              VariableReference ThermalTime: VariableName=[Phenology].ThermalTime
              LinearInterpolationFunction PPAccelerator
                XYPairs: X=[10, 13.39]; Y=[1, 1]
                VariableReference XValue: VariableName=[Phenology].Photoperiod
        LeafCohortParameters: ExpansionStressValue=0; CellDivisionStressValue=0; LagAccelerationValue=0; SenescenceAccelerationValue=0; ShadeInducedSenescenceRateValue=0; SenessingLeafRelativeSizeValue=0
          Constant SenessingLeafRelativeSize: FixedValue=1; Units=0-1
          MultiplyFunction MaxArea
            LinearInterpolationFunction RelativeArea
              XYPairs: X=[2, 7, 10, 18]; Y=[0.6666, 1, 1, 0.83]
              VariableReference XValue: VariableName=[Leaf].AppearedCohortNo
            Constant LargestLeaf: FixedValue=12000
          MultiplyFunction GrowthDuration
            VariableReference Phyllochron: VariableName=[Structure].Phyllochron
            LinearInterpolationFunction AgeFactor
              XYPairs: X=[1, 5, 10, 20]; Y=[1, 2, 4, 8]
              VariableReference XValue: VariableName=[Leaf].AppearedCohortNo
          SubtractFunction FirstLeafDuration
            AddFunction TTtoEndCanopy
              VariableReference Vegetative: VariableName=[Phenology].Vegetative.Target
              VariableReference EarlyFlowering: VariableName=[Phenology].EarlyFlowering.Target
              VariableReference EarlyPod: VariableName=[Phenology].EarlyPodDevelopment.Target
              VariableReference EarlyGrain: VariableName=[Phenology].EarlyGrainFilling.Target
            VariableReference GrowthDuraction: VariableName=[Leaf].LeafCohortParameters.GrowthDuration
          SubtractFunction LastLeafDuration
            AddFunction ThermalTimeToRipe
              VariableReference MidGrainFilling: VariableName=[Phenology].MidGrainFilling.Target
              VariableReference LateGrainFilling: VariableName=[Phenology].LateGrainFilling.Target
              VariableReference Maturing: VariableName=[Phenology].Maturing.Target
              VariableReference Ripening: VariableName=[Phenology].Ripening.Target
            VariableReference SenescenceDuration: VariableName=[Leaf].LeafCohortParameters.SenescenceDuration
            VariableReference GrowthDuraction: VariableName=[Leaf].LeafCohortParameters.GrowthDuration
          SubtractFunction LagDuration
            VariableReference FLD: VariableName=[Leaf].LeafCohortParameters.FirstLeafDuration
            MultiplyFunction DeltaDuration
              MinimumFunction Factor
                DivideFunction AgeFactor
                  ExpressionFunction TTComplete
                    Expression=[Phenology].Vegetative.ProgressThroughPhase+[Phenology].EarlyFlowering.ProgressThroughPhase+[Phenology].EarlyPodDevelopment.ProgressThroughPhase+[Phenology].EarlyGrainFilling.ProgressThroughPhase
                  ExpressionFunction TTtoStartPod
                    Expression=[Phenology].Vegetative.Target+[Phenology].EarlyFlowering.Target+[Phenology].EarlyPodDevelopment.Target+[Phenology].EarlyGrainFilling.Target
                Constant One: FixedValue=1
              SubtractFunction DeltaMax
                VariableReference FLD: VariableName=[Leaf].LeafCohortParameters.FirstLeafDuration
                VariableReference LLD: VariableName=[Leaf].LeafCohortParameters.LastLeafDuration
          MultiplyFunction SenescenceDuration
            Constant Multiplier: FixedValue=3
            VariableReference Phyllochron: VariableName=[Structure].Phyllochron
          MultiplyFunction DetachmentLagDuration
            Constant Multiplier: FixedValue=3
            VariableReference Phyllochron: VariableName=[Structure].Phyllochron
          Constant DetachmentDuration: FixedValue=20
          LinearInterpolationFunction SpecificLeafAreaMaxOLD
            XYPairs: X=[0.5, 0.8, 1, 2, 3, 4]; Y=[45000, 40000, 35000, 32000, 32000, 32000]
            VariableReference XValue: VariableName=[Leaf].LAI
          LinearInterpolationFunction SpecificLeafAreaMax
            XYPairs: X=[0.1, 6]; Y=[30000, 45000]
            VariableReference XValue: VariableName=[Leaf].LAI
          Constant StructuralFraction: FixedValue=0.7
          LinearInterpolationFunction SpecificLeafAreaMinOLD
            XYPairs: X=[0.5, 6]; Y=[10000, 10000]
            VariableReference XValue: VariableName=[Leaf].LAI
          LinearInterpolationFunction SpecificLeafAreaMin
            XYPairs: X=[0.5, 6]; Y=[20000, 30000]
            VariableReference XValue: VariableName=[Leaf].LAI
          LinearInterpolationFunction ExpansionStress
            XYPairs: X=[0, 1]; Y=[0, 1]
            VariableReference XValue: VariableName=[Soybean].Leaf.Fw
          Constant MinimumNConc: FixedValue=0.02
          Constant CriticalNConc: FixedValue=0.06
          Constant MaximumNConc: FixedValue=0.08
          Constant NReallocationFactor: FixedValue=1
          Constant DMRetranslocationFactor: FixedValue=0.5
          LinearInterpolationFunction ShadeInducedSenescenceRate
            XYPairs: X=[0, 0.9, 0.90001]; Y=[0, 0, 0]
            VariableReference XValue: VariableName=[Leaf].CohortCurrentRankCoverAbove
          Constant InitialNConc: FixedValue=0
          Constant StorageFraction: FixedValue=0
          Constant DMReallocationFactor: FixedValue=1
          Constant LeafSizeShapeParameter: FixedValue=0.01
          Constant MaintenanceRespirationFunction: FixedValue=0
          Constant SenescenceAcceleration: FixedValue=1
          Constant CellDivisionStress: FixedValue=1; Units=0-1
          Constant LagAcceleration: FixedValue=1
          ArrayFunction LagDurationAgeMultiplier: Values=1 1 1
          ArrayFunction SenescenceDurationAgeMultiplier: Values=1 1 1
          ArrayFunction LeafSizeAgeMultiplier: Values=1 1 1 1 1 1 1 1 1 1 1 1
          Constant RemobilisationCost: FixedValue=0
          Constant CarbonConcentration: FixedValue=0.4
          Constant NRetranslocationFactor: FixedValue=0.5
        LinearInterpolationFunction ExtinctionCoeff
          XYPairs: X=[200, 1000]; Y=[0.6, 0.4]
          VariableReference XValue: VariableName=[Soybean].SowingData.RowSpacing
        RUEModel Photosynthesis
          Constant RUE: FixedValue=1.2
          WeightedTemperatureFunction FT: MaximumTemperatureWeighting=0.5
            XYPairs: X=[10, 20, 30, 40]; Y=[0, 1, 1, 0]
          LinearInterpolationFunction FVPD
            XYPairs: X=[0, 10, 50]; Y=[1, 1, 1]
            VariableReference XValue: VariableName=[Leaf].Photosynthesis.VPD
          LinearInterpolationFunction FN
            XYPairs: X=[0, 1, 1.5]; Y=[1, 1, 1]
            VariableReference XValue: VariableName=[Leaf].Fn
          LinearInterpolationFunction FW
            XYPairs: X=[0, 1]; Y=[0, 1]
            VariableReference XValue: VariableName=[Leaf].Fw
          RUECO2Function FCO2: PhotosyntheticPathway=C3
          VariableReference RadnInt: VariableName=[Leaf].RadiationIntercepted
        MinimumFunction FRGRFunction
          VariableReference RUE_FT: VariableName=[Leaf].Photosynthesis.FT
          MinimumFunction Others
            VariableReference RUE_FN: VariableName=[Leaf].Photosynthesis.FN
            VariableReference RUE_FVPD: VariableName=[Leaf].Photosynthesis.FVPD
        LinearInterpolationFunction FrostFraction
          XYPairs: X=[-1, 0]; Y=[0, 0]
          VariableReference XValue: VariableName=[Weather].MinT
        BiomassRemoval BiomassRemovalDefaults
          OrganBiomassRemovalType Harvest: FractionLiveToRemove=0; FractionDeadToRemove=0; FractionLiveToResidue=0.3; FractionDeadToResidue=0
          OrganBiomassRemovalType Cut: FractionLiveToRemove=0.8; FractionDeadToRemove=0; FractionLiveToResidue=0; FractionDeadToResidue=0
          OrganBiomassRemovalType Prune: FractionLiveToRemove=0; FractionDeadToRemove=0; FractionLiveToResidue=0.6; FractionDeadToResidue=0
          OrganBiomassRemovalType Graze: FractionLiveToRemove=0.6; FractionDeadToRemove=0; FractionLiveToResidue=0.1; FractionDeadToResidue=0
        Constant StructuralFraction: FixedValue=0.5
        Constant DMConversionEfficiency: FixedValue=1
        Constant RemobilisationCost: FixedValue=0
        Constant CarbonConcentration: FixedValue=0.4
        Constant StomatalConductanceCO2Modifier: FixedValue=1
        Constant WidthFunction: FixedValue=0
        VariableReference DepthFunction: VariableName=[Leaf].Height
      GenericOrgan Stem: IsAboveGround=true
        Constant NReallocationFactor: FixedValue=0
        Constant NRetranslocationFactor: FixedValue=0.5
        PhaseLookup DMRetranslocationFactor
          PhaseLookupValue GrainFilling: Start=EndCanopyDevelopment; End=EndGrainFill
            Constant RetranslocationFactor: FixedValue=0.2
        LinearInterpolationFunction MaximumNConc
          XYPairs: X=[3, 4, 5]; Y=[0.025, 0.02, 0.015]
          VariableReference XValue: VariableName=[Phenology].Stage
        Constant MinimumNConc: FixedValue=0.006
        PhaseLookupValue NitrogenDemandSwitch: Start=Emergence; End=StartGrainFilling
          Constant: FixedValue=1
        BiomassRemoval BiomassRemovalDefaults: same as Replacements.Soybean.Nodule.BiomassRemovalDefaults
        Constant SenescenceRate: FixedValue=0; Units=/d
        Constant DetachmentRateFunction: FixedValue=0; Units=/d
        Constant MaintenanceRespirationFunction: FixedValue=0; Units=0-1
        Constant DMConversionEfficiency: FixedValue=1; Units=0-1
        Constant DMReallocationFactor: FixedValue=0
        VariableReference CriticalNConc: VariableName=[Stem].MinimumNConc
        Constant RemobilisationCost: FixedValue=0
        Constant CarbonConcentration: FixedValue=0.4
        BiomassDemand DMDemands
          MultiplyFunction Structural
            PhaseLookup Fraction
              PhaseLookupValue StemGrowthPhase: Start=Emergence; End=StartPodDevelopment
                Constant Fraction: FixedValue=0.75
              PhaseLookupValue PodAndGrainGrowth: Start=StartPodDevelopment; End=EndGrainFill
                Constant Fraction: FixedValue=0
            VariableReference DMDemand: VariableName=[Stem].PotentialGrowth
          Constant Metabolic: FixedValue=0
          MultiplyFunction Storage
            VariableReference DMDemand: VariableName=[Stem].PotentialGrowth
            SubtractFunction StorageFraction
              Constant One: FixedValue=1
              VariableReference StructuralFraction: VariableName=[Stem].DMDemands.Structural.Fraction
        BiomassDemand NDemands: same as Replacements.Wheat.Stem.NDemands
        PartitionFractionDemandFunction PotentialGrowth
          PhaseLookup PartitionFraction
            PhaseLookupValue StemGrowthPhase: Start=Emergence; End=EndPodDevelopment
              Constant StemFraction: FixedValue=0.4
            PhaseLookupValue GrainFilling: Start=EndPodDevelopment; End=EndGrainFill
              Constant StemFraction: FixedValue=0
        RetranslocateNonStructural RetranslocateNitrogen
        BiomassDemand InitialWt
          Constant Structural: FixedValue=0; Units=g/m^2
          Constant Metabolic: FixedValue=0
          Constant Storage: FixedValue=0
        Constant Photosynthesis: FixedValue=0
        VariableReference initialNConcFunction: VariableName=[Stem].MinimumNConc
        BiomassDemand dmDemandPriorityFactors
          Constant Structural: FixedValue=1
          Constant Metabolic: FixedValue=1
          Constant Storage: FixedValue=1
      CompositeBiomass AboveGround: DMDOfStructural=0.6
        Propertys=[[Leaf].Live, [Leaf].Dead, [Stem].Live, [Stem].Dead, [Grain].Live, [Grain].Dead, [Shell].Live, [Shell].Dead]
      CompositeBiomass BelowGround: Propertys=[[Root].Live, [Root].Dead, [Nodule].Live, [Nodule].Dead]; DMDOfStructural=0.6
      CompositeBiomass Total: DMDOfStructural=0.6
        Propertys=[[Leaf].Live, [Leaf].Dead, [Stem].Live, [Stem].Dead, [Grain].Live, [Grain].Dead, [Shell].Live, [Shell].Dead, [Root].Live, [Root].Dead, [Nodule].Live, [Nodule].Dead]
      CompositeBiomass TotalLive: DMDOfStructural=0.6
        Propertys=[[Leaf].Live, [Stem].Live, [Grain].Live, [Shell].Live, [Root].Live, [Nodule].Live]
      CompositeBiomass TotalDead: DMDOfStructural=0.6
        Propertys=[[Leaf].Dead, [Stem].Dead, [Grain].Dead, [Shell].Dead, [Root].Dead, [Nodule].Dead]
      CompositeBiomass Pod: Propertys=[[Shell].Live, [Shell].Dead, [Grain].Live, [Grain].Dead]; DMDOfStructural=0.6
      Memo
        ## References

        ### **Ayaz S, McKenzie BA, McNeil DL, Hill GD.** **2004**. Light interception and utilization of four grain legumes sown at different plant populations and depths. _Journal of Agricultural Science,_ **142**: 297-308.
         **Ayaz S, McKenzie BA, Hill GD, McNeil DL.** **2004**. Variability in yield of four grain legume species in a subhumid temperate environment. II. Yield components. _Journal of Agricultural Science,_ **142**: 21-28.
         **Ayaz S, McKenzie BA, Hill GD, McNeil DL.** **2004**. Nitrogen distribution in four grain legumes. _Journal of Agricultural Science,_ **142**: 309-317.
         **Wilson DR, Robertson MJ.** **1996.** Pea phenology responses to temperature and photoperiod. _Australian Agronomy Society_.
      Cultivar PioneerP932T16R_MG32
        Command:
          [Phenology].Vegetative.Target.FixedValue = 328
          [Phenology].EarlyFlowering.Target.FixedValue = 106
          [Phenology].EarlyGrainFilling.Target.FractionofGrainfilling.FixedValue = 0.40
          [Phenology].LateGrainFilling.Target.EntireGrainfillPeriod.FixedValue = 499
          [Phenology].PhotoperiodModifier.XYPairs.X = 13.59, 17.6
      Cultivar PioneerP22T69R_MG22
        Command:
          [Phenology].Vegetative.Target.FixedValue = 328
          [Phenology].EarlyFlowering.Target.FixedValue = 106
          [Phenology].EarlyGrainFilling.Target.FractionofGrainfilling.FixedValue = 0.35
          [Phenology].LateGrainFilling.Target.EntireGrainfillPeriod.FixedValue = 580
          [Phenology].PhotoperiodModifier.XYPairs.X = 13.59, 17.6
      Cultivar Trial_MG00
        Command:
          [Phenology].Vegetative.Target.FixedValue = 268
          [Phenology].EarlyFlowering.Target.FixedValue = 76
          [Phenology].EarlyGrainFilling.Target.FractionofGrainfilling.FixedValue = 0.05
          [Phenology].LateGrainFilling.Target.EntireGrainfillPeriod.FixedValue = 432
          [Phenology].PhotoperiodModifier.XYPairs.X = 14.43, 21.19
      Cultivar Lambert_MG0
        Command:
          [Phenology].Vegetative.Target.FixedValue = 294
          [Phenology].EarlyFlowering.Target.FixedValue = 81
          [Phenology].EarlyGrainFilling.Target.FractionofGrainfilling.FixedValue = 0.05
          [Phenology].LateGrainFilling.Target.EntireGrainfillPeriod.FixedValue = 442
          [Phenology].PhotoperiodModifier.XYPairs.X = 14.29, 20.14
      Cultivar IA1006_MG10
        Command:
          [Phenology].Vegetative.Target.FixedValue = 336
          [Phenology].EarlyFlowering.Target.FixedValue = 118
          [Phenology].EarlyGrainFilling.Target.FractionofGrainfilling.FixedValue = 0.05
          [Phenology].LateGrainFilling.Target.EntireGrainfillPeriod.FixedValue = 518
          [Phenology].PhotoperiodModifier.XYPairs.X = 14.37, 19.30
      Cultivar IA2008_MG20
        Command:
          [Phenology].Vegetative.Target.FixedValue = 329
          [Phenology].EarlyFlowering.Target.FixedValue = 150
          [Phenology].EarlyGrainFilling.Target.FractionofGrainfilling.FixedValue = 0.05
          [Phenology].LateGrainFilling.Target.EntireGrainfillPeriod.FixedValue = 580
          [Phenology].PhotoperiodModifier.XYPairs.X = 13.92, 17.93
      Cultivar Macon_MG30
        Command:
          [Phenology].Vegetative.Target.FixedValue = 367
          [Phenology].EarlyFlowering.Target.FixedValue = 163
          [Phenology].EarlyGrainFilling.Target.FractionofGrainfilling.FixedValue = 0.175
          [Phenology].LateGrainFilling.Target.EntireGrainfillPeriod.FixedValue = 607
          [Phenology].PhotoperiodModifier.XYPairs.X = 14.05, 17.56
      Cultivar Pioneer94B01_MG40
        Command:
          [Phenology].Vegetative.Target.FixedValue = 322
          [Phenology].EarlyFlowering.Target.FixedValue = 143
          [Phenology].EarlyGrainFilling.Target.FractionofGrainfilling.FixedValue = 0.30
          [Phenology].LateGrainFilling.Target.EntireGrainfillPeriod.FixedValue = 567
          [Phenology].PhotoperiodModifier.XYPairs.X = 13.05, 16.46
      Cultivar Hutcheson_MG50
        Command:
          [Phenology].Vegetative.Target.FixedValue = 438
          [Phenology].EarlyFlowering.Target.FixedValue = 112
          [Phenology].EarlyGrainFilling.Target.FractionofGrainfilling.FixedValue = 0.30
          [Phenology].LateGrainFilling.Target.EntireGrainfillPeriod.FixedValue = 505
          [Phenology].PhotoperiodModifier.XYPairs.X = 12.58, 15.88
      Cultivar NK622_MG60
        Command:
          [Phenology].Vegetative.Target.FixedValue = 436
          [Phenology].EarlyFlowering.Target.FixedValue = 93
          [Phenology].EarlyGrainFilling.Target.FractionofGrainfilling.FixedValue = 0.30
          [Phenology].LateGrainFilling.Target.EntireGrainfillPeriod.FixedValue = 467
          [Phenology].PhotoperiodModifier.XYPairs.X = 12.39, 15.61
      Cultivar Becks367NRR_MG37
        Command:
          [Phenology].Vegetative.Target.FixedValue = 267
          [Phenology].EarlyFlowering.Target.FixedValue = 112
          [Phenology].EarlyGrainFilling.Target.FractionofGrainfilling.FixedValue = 0.26
          [Phenology].LateGrainFilling.Target.EntireGrainfillPeriod.FixedValue = 506
          [Phenology].PhotoperiodModifier.XYPairs.X = 13.27, 17.2
      Cultivar AsgrowAG4403_MG40
        Command:
          [Phenology].Vegetative.Target.FixedValue = 292
          [Phenology].EarlyFlowering.Target.FixedValue = 123
          [Phenology].EarlyGrainFilling.Target.FractionofGrainfilling.FixedValue = 0.30
          [Phenology].LateGrainFilling.Target.EntireGrainfillPeriod.FixedValue = 535
          [Phenology].PhotoperiodModifier.XYPairs.X = 13.09, 16.49
      Cultivar HornbeckHBK4891_MG40
        Command:
          [Phenology].Vegetative.Target.FixedValue = 292
          [Phenology].EarlyFlowering.Target.FixedValue = 123
          [Phenology].EarlyGrainFilling.Target.FractionofGrainfilling.FixedValue = 0.30
          [Phenology].LateGrainFilling.Target.EntireGrainfillPeriod.FixedValue = 535
          [Phenology].PhotoperiodModifier.XYPairs.X = 13.09, 16.49
      Cultivar AsgrowAG5701_MG50
        Command:
          [Phenology].Vegetative.Target.FixedValue = 404
          [Phenology].EarlyFlowering.Target.FixedValue = 131
          [Phenology].EarlyGrainFilling.Target.FractionofGrainfilling.FixedValue = 0.30
          [Phenology].LateGrainFilling.Target.EntireGrainfillPeriod.FixedValue = 549
          [Phenology].PhotoperiodModifier.XYPairs.X = 12.83, 16.13
      Cultivar PioneerP9504_MG50
        Command:
          [Phenology].Vegetative.Target.FixedValue = 404
          [Phenology].EarlyFlowering.Target.FixedValue = 112
          [Phenology].EarlyGrainFilling.Target.FractionofGrainfilling.FixedValue = 0.30
          [Phenology].LateGrainFilling.Target.EntireGrainfillPeriod.FixedValue = 505
          [Phenology].PhotoperiodModifier.XYPairs.X = 12.83, 16.13
      Cultivar Pioneer92MGI_MG26
        Command:
          [Phenology].Vegetative.Target.FixedValue = 271
          [Phenology].EarlyFlowering.Target.FixedValue = 120
          [Phenology].EarlyGrainFilling.Target.FractionofGrainfilling.FixedValue = 0.125
          [Phenology].LateGrainFilling.Target.EntireGrainfillPeriod.FixedValue = 529
          [Phenology].PhotoperiodModifier.XYPairs.X = 13.77, 17.57
      Cultivar Becks321NRR_MG32
        Command:
          [Phenology].Vegetative.Target.FixedValue = 272
          [Phenology].EarlyFlowering.Target.FixedValue = 117
          [Phenology].EarlyGrainFilling.Target.FractionofGrainfilling.FixedValue = 0.20
          [Phenology].LateGrainFilling.Target.EntireGrainfillPeriod.FixedValue = 522
          [Phenology].PhotoperiodModifier.XYPairs.X = 13.45, 18.0
      Cultivar Hooper_MG40
        Command:
          [Phenology].Vegetative.Target.FixedValue = 380
          [Phenology].EarlyFlowering.Target.FixedValue = 80
          [Phenology].EarlyGrainFilling.Target.FractionofGrainfilling.FixedValue = 0.05
          [Phenology].LateGrainFilling.Target.EntireGrainfillPeriod.FixedValue = 440
          [Phenology].PhotoperiodModifier.XYPairs.X = 13.26, 16.67
          [Leaf].LeafCohortParameters.MaxArea.LargestLeaf.FixedValue = 17000
      Cultivar Stephens_MG40
        Command:
          [Phenology].Vegetative.Target.FixedValue = 360
          [Phenology].EarlyFlowering.Target.FixedValue = 80
          [Phenology].EarlyGrainFilling.Target.FractionofGrainfilling.FixedValue = 0.05
          [Phenology].LateGrainFilling.Target.EntireGrainfillPeriod.FixedValue = 440
          [Phenology].PhotoperiodModifier.XYPairs.X = 13.26, 16.67
          [Leaf].LeafCohortParameters.MaxArea.LargestLeaf.FixedValue = 17000
      Cultivar Davis
        Command:
          [Phenology].Vegetative.Target.FixedValue = 480
          [Phenology].EarlyFlowering.Target.FixedValue = 100
          [Phenology].EarlyGrainFilling.Target.FractionofGrainfilling.FixedValue = 0.015
          [Phenology].LateGrainFilling.Target.EntireGrainfillPeriod.FixedValue = 467
          [Phenology].PhotoperiodModifier.XYPairs.X = 12.39, 15.61
          [Phenology].MidGrainFilling.Target.FractionofMidToLateGrainfilling.FixedValue=0.33
          [Leaf].LeafCohortParameters.MaxArea.LargestLeaf.FixedValue = 23000
          [Leaf].LeafCohortParameters.MaxArea.RelativeArea.XYPairs.X = 2, 7, 13, 18
          [Grain].MaximumNConc.FixedValue = 0.067
          [Stem].PotentialGrowth.PartitionFraction.StemGrowthPhase.StemFraction.FixedValue = 0.5
      Cultivar PioneerP92Y75_MG27
        Command:
          [Phenology].Vegetative.Target.FixedValue = 328
          [Phenology].EarlyFlowering.Target.FixedValue = 106
          [Phenology].EarlyGrainFilling.Target.FractionofGrainfilling.FixedValue = 0.14
          [Phenology].LateGrainFilling.Target.EntireGrainfillPeriod.FixedValue = 499
          [Phenology].PhotoperiodModifier.XYPairs.X = 13.59, 17.6
      Cultivar PioneerP22T61_MG22
        Command:
          [Phenology].Vegetative.Target.FixedValue = 328
          [Phenology].EarlyFlowering.Target.FixedValue = 106
          [Phenology].EarlyGrainFilling.Target.FractionofGrainfilling.FixedValue = 0.3
          [Phenology].LateGrainFilling.Target.EntireGrainfillPeriod.FixedValue = 499
          [Phenology].PhotoperiodModifier.XYPairs.X = 13.59, 17.6
      Cultivar Buchanan
        Command:
          [Phenology].Vegetative.Target.FixedValue = 380
          [Phenology].EarlyFlowering.Target.FixedValue = 80
          [Phenology].EarlyGrainFilling.Target.FractionofGrainfilling.FixedValue = 0.05
          [Phenology].LateGrainFilling.Target.EntireGrainfillPeriod.FixedValue = 440
          [Phenology].PhotoperiodModifier.XYPairs.X = 13.26, 16.67
          [Leaf].LeafCohortParameters.MaxArea.LargestLeaf.FixedValue = 21500
      Cultivar Djakal
        Command:
          [Phenology].Vegetative.Target.FixedValue = 332
          [Phenology].EarlyFlowering.Target.FixedValue = 80
          [Phenology].EarlyGrainFilling.Target.FractionofGrainfilling.FixedValue = 0.05
          [Phenology].LateGrainFilling.Target.EntireGrainfillPeriod.FixedValue = 440
          [Phenology].PhotoperiodModifier.XYPairs.X = 13.26, 16.67
          [Leaf].LeafCohortParameters.MaxArea.LargestLeaf.FixedValue = 17000
      Cultivar PioneerP93M11_MG31
        Command:
          [Phenology].Vegetative.Target.FixedValue = 250
          [Phenology].EarlyFlowering.Target.FixedValue = 110
          [Phenology].EarlyGrainFilling.Target.FractionofGrainfilling.FixedValue = 0.30
          [Phenology].LateGrainFilling.Target.EntireGrainfillPeriod.FixedValue = 457
          [Phenology].PhotoperiodModifier.XYPairs.X = 13.4, 16.0
          [Leaf].LeafCohortParameters.MaxArea.LargestLeaf.FixedValue = 25000
          [Grain].MaximumNConc.FixedValue = 0.065
          [Shell].PotentialHarvestIndex.FixedValue = 0.5
          [Leaf].LeafCohortParameters.DetachmentDuration.FixedValue = 1e6
      Constant MortalityRate: FixedValue=0
    Plant Maize: PlantType=Maize; IsAlive=false; IsEnding=false; DaysAfterEnding=0
      OrganArbitrator Arbitrator: same as Replacements.Wheat.Arbitrator
      Phenology
        MultiplyFunction ThermalTime
          HourlyInterpolation BaseThermalTime: agregationMethod=0
            XYPairs Response: X=[0, 18, 26, 34, 44]; Y=[0, 10, 18, 26, 0]
            ThreeHourSin InterpolationMethod
        GerminatingPhase Germinating: Start=Sowing; End=Germination
        EmergingPhase Emerging: ShootLag=55; ShootRate=0.6; Start=Germination; End=Emergence; TTForTimeStep=0
          VariableReference ThermalTime: VariableName=[Phenology].ThermalTime
        GenericPhase Juvenile: Start=Emergence; End=EndJuvenile
          Constant Target: FixedValue=200; Units=deg day
          VariableReference Progression: VariableName=[Phenology].ThermalTime
        GenericPhase Photosensitive: Start=EndJuvenile; End=FloralInitiation
          VariableReference Progression: VariableName=[Phenology].ThermalTime
          LinearInterpolationFunction Target
            Memo
              The photoperiod is likely to vary with individual maize cultivars.  Therefore, the response shown here is indicative only.  See the descriptions of individual cultivars for more detail on photoperiod responses used by the maize model.
            XYPairs: X=[0, 12.5, 24]; Y=[0, 0, 10]
            VariableReference XValue: VariableName=[Phenology].Photoperiod
        LeafAppearancePhase LeafAppearance: Start=FloralInitiation; End=FlagLeaf
          VariableReference ThermalTime: VariableName=[Phenology].ThermalTime
          VariableReference FinalLeafNumber: VariableName=[Structure].FinalLeafNumber
          ExpressionFunction LeafNumber
            Expression=[Leaf].ExpandedCohortNo + [Leaf].NextExpandingLeafProportion
          VariableReference FullyExpandedLeafNo: VariableName=[Leaf].ExpandedCohortNo
          VariableReference InitialisedLeafNumber: VariableName=[Leaf].InitialisedCohortNo
        GenericPhase FlagLeafToFlowering: Start=FlagLeaf; End=Flowering
          Constant Target: FixedValue=50; Units=deg day
          VariableReference Progression: VariableName=[Phenology].ThermalTime
        GenericPhase FloweringToGrainFilling: Start=Flowering; End=StartGrainFill
          Constant Target: FixedValue=120; Units=deg day
          VariableReference Progression: VariableName=[Phenology].ThermalTime
        GenericPhase GrainFilling: Start=StartGrainFill; End=EndGrainFill
          Constant Target: FixedValue=550; Units=deg day
          VariableReference Progression: VariableName=[Phenology].ThermalTime
        GenericPhase Maturing: Start=EndGrainFill; End=Maturity
          Constant Target: FixedValue=10; Units=deg day
          VariableReference Progression: VariableName=[Phenology].ThermalTime
        GenericPhase MaturityToHarvestRipe: Start=Maturity; End=HarvestRipe
          Constant Target: FixedValue=10; Units=deg day
          VariableReference Progression: VariableName=[Phenology].ThermalTime
        EndPhase ReadyForHarvesting: Start=HarvestRipe; End=Unused
          VariableReference ThermalTime: VariableName=[Phenology].ThermalTime
        PhotoperiodFunction Photoperiod: Twilight=-6; DayLength=0
        OnEventFunction FloweringDAS: same as Replacements.Wheat.Phenology.FloweringDAS
        OnEventFunction MaturityDAS: same as Replacements.Wheat.Phenology.MaturityDAS
        BBCH
      Structure: CohortInitialisationStage=Germination; LeafInitialisationStage=Emergence
        Memo
          Though tillering is common in some maize varieties under certain agronomic conditions, no tillering is accounted for within this model.  Therefore all branching has been parameterised out of the current maize model.
        Constant StemSenescenceAge: FixedValue=0
        VariableReference ThermalTime: VariableName=[Phenology].ThermalTime
        PhaseLookup Phyllochron
          PhaseLookupValue Phyllochron: Start=Emergence; End=FlagLeaf
            LinearInterpolationFunction Phyllochron
              XYPairs: X=[1, 3.4, 4]; Y=[30, 30, 42]
              VariableReference XValue: VariableName=[Structure].LeafTipsAppeared
        HeightFunction HeightModel
          LinearInterpolationFunction PotentialHeight
            XYPairs: X=[3, 4, 5, 6]; Y=[20, 400, 450, 1700]
            VariableReference XValue: VariableName=[Phenology].Stage
          LinearInterpolationFunction WaterStress
            XYPairs: X=[0, 0.6]; Y=[0, 1]
            VariableReference XValue: VariableName=[Maize].Leaf.Fw
        Constant BranchingRate: FixedValue=0
        AddFunction BranchMortality
          Constant ShadeInducedBranchMortality: FixedValue=0
          Constant DroughtInducedBranchMortality: FixedValue=0
        Constant zFinalLeafNumber: FixedValue=15
        HoldFunction FinalLeafNumber: WhenToHold=FloralInitiation
          AddFunction ValueToHold
            Constant PrimordiaAtEmergence: FixedValue=6
            DivideFunction PrimordiaDuringJuvenilePhase
              AddFunction
                VariableReference JuvenilePhaseDuration: VariableName=[Phenology].Juvenile.Target
                VariableReference PhotoSensitivePhaseDuration: VariableName=[Phenology].Photosensitive.Target
              PhaseLookup MeanPlastochron
                PhaseLookupValue PreEmerg: Start=Germination; End=Emergence
                  Constant: FixedValue=15
                PhaseLookupValue PostEmerg: Start=Emergence; End=FlagLeaf
                  DivideFunction MeanPlastochron
                    AccumulateFunction AccumulatedPlastochron: StartStageName=Emergence; EndStageName=FloralInitiation; FractionRemovedOnCut=0; FractionRemovedOnHarvest=0; FractionRemovedOnGraze=0; FractionRemovedOnPrune=0
                      MultiplyFunction Plastochron
                        VariableReference Phyllochron: VariableName=[Structure].Phyllochron
                        Constant LeafTipsPerPrimordia: FixedValue=0.5
                    AccumulateFunction Days: StartStageName=Emergence; EndStageName=FloralInitiation; FractionRemovedOnCut=0; FractionRemovedOnHarvest=0; FractionRemovedOnGraze=0; FractionRemovedOnPrune=0
                      Constant: FixedValue=1
      ReproductiveOrgan Grain: GrowthRespiration=0; MaintenanceRespiration=0
        Biomass Live: DMDOfStructural=0.6
        Biomass Dead: DMDOfStructural=0.6
        Constant DMConversionEfficiency: FixedValue=1
        Constant RemobilisationCost: FixedValue=0
        Constant InitialGrainProportion: FixedValue=0.05
        Constant MaximumPotentialGrainSize: FixedValue=0.3; Units=g
        Constant MaximumGrainsPerCob: FixedValue=700; Units=number
        PhaseLookup DMDemandFunction
          PhaseLookupValue InitialPhase: Start=Flowering; End=StartGrainFill
            FillingRateFunction
              VariableReference NumberFunction: VariableName=[Grain].NumberFunction
              VariableReference FillingDuration: VariableName=[Phenology].FloweringToGrainFilling.Target
              VariableReference ThermalTime: VariableName=[Phenology].ThermalTime
              MultiplyFunction PotentialSizeIncrement
                VariableReference InitialProportion: VariableName=[Grain].InitialGrainProportion
                VariableReference MaximumSize: VariableName=[Grain].MaximumPotentialGrainSize
          PhaseLookupValue LinearPhase: same as Replacements.Wheat.Grain.DMDemandFunction.LinearPhase
        Constant MinimumNConc: FixedValue=0.008; Units=g/g
        PhaseLookup MaximumNConc
          PhaseLookupValue InitialPhase: Start=Flowering; End=StartGrainFill
            Constant InitialNconc: FixedValue=0.05
          PhaseLookupValue LinearPhase: Start=StartGrainFill; End=EndGrainFill
            Constant FinalNconc: FixedValue=0.013
        Constant WaterContent: FixedValue=0.12; Units=g/g
        PhaseLookup NFillingRate
          PhaseLookupValue GrainFilling: Start=Flowering; End=EndGrainFill
            FillingRateFunction
              VariableReference NumberFunction: VariableName=[Grain].NumberFunction
              AddFunction FillingDuration
                VariableReference FloweringToGrainFilling: VariableName=[Phenology].FloweringToGrainFilling.Target
                VariableReference GrainFilling: VariableName=[Phenology].GrainFilling.Target
              VariableReference ThermalTime: VariableName=[Phenology].ThermalTime
              MultiplyFunction PotentialSizeIncrement
                VariableReference MaximumFinalNConc: VariableName=[Grain].MaximumNConc.LinearPhase.FinalNconc
                VariableReference MaximumSize: VariableName=[Grain].MaximumPotentialGrainSize
        MultiplyFunction NumberFunction
          VariableReference PotentialGrainNumber: VariableName=[MaximumGrainsPerCob]
          LinearInterpolationFunction GrowthRateFactor
            XYPairs: X=[0.55, 3.3, 6.6, 10]; Y=[0, 0.6, 1, 1]
            VariableReference XValue: VariableName=[GrowthRateGrainDevelopment]
          VariableReference Population: VariableName=[Maize].Population
        ExpressionFunction YieldBuPerAcre: Expression=[Grain].Live.Wt * 10 * 56 * 0.4536 * 2.471
        AccumulateFunction GrowthGrainDevelopment: StartStageName=FlagLeaf; EndStageName=StartGrainFill; FractionRemovedOnCut=0; FractionRemovedOnHarvest=0; FractionRemovedOnGraze=0; FractionRemovedOnPrune=0
          VariableReference DailyBiomassProduction: VariableName=[Arbitrator].DM.TotalFixationSupply
        AccumulateFunction DaysGrainDevelopment: StartStageName=FlagLeaf; EndStageName=StartGrainFill; FractionRemovedOnCut=0; FractionRemovedOnHarvest=0; FractionRemovedOnGraze=0; FractionRemovedOnPrune=0
          Constant LenthOfADay: FixedValue=1; Units=days/day
        DivideFunction GrowthRateGrainDevelopment
          VariableReference AccumulatedGrowth: VariableName=[GrowthGrainDevelopment]
          VariableReference GrowthDuration: VariableName=[DaysGrainDevelopment]
          VariableReference Population: VariableName=[Maize].Population
        BiomassRemoval BiomassRemovalDefaults: same as Replacements.Soybean.Grain.BiomassRemovalDefaults
        Constant CarbonConcentration: FixedValue=0.4
      Root: GrowthRespiration=0; MaintenanceRespiration=0
        RootShapeCylinder RootShape
        LinearInterpolationFunction KLModifier
          Memo
            The parameter KL is is described by Meinke et al (1993) to combine elements of soil conductivity (K) with root length (L) in determining root water uptake.  Peake et al (2013) demonstrated that in maize KL varied with plant population through impacts on root length density.  Here we adjust KL linearly with plant population.
          XYPairs: X=[0, 10]; Y=[1, 1]
          VariableReference XValue: VariableName=[Maize].Population
        Constant DMConversionEfficiency: FixedValue=1
        Constant RemobilisationCost: FixedValue=0
        Constant SoilWaterEffect: FixedValue=1
          Memo
            No effect of soil water content on root growth is currently captured in the model.
        Constant MaxDailyNUptake: FixedValue=20; Units=g/m2/d
          Memo
            Maximum daily N uptake is set to an arbitrarily high value.
        Constant SenescenceRate: FixedValue=0.005; Units=/d
          Memo
            Jones and Kiniry (1986) used a constant root senescence fraction in the CERES-Maize model.
        Constant MaximumRootDepth: FixedValue=1000000
        Constant MaximumNConc: FixedValue=0.01; Units=g/g
        Constant MinimumNConc: FixedValue=0.01; Units=g/g
        MultiplyFunction RootFrontVelocity
          PhaseLookup PotentialRootFrontVelocity
            Memo
              [Hammer_etal_2009] used a constant extraction front velocity of 2.5cm per day in their analysis of historical maize yield trends in the US corn belt.
            PhaseLookupValue PreFlowering: Start=Germination; End=Flowering
              Constant RootFrontVelocity: FixedValue=25; Units=mm/d
            PhaseLookupValue PostFlowering: Start=Flowering; End=Maturity
              Constant RootFrontVelocity: FixedValue=0; Units=mm/d
          WeightedTemperatureFunction TemperatureFactor: MaximumTemperatureWeighting=0.5
            XYPairs: X=[0, 8, 15, 35, 50]; Y=[0, 0, 1, 1, 0]
          LinearInterpolationFunction WaterFactor
            SoilWaterScale
            XYPairs: X=[0, 0.25, 1]; Y=[0, 1, 1]
            VariableReference XValue: VariableName=[SoilWaterScale]
        PhaseLookupValue NitrogenDemandSwitch: Start=Germination; End=Maturity
          Constant: FixedValue=1
        BiomassRemoval BiomassRemovalDefaults: same as Replacements.Soybean.Root.BiomassRemovalDefaults
        Constant SpecificRootLength: FixedValue=40; Units=m/g
        Constant KNO3: FixedValue=0.03
        Constant KNH4: FixedValue=0.02
        LinearInterpolationFunction NUptakeSWFactor
          XYPairs: X=[0, 1]; Y=[0, 1]
          VariableReference XValue: VariableName=[Root].RWC
        Constant MaintenanceRespirationFunction: FixedValue=0
        Constant CarbonConcentration: FixedValue=0.4
        BiomassDemand DMDemands
          MultiplyFunction Structural
            PartitionFractionDemandFunction DMDemandFunction
              LinearInterpolationFunction PartitionFraction
                XYPairs: X=[0, 2.99, 3, 6, 7]; Y=[0, 0, 0.2, 0.2, 0]
                VariableReference XValue: VariableName=[Phenology].Stage
            Constant StructuralFraction: FixedValue=1
          Constant Metabolic: FixedValue=0
          StorageDMDemandFunction Storage
            SubtractFunction StorageFraction
              Constant One: FixedValue=1
              VariableReference StructuralFraction: VariableName=[Root].DMDemands.Structural.StructuralFraction
        BiomassDemand NDemands: same as Replacements.Wheat.Root.NDemands
        VariableReference CriticalNConc: VariableName=[Root].MinimumNConc
        BiomassDemand InitialWt
          Constant Structural: FixedValue=0.2; Units=g/plant
          Constant Metabolic: FixedValue=0
          Constant Storage: FixedValue=0
        Constant RootDepthStressFactor: FixedValue=1
      Leaf: MaxCover=1; Albedo=0.18; Gsmax350=0.009; R50=160; KDead=0.03; MaximumMainStemLeafNumber=30
        zero: CurrentExpandingLeaf, StartFractionExpanded, FractionNextleafExpanded, DeadNodesYesterday, GrowthRespiration, LAI, Depth, Width, FRGR, PotentialEP, WaterDemand, TipsAtEmergence, CohortsAtInitialisation, FractionDied
        ExpressionFunction CO2internal: Expression=(163 - [IWeather].MeanT)/(5 - 0.1*[IWeather].MeanT)
        DivideFunction StomatalConductanceCO2Modifier
          VariableReference FCO2: VariableName=[Leaf].Photosynthesis.FCO2
          ExpressionFunction RelativeCO2Gradient
            Expression=([IWeather].CO2 - [Leaf].CO2internal)/(350 - [Leaf].CO2internal)
        LeafCohort InitialLeaves[1]: Rank=1; Area=380
          zero: NReallocationFactor, DMReallocationFactor, NRetranslocationFactor, DMRetranslocationFactor, ShadeInducedSenRate, SenescedFrac, DeltaPotentialArea, DeltaStressConstrainedArea, DeltaCarbonConstrainedArea, PotentialStructuralDMAllocation, PotentialMetabolicDMAllocation, MetabolicNReallocated, MetabolicWtReallocated, StorageNReallocated, StorageWtReallocated, MetabolicNRetranslocated, StorageNRetrasnlocated, DMRetranslocated, MetabolicNAllocation, StructuralDMAllocation, MetabolicDMAllocation, MaintenanceRespiration
        LeafCohort InitialLeaves[2]: same as Replacements.Wheat.Leaf.InitialLeaves[2]
        LeafCohortParameters CohortParameters: ExpansionStressValue=0; CellDivisionStressValue=0; LagAccelerationValue=0; SenescenceAccelerationValue=0; ShadeInducedSenescenceRateValue=0; SenessingLeafRelativeSizeValue=0
          Constant DMReallocationFactor: FixedValue=1
          Constant RemobilisationCost: FixedValue=0
          Constant LeafSizeShapeParameter: FixedValue=0.01
          Constant MaintenanceRespirationFunction: FixedValue=0
          Constant SenessingLeafRelativeSize: FixedValue=1; Units=0-1
          BellCurveFunction MaxArea
            Memo
              Potential leaf area is calculated from leaf number using the approach of Keating and Wafula (1992).
              Individual leaf size is described using a bell-shaped curve, the parameters of which are derived from final leaf number.
            MultiplyFunction LargestLeafPosition
              VariableReference FinalLeafNumber: VariableName=[Structure].FinalLeafNumber
              Constant RelativePositionOfLargestLeaf: FixedValue=0.67
            LinearInterpolationFunction AreaMax
              XYPairs: X=[0, 2, 7, 12, 17, 22]; Y=[32530, 39259, 49659, 60000, 75000, 90000]
              VariableReference XValue: VariableName=[Structure].FinalLeafNumber
            LinearInterpolationFunction Breadth
              XYPairs: X=[5, 10, 15, 20, 25]; Y=[-0.377, -0.144, -0.059, -0.027, -0.016]
              VariableReference XValue: VariableName=[Structure].FinalLeafNumber
            Constant Skewness: FixedValue=0.00025
          Constant NReallocationFactor: FixedValue=1
          Constant NRetranslocationFactor: FixedValue=0
          Constant DMRetranslocationFactor: FixedValue=0.5
          LinearInterpolationFunction CellDivisionStress
            XYPairs: X=[0.9, 1]; Y=[1, 1]
            VariableReference XValue: VariableName=[Maize].Leaf.Fw
          MinimumFunction ExpansionStress
            LinearInterpolationFunction WaterStressEffect
              XYPairs: X=[0, 0.9, 1.3]; Y=[0, 1, 1]
              VariableReference XValue: VariableName=[Root].WaterTensionFactor
            LinearInterpolationFunction TemperatureEffect
              XYPairs: X=[0, 12, 14]; Y=[0, 1, 1]
              VariableReference XValue: VariableName=[IWeather].MeanT
            LinearInterpolationFunction NitrogenStressEffect
              XYPairs: X=[0, 0.5, 1]; Y=[0.1, 0.1, 1]
              VariableReference XValue: VariableName=[Maize].Leaf.Fn
          LinearInterpolationFunction GrowthDuration
            XYPairs: X=[0, 0.3, 0.5, 1]; Y=[1, 200, 250, 100]
            VariableReference XValue: VariableName=[Structure].RelativeNodeApperance
          LinearInterpolationFunction LagDuration
            XYPairs: X=[0, 0.5, 0.7, 0.8, 1]; Y=[300, 300, 700, 900, 1300]
            VariableReference XValue: VariableName=[Structure].RelativeNodeApperance
          LinearInterpolationFunction SenescenceDuration
            XYPairs: X=[0, 0.3, 0.5]; Y=[150, 150, 350]
            VariableReference XValue: VariableName=[Structure].RelativeNodeApperance
          Constant DetachmentLagDuration: FixedValue=1000000
          Constant DetachmentDuration: FixedValue=1000000
          AddFunction MaximumNConc
            VariableReference CriticalNConc: VariableName=[Leaf].CohortParameters.CriticalNConc
            MultiplyFunction StorageNConc
              LinearInterpolationFunction NonStructuralNConc
                XYPairs: X=[1, 10]; Y=[0.034, 0.01]
                VariableReference XValue: VariableName=[Structure].LeafTipsAppeared
              LinearInterpolationFunction WaterStressEffect
                XYPairs: X=[0.5, 0.95, 1]; Y=[0, 0, 1]
                VariableReference XValue: VariableName=[Root].WaterTensionFactor
          Constant CriticalNConc: FixedValue=0.01; Units=g/g
          Constant MinimumNConc: FixedValue=0.005; Units=g/g
          AddFunction LagAcceleration
            Constant One: FixedValue=1
            MultiplyFunction Stress
              Constant StressResponseCoefficient: FixedValue=2
              LinearInterpolationFunction StressFactor
                XYPairs: X=[0.5, 1]; Y=[1, 0]
                VariableReference XValue: VariableName=[Maize].Leaf.Fw
          AddFunction SenescenceAcceleration
            Constant One: FixedValue=1
            MultiplyFunction Stress
              Constant StressResponseCoefficient: FixedValue=0
              LinearInterpolationFunction StressFactor
                XYPairs: X=[0, 1]; Y=[1, 0]
                VariableReference XValue: VariableName=[Root].WaterTensionFactor
          LinearInterpolationFunction SpecificLeafAreaMax
            XYPairs: X=[1, 9]; Y=[30000, 20000]
            VariableReference XValue: VariableName=[Structure].LeafTipsAppeared
          LinearInterpolationFunction SpecificLeafAreaMin
            XYPairs: X=[1, 9]; Y=[25000, 15000]
            VariableReference XValue: VariableName=[Structure].LeafTipsAppeared
          Constant StructuralFraction: FixedValue=0.3
          Constant StorageFraction: FixedValue=0.1
          LinearInterpolationFunction ShadeInducedSenescenceRate
            XYPairs: X=[0, 0.7, 0.8, 0.96, 0.99]; Y=[0, 0, 0, 0, 0]
            VariableReference XValue: VariableName=[Leaf].CohortCurrentRankCoverAbove
          Constant InitialNConc: FixedValue=0; Units=g/g
          ArrayFunction LagDurationAgeMultiplier: Values=1 1 1
          ArrayFunction SenescenceDurationAgeMultiplier: Values=1 1 1
          ArrayFunction LeafSizeAgeMultiplier: Values=1 1 1 1 1 1 1 1 1 1 1 1
        RUEModel Photosynthesis
          Constant RUE: FixedValue=2
          WeightedTemperatureFunction FT: MaximumTemperatureWeighting=0.75
            XYPairs: X=[0, 8, 15, 35, 50]; Y=[0, 0, 1, 1, 0]
          LinearInterpolationFunction FVPD
            XYPairs: X=[0, 10, 50]; Y=[1, 1, 1]
            VariableReference XValue: VariableName=[Leaf].Photosynthesis.VPD
          LinearInterpolationFunction FN
            XYPairs: X=[0, 1]; Y=[0.3, 1]
            VariableReference XValue: VariableName=[Leaf].Fn
          LinearInterpolationFunction FW
            XYPairs: X=[0, 0.3]; Y=[0, 1]
            VariableReference XValue: VariableName=[Leaf].Fw
          RUECO2Function FCO2: PhotosyntheticPathway=C4
          VariableReference RadnInt: VariableName=[Leaf].RadiationIntercepted
        MultiplyFunction ExtinctionCoeff
          Memo
            Extinction coefficient is specified in terms of a potential extinction coefficient which is then discounted during periods of water stress to account for the impact of leaf curling.
          LinearInterpolationFunction PotentialExtinctionCoeff
            XYPairs: X=[0.2, 0.5, 1]; Y=[0.7, 0.5, 0.4]
            VariableReference XValue: VariableName=[Maize].SowingData.RowSpacing
          LinearInterpolationFunction WaterStressImpact
            XYPairs: X=[0, 0.7]; Y=[0.5, 1]
            VariableReference XValue: VariableName=[Maize].Leaf.Fw
        LinearInterpolationFunction FrostFraction
          XYPairs: X=[-2, 2]; Y=[1, 0]
          VariableReference XValue: VariableName=[Weather].MinT
        VariableReference ThermalTime: VariableName=[Phenology].ThermalTime
        Constant RemobilisationCost: FixedValue=0
        MinimumFunction FRGRFunction
          VariableReference FT: VariableName=[Leaf].Photosynthesis.FT
          VariableReference FN: VariableName=[Leaf].Photosynthesis.FN
          VariableReference FVPD: VariableName=[Leaf].Photosynthesis.FVPD
        Constant StructuralFraction: FixedValue=0.7
        Constant DMConversionEfficiency: FixedValue=1; Units=0-1
        BiomassRemoval BiomassRemovalDefaults: same as Replacements.Soybean.Leaf.BiomassRemovalDefaults
        Constant CarbonConcentration: FixedValue=0.4
        Constant WidthFunction: FixedValue=0
        VariableReference DepthFunction: VariableName=[Leaf].Height
      GenericOrgan Husk: IsAboveGround=true
        Constant NReallocationFactor: FixedValue=0
        Constant RemobilisationCost: FixedValue=0
        Constant NRetranslocationFactor: FixedValue=0.1
        Constant MaximumNConc: FixedValue=0.007; Units=g/g
        Constant SenescenceRate: FixedValue=0; Units=/d
        Constant MinimumNConc: FixedValue=0.005; Units=g/g
        Constant DMRetranslocationFactor: FixedValue=0.1
        BiomassRemoval BiomassRemovalDefaults: same as Replacements.Soybean.Nodule.BiomassRemovalDefaults
        Constant DetachmentRateFunction: FixedValue=0; Units=/d
        Constant MaintenanceRespirationFunction: FixedValue=0; Units=0-1
        Constant DMConversionEfficiency: FixedValue=1; Units=0-1
        Constant DMReallocationFactor: FixedValue=0
        VariableReference CriticalNConc: VariableName=[Husk].MinimumNConc
        PhaseLookupValue NitrogenDemandSwitch: Start=Emergence; End=StartGrainFill
          Constant: FixedValue=1
        Constant CarbonConcentration: FixedValue=0.4
        BiomassDemand DMDemands
          MultiplyFunction Structural
            PopulationBasedDemandFunction DMDemandFunction
              VariableReference ThermalTime: VariableName=[Phenology].ThermalTime
              Constant StartStage: FixedValue=5.5
              Constant GrowthDuration: FixedValue=300
              Constant MaximumOrganWt: FixedValue=25
              VariableReference OrganPopulation: VariableName=[Rachis].CobNumber
              Constant SenescenceRate: FixedValue=0; Units=/d
              LinearInterpolationFunction ExpansionStress2
                XYPairs: X=[0, 0.35]; Y=[0, 1]
                VariableReference XValue: VariableName=[Maize].Leaf.Fw
              MinimumFunction ExpansionStress
                LinearInterpolationFunction WaterStressEffect
                  XYPairs: X=[0.1, 0.7, 1.3]; Y=[0, 1, 1]
                  VariableReference XValue: VariableName=[Root].WaterTensionFactor
                LinearInterpolationFunction TemperatureEffect
                  XYPairs: X=[0, 12, 14]; Y=[0, 1, 1]
                  VariableReference XValue: VariableName=[IWeather].MeanT
                LinearInterpolationFunction NitrogenStressEffect
                  XYPairs: X=[0, 0.5, 1]; Y=[0.1, 0.1, 1]
                  VariableReference XValue: VariableName=[Maize].Leaf.Fn
            PhaseLookup StructuralFraction
              PhaseLookupValue PreStemElongation: Start=Emergence; End=StartGrainFill
                Constant StemFraction: FixedValue=0.5
              PhaseLookupValue StemElongation: Start=StartGrainFill; End=HarvestRipe
                Constant StemFraction: FixedValue=1
          Constant Metabolic: FixedValue=0
          StorageDMDemandFunction Storage
            SubtractFunction StorageFraction
              Constant One: FixedValue=1
              VariableReference StructuralFraction: VariableName=[Husk].DMDemands.Structural.StructuralFraction
        BiomassDemand NDemands
          MultiplyFunction Structural
            VariableReference MinNconc: VariableName=[Husk].minimumNconc
            VariableReference PotentialDMAllocation: VariableName=[Husk].potentialDMAllocation.Structural
          MultiplyFunction Metabolic
            SubtractFunction MetabolicNconc
              VariableReference CritNconc: VariableName=[Husk].criticalNConc
              VariableReference MinNconc: VariableName=[Husk].minimumNconc
            VariableReference PotentialDMAllocation: VariableName=[Husk].potentialDMAllocation.Structural
          StorageNDemandFunction Storage
            VariableReference NitrogenDemandSwitch: VariableName=[Husk].nitrogenDemandSwitch
            VariableReference MaxNconc: VariableName=[Husk].maximumNconc
        RetranslocateNonStructural RetranslocateNitrogen
        BiomassDemand InitialWt
          Constant Structural: FixedValue=0; Units=g/m^2
          Constant Metabolic: FixedValue=0
          Constant Storage: FixedValue=0
        Constant Photosynthesis: FixedValue=0
        VariableReference initialNConcFunction: VariableName=[Husk].MinimumNConc
        BiomassDemand dmDemandPriorityFactors
          Constant Structural: FixedValue=1
          Constant Metabolic: FixedValue=1
          Constant Storage: FixedValue=1
      GenericOrgan Rachis: IsAboveGround=true
        MultiplyFunction CobNumber
          VariableReference StemNumber: VariableName=[Structure].TotalStemPopn
          Constant CobsPerStem: FixedValue=1.1
        DivideFunction CobSize
          VariableReference CobMass: VariableName=[Rachis].Live.Wt
          VariableReference CobNumber: VariableName=[Rachis].CobNumber
        Constant NReallocationFactor: FixedValue=0
        Constant RemobilisationCost: FixedValue=0
        Constant NRetranslocationFactor: FixedValue=0.1
        Constant MaximumNConc: FixedValue=0.008; Units=g/g
        Constant SenescenceRate: FixedValue=0; Units=/d
        Constant MinimumNConc: FixedValue=0.003; Units=g/g
        LinearInterpolationFunction ExpansionStress
          XYPairs: X=[0.1, 0.7]; Y=[0, 1]
          VariableReference XValue: VariableName=[Maize].Leaf.Fw
        BiomassRemoval BiomassRemovalDefaults: same as Replacements.Soybean.Nodule.BiomassRemovalDefaults
        Constant DetachmentRateFunction: FixedValue=0; Units=/d
        Constant MaintenanceRespirationFunction: FixedValue=0; Units=0-1
        Constant DMConversionEfficiency: FixedValue=1; Units=0-1
        Constant DMReallocationFactor: FixedValue=0
        Constant DMRetranslocationFactor: FixedValue=0
        VariableReference CriticalNConc: VariableName=[Rachis].MinimumNConc
        PhaseLookupValue NitrogenDemandSwitch: Start=Emergence; End=StartGrainFill
          Constant: FixedValue=1
        Constant CarbonConcentration: FixedValue=0.4
        BiomassDemand DMDemands
          MultiplyFunction Structural
            PopulationBasedDemandFunction DMDemandFunction
              VariableReference ThermalTime: VariableName=[Phenology].ThermalTime
              Constant StartStage: FixedValue=5.5
              Constant GrowthDuration: FixedValue=300
              Constant MaximumOrganWt: FixedValue=23
              VariableReference OrganPopulation: VariableName=[Rachis].CobNumber
              MinimumFunction ExpansionStress: same as Replacements.Maize.Husk.DMDemands.Structural.DMDemandFunction.ExpansionStress
            Constant StructuralFraction: FixedValue=1; Units=g/g
          Constant Metabolic: FixedValue=0
          StorageDMDemandFunction Storage
            SubtractFunction StorageFraction
              Constant One: FixedValue=1
              VariableReference StructuralFraction: VariableName=[Rachis].DMDemands.Structural.StructuralFraction
        BiomassDemand NDemands
          MultiplyFunction Structural
            VariableReference MinNconc: VariableName=[Rachis].minimumNconc
            VariableReference PotentialDMAllocation: VariableName=[Rachis].potentialDMAllocation.Structural
          MultiplyFunction Metabolic
            SubtractFunction MetabolicNconc
              VariableReference CritNconc: VariableName=[Rachis].criticalNConc
              VariableReference MinNconc: VariableName=[Rachis].minimumNconc
            VariableReference PotentialDMAllocation: VariableName=[Rachis].potentialDMAllocation.Structural
          StorageNDemandFunction Storage
            VariableReference NitrogenDemandSwitch: VariableName=[Rachis].nitrogenDemandSwitch
            VariableReference MaxNconc: VariableName=[Rachis].maximumNconc
        RetranslocateNonStructural RetranslocateNitrogen
        BiomassDemand InitialWt
          Constant Structural: FixedValue=0; Units=g/m^2
          Constant Metabolic: FixedValue=0
          Constant Storage: FixedValue=0
        Constant Photosynthesis: FixedValue=0
        VariableReference initialNConcFunction: VariableName=[Rachis].MinimumNConc
        BiomassDemand dmDemandPriorityFactors
          Constant Structural: FixedValue=1
          Constant Metabolic: FixedValue=1
          Constant Storage: FixedValue=1
      GenericOrgan Stem: IsAboveGround=true
        Constant RemobilisationCost: FixedValue=0
        LinearInterpolationFunction MaximumNConc
          XYPairs: X=[0, 0.7, 1]; Y=[0.025, 0.025, 0.005]
          VariableReference XValue: VariableName=[Structure].RelativeNodeApperance
        Constant MinimumNConc: FixedValue=0.004; Units=g/g
        PhaseLookupValue NitrogenDemandSwitch: Start=Emergence; End=StartGrainFill
          Constant: FixedValue=1
        Constant NReallocationFactor: FixedValue=0
        PhaseLookup NRetranslocationFactor
          PhaseLookupValue PreStemElongation: Start=Emergence; End=FlagLeaf
            Constant StemFraction: FixedValue=0
          PhaseLookupValue StemElongation: Start=FlagLeaf; End=HarvestRipe
            Constant NRetranslocationFactor: FixedValue=0.05
        Constant DMRetranslocationFactor: FixedValue=0.1
        BiomassRemoval BiomassRemovalDefaults: same as Replacements.Soybean.Nodule.BiomassRemovalDefaults
        Constant DetachmentRateFunction: FixedValue=0; Units=/d
        Constant SenescenceRate: FixedValue=0; Units=/d
        Constant MaintenanceRespirationFunction: FixedValue=0; Units=0-1
        Constant DMConversionEfficiency: FixedValue=1; Units=0-1
        Constant DMReallocationFactor: FixedValue=0
        AddFunction CriticalNConc
          VariableReference MinimumNConc: VariableName=[Stem].MinimumNConc
          MultiplyFunction MetabolicNConc
            SubtractFunction NonStructuralNConc
              VariableReference MaximumNConc: VariableName=[Stem].MaximumNConc
              VariableReference MinimumNConc: VariableName=[Stem].MinimumNConc
            Constant Proportion: FixedValue=0.2
        Constant CarbonConcentration: FixedValue=0.4
        BiomassDemand DMDemands
          MultiplyFunction Structural
            PartitionFractionDemandFunction DMDemandFunction
              LinearInterpolationFunction PartitionFraction
                XYPairs: X=[3, 5, 6, 7, 7.0001]; Y=[0.1, 0.1, 1, 1, 0]
                VariableReference XValue: VariableName=[Phenology].Stage
            PhaseLookup StructuralFraction: same as Replacements.Maize.Husk.DMDemands.Structural.StructuralFraction
          Constant Metabolic: FixedValue=0
          StorageDMDemandFunction Storage
            SubtractFunction StorageFraction
              Constant One: FixedValue=1
              VariableReference StructuralFraction: VariableName=[Stem].DMDemands.Structural.StructuralFraction
        BiomassDemand NDemands: same as Replacements.Wheat.Stem.NDemands
        RetranslocateNonStructural RetranslocateNitrogen
        BiomassDemand InitialWt
          Constant Structural: FixedValue=0; Units=g/m^2
          Constant Metabolic: FixedValue=0
          Constant Storage: FixedValue=0
        Constant Photosynthesis: FixedValue=0
        VariableReference initialNConcFunction: VariableName=[Stem].MinimumNConc
        BiomassDemand dmDemandPriorityFactors
          Constant Structural: FixedValue=1
          Constant Metabolic: FixedValue=1
          Constant Storage: FixedValue=1
      CompositeBiomass AboveGround: DMDOfStructural=0.6
        Propertys=[[Leaf].Live, [Leaf].Dead, [Stem].Live, [Stem].Dead, [Husk].Live, [Husk].Dead, [Grain].Live, [Grain].Dead, [Rachis].Live, [Rachis].Dead]
        Memo
          The AboveGround composite biomass object includes all organs occurring above the soil surface to allow output for total dry matter and Nutrient contents, including total structural, non-structural and metabolic pools.
      CompositeBiomass BelowGround: Propertys=[[Root].Live, [Root].Dead]; DMDOfStructural=0.6
        Memo
          The BelowGround composite biomass object includes all root biomass pools to allow output for total dry matter and Nutrient contents, including total structural, non-structural and metabolic pools.
      CompositeBiomass Total: DMDOfStructural=0.6
        Propertys=[[Leaf].Live, [Leaf].Dead, [Stem].Live, [Stem].Dead, [Husk].Live, [Husk].Dead, [Grain].Live, [Grain].Dead, [Rachis].Live, [Rachis].Dead, [Root].Live, [Root].Dead]
        Memo
          The Total composite biomass object includes all organs (above+below ground) to allow output for total dry matter and Nutrient contents, including total structural, non-structural and metabolic pools.
      CompositeBiomass TotalLive: DMDOfStructural=0.6
        Propertys=[[Leaf].Live, [Stem].Live, [Husk].Live, [Grain].Live, [Rachis].Live, [Root].Live]
        Memo
          The TotalLive composite biomass object includes the Live pools of all organs (above+below ground) to allow output for total dry matter and Nutrient contents, including total structural, non-structural and metabolic pools.
      CompositeBiomass TotalDead: DMDOfStructural=0.6
        Propertys=[[Leaf].Dead, [Stem].Dead, [Husk].Dead, [Grain].Dead, [Rachis].Dead, [Root].Dead]
        Memo
          The TotalDead composite biomass object includes the Dead pools of all organs (above+below ground) to allow output for total dry matter and Nutrient contents, including total structural, non-structural and metabolic pools.
      CompositeBiomass EarLive: Propertys=[[Husk].Live, [Grain].Live, [Rachis].Live]; DMDOfStructural=0.6
        Memo
          The EarLive composite biomass object includes the Live pools of all organs within the Ear to allow output for total dry matter and Nutrient contents, including total structural, non-structural and metabolic pools.
      CompositeBiomass AboveGroundLive: DMDOfStructural=0.6
        Propertys=[[Leaf].Live, [Stem].Live, [Husk].Live, [Grain].Live, [Rachis].Live]
        Memo
          The AboveGroundLive composite biomass object includes the Live pools of all organs occurring above the soil surface to allow output for total dry matter and Nutrient contents, including total structural, non-structural and metabolic pools.
      CompositeBiomass AboveGroundDead: DMDOfStructural=0.6
        Propertys=[[Leaf].Dead, [Stem].Dead, [Husk].Dead, [Grain].Dead, [Rachis].Dead]
        Memo
          The AboveGroundDead composite biomass object includes the Dead pools of all organs occurring above the soil surface to allow output for total dry matter and Nutrient contents, including total structural, non-structural and metabolic pools.
      Memo Future Development Needs
        #Future Development requirements

        * Phenology not responding to stress events.  Requires better data sets for quantifying the effects of water and nitrogen on leaf apperance and the timing of development stages.
        * Phosphorus response
        * Improved parameterisation of supply and demand for N and DM from organs and arbitration of these resources.
        * Heat Stress responses in grain number
        * More validation under a wider range of environments with more detailed datasets
        * Seedling mortality
        * Water demand (MicroClimate) needs validation
      CultivarFolder
        Cultivar Hycorn_53
          Command:
            [Phenology].Juvenile.Target.FixedValue = 190
            [Phenology].Photosensitive.Target.XYPairs.X = 0, 12.5, 24
            [Phenology].Photosensitive.Target.XYPairs.Y = 0, 0, 124
            [Phenology].FlagLeafToFlowering.Target.FixedValue = 10
            [Phenology].FloweringToGrainFilling.Target.FixedValue = 170
            [Phenology].GrainFilling.Target.FixedValue = 520
            [Rachis].DMDemands.Structural.DMDemandFunction.MaximumOrganWt.FixedValue = 25
            [Grain].MaximumGrainsPerCob.FixedValue =  550
        Cultivar Pioneer_33M54
          Command:
            [Phenology].GrainFilling.Target.FixedValue = 550
            [Phenology].Juvenile.Target.FixedValue = 270
        Cultivar Pioneer_38H20
          Command:
            [Phenology].Juvenile.Target.FixedValue = 210
            [Phenology].GrainFilling.Target.FixedValue = 550
        Cultivar Pioneer_34K77
          Command:
            [Phenology].Juvenile.Target.FixedValue = 280
            [Phenology].GrainFilling.Target.FixedValue = 550
          Memo
            VShort duration variety released in New Zealand by Pioneer
        Cultivar Pioneer_39V43
          Command:
            [Phenology].Juvenile.Target.FixedValue = 100
            [Phenology].GrainFilling.Target.FixedValue = 500
            [Phenology].FloweringToGrainFilling.Target.FixedValue = 170
            [Structure].Phyllochron.Phyllochron.Phyllochron.XYPairs.X = 1, 4, 4.2, 10.5, 11
            [Structure].Phyllochron.Phyllochron.Phyllochron.XYPairs.Y = 26, 26, 46, 46, 70
            [Rachis].DMDemands.Structural.DMDemandFunction.MaximumOrganWt.FixedValue = 18
            [Structure].HeightModel.PotentialHeight.XYPairs.X = 3, 4, 5, 6
            [Structure].HeightModel.PotentialHeight.XYPairs.Y = 20, 40, 50, 1300
          Memo
            VShort duration variety released in New Zealand by Pioneer
        Cultivar Atrium
          Command:
            [Phenology].Juvenile.Target.FixedValue = 150
            [Phenology].GrainFilling.Target.FixedValue = 500
            [Phenology].FloweringToGrainFilling.Target.FixedValue = 170
            [Structure].Phyllochron.Phyllochron.Phyllochron.XYPairs.X = 1, 4, 4.2, 10.5, 11
            [Structure].Phyllochron.Phyllochron.Phyllochron.XYPairs.Y = 26, 26, 46, 46, 70
            [Rachis].DMDemands.Structural.DMDemandFunction.MaximumOrganWt.FixedValue = 18
            [Structure].HeightModel.PotentialHeight.XYPairs.X = 3, 4, 5, 6
            [Structure].HeightModel.PotentialHeight.XYPairs.Y = 20, 40, 50, 2370
          Memo
            Maize variety used in trials at Wageningen University
        Cultivar Laila
          Command:
            [Phenology].Juvenile.Target.FixedValue = 211
            [Phenology].Photosensitive.Target.XYPairs.X = 0, 12.5, 24
            [Phenology].Photosensitive.Target.XYPairs.Y = 0, 0, 0
            [Phenology].FlagLeafToFlowering.Target.FixedValue = 1
            [Phenology].FloweringToGrainFilling.Target.FixedValue = 170
            [Phenology].GrainFilling.Target.FixedValue = 812
            [Phenology].Maturing.Target.FixedValue = 1
            [Phenology].MaturityToHarvestRipe.Target.FixedValue = 1
            [Rachis].DMDemands.Structural.DMDemandFunction.MaximumOrganWt.FixedValue = 36
            [Grain].MaximumGrainsPerCob.FixedValue =  720
        Cultivar GH_5019WX
          Command:
            [Phenology].Juvenile.Target.FixedValue = 225
            [Phenology].Photosensitive.Target.XYPairs.X = 0, 12.5, 24.0
            [Phenology].Photosensitive.Target.XYPairs.Y = 0, 0, 124
            [Phenology].FlagLeafToFlowering.Target.FixedValue = 101
            [Phenology].FloweringToGrainFilling.Target.FixedValue = 170
            [Phenology].GrainFilling.Target.FixedValue = 694
            [Rachis].DMDemands.Structural.DMDemandFunction.MaximumOrganWt.FixedValue = 25
            [Grain].MaximumGrainsPerCob.FixedValue = 550
        Cultivar Hycorn_40
          Command:
            [Phenology].Juvenile.Target.FixedValue = 190
            [Phenology].Photosensitive.Target.XYPairs.X = 0, 12.5, 24
            [Phenology].Photosensitive.Target.XYPairs.Y = 0, 0, 124
            [Phenology].FlagLeafToFlowering.Target.FixedValue = 50
            [Phenology].FloweringToGrainFilling.Target.FixedValue = 170
            [Phenology].GrainFilling.Target.FixedValue = 713
            [Rachis].DMDemands.Structural.DMDemandFunction.MaximumOrganWt.FixedValue = 25
            [Grain].MaximumGrainsPerCob.FixedValue =  550
        Cultivar GH_5009
          Command:
            [Phenology].Juvenile.Target.FixedValue = 190
            [Phenology].Photosensitive.Target.XYPairs.X = 0, 12.5, 24
            [Phenology].Photosensitive.Target.XYPairs.Y = 0, 0, 300
            [Phenology].FlagLeafToFlowering.Target.FixedValue = 50
            [Phenology].FloweringToGrainFilling.Target.FixedValue = 170
            [Phenology].GrainFilling.Target.FixedValue = 713
            [Rachis].DMDemands.Structural.DMDemandFunction.MaximumOrganWt.FixedValue = 25
            [Grain].MaximumGrainsPerCob.FixedValue =  550
        Cultivar Dekalb_XL82
          Command:
            [Phenology].Juvenile.Target.FixedValue = 211
            [Phenology].Photosensitive.Target.XYPairs.X = 0, 12.5, 24
            [Phenology].Photosensitive.Target.XYPairs.Y = 0, 0, 472
            [Phenology].FlagLeafToFlowering.Target.FixedValue = 101
            [Phenology].FloweringToGrainFilling.Target.FixedValue = 170
            [Phenology].GrainFilling.Target.FixedValue = 813
            [Rachis].DMDemands.Structural.DMDemandFunction.MaximumOrganWt.FixedValue = 25
            [Grain].MaximumGrainsPerCob.FixedValue = 550
        Cultivar malawi_local
          Command:
            [Phenology].Juvenile.Target.FixedValue = 280
            [Phenology].Photosensitive.Target.XYPairs.X = 0, 12.5, 24
            [Phenology].Photosensitive.Target.XYPairs.Y = 0, 0, 264.5
            [Phenology].FlagLeafToFlowering.Target.FixedValue = 10
            [Phenology].FloweringToGrainFilling.Target.FixedValue = 170
            [Phenology].GrainFilling.Target.FixedValue = 600
            [Rachis].DMDemands.Structural.DMDemandFunction.MaximumOrganWt.FixedValue = 14
            [Grain].MaximumGrainsPerCob.FixedValue = 360
            [Grain].MaximumPotentialGrainSize.FixedValue = 0.217
          Memo
            The variety malawi_local is a Malawian medium-late maturing local variety.  Photoperiod response is taken from Ellis et al Crop Sci 32:1225 for SR52.
        Cultivar mh19
          Command:
            [Phenology].Juvenile.Target.FixedValue = 290
            [Phenology].Photosensitive.Target.XYPairs.X = 0, 12.5, 24
            [Phenology].Photosensitive.Target.XYPairs.Y = 0, 0, 264.5
            [Phenology].FlagLeafToFlowering.Target.FixedValue = 10
            [Phenology].FloweringToGrainFilling.Target.FixedValue = 170
            [Phenology].GrainFilling.Target.FixedValue = 570
            [Rachis].DMDemands.Structural.DMDemandFunction.MaximumOrganWt.FixedValue = 14
            [Grain].MaximumGrainsPerCob.FixedValue = 504
            [Grain].MaximumPotentialGrainSize.FixedValue = 0.361
          Memo
            The variety mh19 is a Malawian medium-late maturing hybrid.  Photoperiod response is taken from Ellis et al Crop Sci 32:1225 for SR52.
        Cultivar mh17
          Command:
            [Phenology].Juvenile.Target.FixedValue = 290
            [Phenology].Photosensitive.Target.XYPairs.X = 0, 12.5, 24
            [Phenology].Photosensitive.Target.XYPairs.Y = 0, 0, 264.5
            [Phenology].FlagLeafToFlowering.Target.FixedValue = 10
            [Phenology].FloweringToGrainFilling.Target.FixedValue = 170
            [Phenology].GrainFilling.Target.FixedValue = 570
            [Rachis].DMDemands.Structural.DMDemandFunction.MaximumOrganWt.FixedValue = 14
            [Grain].MaximumGrainsPerCob.FixedValue = 504
            [Grain].MaximumPotentialGrainSize.FixedValue = 0.361
          Memo
            The variety mh17 is a Malawian medium-late maturing hybrid.  Photoperiod response is taken from Ellis et al Crop Sci 32:1225 for SR52.
        Cultivar mh16
          Command:
            [Phenology].Juvenile.Target.FixedValue = 290
            [Phenology].Photosensitive.Target.XYPairs.X = 0, 12.5, 24
            [Phenology].Photosensitive.Target.XYPairs.Y = 0, 0, 264.5
            [Phenology].FlagLeafToFlowering.Target.FixedValue = 10
            [Phenology].FloweringToGrainFilling.Target.FixedValue = 170
            [Phenology].GrainFilling.Target.FixedValue = 570
            [Rachis].DMDemands.Structural.DMDemandFunction.MaximumOrganWt.FixedValue = 14
            [Grain].MaximumGrainsPerCob.FixedValue = 504
            [Grain].MaximumPotentialGrainSize.FixedValue = 0.361
          Memo
            The variety mh16 is a Malawian medium-late maturing hybrid.  Photoperiod response is taken from Ellis et al Crop Sci 32:1225 for SR52.
        Cultivar mh12
          Command:
            [Phenology].Juvenile.Target.FixedValue = 290
            [Phenology].Photosensitive.Target.XYPairs.X = 0, 12.5, 24
            [Phenology].Photosensitive.Target.XYPairs.Y = 0, 0, 264.5
            [Phenology].FlagLeafToFlowering.Target.FixedValue = 10
            [Phenology].FloweringToGrainFilling.Target.FixedValue = 170
            [Phenology].GrainFilling.Target.FixedValue = 570
            [Rachis].DMDemands.Structural.DMDemandFunction.MaximumOrganWt.FixedValue = 14
            [Grain].MaximumGrainsPerCob.FixedValue = 504
            [Grain].MaximumPotentialGrainSize.FixedValue = 0.361
          Memo
            The variety mh12 is a Malawian medium-late maturing hybrid.  Photoperiod response is taken from Ellis et al Crop Sci 32:1225 for SR52.
        Cultivar sc623
          Command:
            [Phenology].Juvenile.Target.FixedValue = 280
            [Phenology].Photosensitive.Target.XYPairs.X = 0, 12.5, 24
            [Phenology].Photosensitive.Target.XYPairs.Y = 0, 0, 264.5
            [Phenology].FlagLeafToFlowering.Target.FixedValue = 10
            [Phenology].FloweringToGrainFilling.Target.FixedValue = 170
            [Phenology].GrainFilling.Target.FixedValue = 550
            [Rachis].DMDemands.Structural.DMDemandFunction.MaximumOrganWt.FixedValue = 14
            [Grain].MaximumGrainsPerCob.FixedValue = 504
            [Grain].MaximumPotentialGrainSize.FixedValue = 0.361
          Memo
            The variety sc623 is a Zimbabwean medium-late maturing hybrid.  Photoperiod response is taken from Ellis et al Crop Sci 32:1225 for SR52.
        Cultivar sc625
          Command:
            [Phenology].Juvenile.Target.FixedValue = 280
            [Phenology].Photosensitive.Target.XYPairs.X = 0, 12.5, 24
            [Phenology].Photosensitive.Target.XYPairs.Y = 0, 0, 264.5
            [Phenology].FlagLeafToFlowering.Target.FixedValue = 10
            [Phenology].FloweringToGrainFilling.Target.FixedValue = 170
            [Phenology].GrainFilling.Target.FixedValue = 570
            [Rachis].DMDemands.Structural.DMDemandFunction.MaximumOrganWt.FixedValue = 14
            [Grain].MaximumGrainsPerCob.FixedValue = 504
            [Grain].MaximumPotentialGrainSize.FixedValue = 0.361
          Memo
            The variety sc625 is a Zimbabwean medium-late maturing hybrid.  Photoperiod response is taken from Ellis et al Crop Sci 32:1225 for SR52.
        Cultivar sc601
          Command:
            [Phenology].Juvenile.Target.FixedValue = 280
            [Phenology].Photosensitive.Target.XYPairs.X = 0, 12.5, 24
            [Phenology].Photosensitive.Target.XYPairs.Y = 0, 0, 264.5
            [Phenology].FlagLeafToFlowering.Target.FixedValue = 10
            [Phenology].FloweringToGrainFilling.Target.FixedValue = 170
            [Phenology].GrainFilling.Target.FixedValue = 560
            [Rachis].DMDemands.Structural.DMDemandFunction.MaximumOrganWt.FixedValue = 14
            [Grain].MaximumGrainsPerCob.FixedValue = 495
            [Grain].MaximumPotentialGrainSize.FixedValue = 0.361
          Memo
            The variety sc601 is a Zimbabwean medium-late maturing hybrid.  Photoperiod response is taken from Ellis et al Crop Sci 32:1225 for SR52.
        Cultivar CG4141
          Command:
            [Phenology].Juvenile.Target.FixedValue = 233
            [Phenology].Photosensitive.Target.XYPairs.X = 0, 12.5, 24
            [Phenology].Photosensitive.Target.XYPairs.Y = 0, 0, 264.5
            [Phenology].FlagLeafToFlowering.Target.FixedValue = 10
            [Phenology].FloweringToGrainFilling.Target.FixedValue = 170
            [Phenology].GrainFilling.Target.FixedValue = 550
            [Rachis].DMDemands.Structural.DMDemandFunction.MaximumOrganWt.FixedValue = 14
            [Grain].MaximumGrainsPerCob.FixedValue = 468
            [Grain].MaximumPotentialGrainSize.FixedValue = 0.361
          Memo
            The variety CG4141 is a Zimbabwean early-medium maturing hybrid.  Photoperiod response is taken from Ellis et al Crop Sci 32:1225 for SR52.
        Cultivar mh18
          Command:
            [Phenology].Juvenile.Target.FixedValue = 260
            [Phenology].Photosensitive.Target.XYPairs.X = 0, 12.5, 24
            [Phenology].Photosensitive.Target.XYPairs.Y = 0, 0, 264.5
            [Phenology].FlagLeafToFlowering.Target.FixedValue = 10
            [Phenology].FloweringToGrainFilling.Target.FixedValue = 170
            [Phenology].GrainFilling.Target.FixedValue = 550
            [Rachis].DMDemands.Structural.DMDemandFunction.MaximumOrganWt.FixedValue = 14
            [Grain].MaximumGrainsPerCob.FixedValue = 486
            [Grain].MaximumPotentialGrainSize.FixedValue = 0.361
          Memo
            The variety mh18 is a Zimbabwean early-medium maturing hybrid.  Photoperiod response is taken from Ellis et al Crop Sci 32:1225 for SR52.
        Cultivar r215
          Command:
            [Phenology].Juvenile.Target.FixedValue = 250
            [Phenology].Photosensitive.Target.XYPairs.X = 0, 12.5, 24
            [Phenology].Photosensitive.Target.XYPairs.Y = 0, 0, 264.5
            [Phenology].FlagLeafToFlowering.Target.FixedValue = 10
            [Phenology].FloweringToGrainFilling.Target.FixedValue = 170
            [Phenology].GrainFilling.Target.FixedValue = 550
            [Rachis].DMDemands.Structural.DMDemandFunction.MaximumOrganWt.FixedValue = 14
            [Grain].MaximumGrainsPerCob.FixedValue = 468
            [Grain].MaximumPotentialGrainSize.FixedValue = 0.361
          Memo
            The variety r215 is a Zimbabwean early-medium maturing hybrid.  Photoperiod response is taken from Ellis et al Crop Sci 32:1225 for SR52.
        Cultivar Melkassa
          Command:
            [Phenology].Juvenile.Target.FixedValue = 230
            [Phenology].Photosensitive.Target.XYPairs.X = 0, 12.5, 24
            [Phenology].Photosensitive.Target.XYPairs.Y = 0, 0, 264.5
            [Phenology].FlagLeafToFlowering.Target.FixedValue = 10
            [Phenology].FloweringToGrainFilling.Target.FixedValue = 160
            [Phenology].GrainFilling.Target.FixedValue = 550
            [Rachis].DMDemands.Structural.DMDemandFunction.MaximumOrganWt.FixedValue = 14
            [Grain].MaximumGrainsPerCob.FixedValue = 387
            [Grain].MaximumPotentialGrainSize.FixedValue = 0.33
          Memo
            The variety Melkassa is a local early-medium maturing Ethiopian variety.
        Cultivar sr52
          Command:
            [Phenology].Juvenile.Target.FixedValue = 250
            [Phenology].Photosensitive.Target.XYPairs.X = 0, 12.5, 24
            [Phenology].Photosensitive.Target.XYPairs.Y = 0, 0, 264.5
            [Phenology].FlagLeafToFlowering.Target.FixedValue = 10
            [Phenology].FloweringToGrainFilling.Target.FixedValue = 170
            [Phenology].GrainFilling.Target.FixedValue = 550
            [Rachis].DMDemands.Structural.DMDemandFunction.MaximumOrganWt.FixedValue = 14
            [Grain].MaximumGrainsPerCob.FixedValue = 468
            [Grain].MaximumPotentialGrainSize.FixedValue = 0.361
          Memo
            The variety sr52 is a Zimbabwean early-medium maturing hybrid.  Photoperiod response is taken from Ellis et al Crop Sci 32:1225 for SR52.
        Cultivar sc501
          Command:
            [Phenology].Juvenile.Target.FixedValue = 250
            [Phenology].Photosensitive.Target.XYPairs.X = 0, 12.5, 24
            [Phenology].Photosensitive.Target.XYPairs.Y = 0, 0, 264.5
            [Phenology].FlagLeafToFlowering.Target.FixedValue = 10
            [Phenology].FloweringToGrainFilling.Target.FixedValue = 170
            [Phenology].GrainFilling.Target.FixedValue = 550
            [Rachis].DMDemands.Structural.DMDemandFunction.MaximumOrganWt.FixedValue = 14
            [Grain].MaximumGrainsPerCob.FixedValue = 468
            [Grain].MaximumPotentialGrainSize.FixedValue = 0.361
          Memo
            The variety sc501 is a Zimbabwean early-medium maturing hybrid.  Photoperiod response is taken from Ellis et al Crop Sci 32:1225 for SR52.
        Cultivar r201
          Command:
            [Phenology].Juvenile.Target.FixedValue = 230
            [Phenology].Photosensitive.Target.XYPairs.X = 0, 12.5, 24
            [Phenology].Photosensitive.Target.XYPairs.Y = 0, 0, 264.5
            [Phenology].FlagLeafToFlowering.Target.FixedValue = 10
            [Phenology].FloweringToGrainFilling.Target.FixedValue = 170
            [Phenology].GrainFilling.Target.FixedValue = 550
            [Rachis].DMDemands.Structural.DMDemandFunction.MaximumOrganWt.FixedValue = 14
            [Grain].MaximumGrainsPerCob.FixedValue = 450
            [Grain].MaximumPotentialGrainSize.FixedValue = 0.375
          Memo
            The variety r201 is a Zimbabwean early maturing hybrid.  Photoperiod response is taken from Ellis et al Crop Sci 32:1225 for SR52.
        Cultivar sc401
          Command:
            [Phenology].Juvenile.Target.FixedValue = 230
            [Phenology].Photosensitive.Target.XYPairs.X = 0, 12.5, 24
            [Phenology].Photosensitive.Target.XYPairs.Y = 0, 0, 264.5
            [Phenology].FlagLeafToFlowering.Target.FixedValue = 10
            [Phenology].FloweringToGrainFilling.Target.FixedValue = 170
            [Phenology].GrainFilling.Target.FixedValue = 550
            [Rachis].DMDemands.Structural.DMDemandFunction.MaximumOrganWt.FixedValue = 14
            [Grain].MaximumGrainsPerCob.FixedValue = 450
            [Grain].MaximumPotentialGrainSize.FixedValue = 0.375
          Memo
            The variety NSCM_41 is a Zimbabwean early maturing hybrid.  Photoperiod response is taken from Ellis et al Crop Sci 32:1225 for SR52.
        Cultivar NSCM_41: same as Replacements.Maize.CultivarFolder.sc401
        Cultivar Makueni
          Command:
            [Phenology].Juvenile.Target.FixedValue = 150
            [Phenology].Photosensitive.Target.XYPairs.X = 0, 12.5, 24
            [Phenology].Photosensitive.Target.XYPairs.Y = 0, 0, 115
            [Phenology].FlagLeafToFlowering.Target.FixedValue = 10
            [Phenology].FloweringToGrainFilling.Target.FixedValue = 120
            [Phenology].GrainFilling.Target.FixedValue = 530
            [Rachis].DMDemands.Structural.DMDemandFunction.MaximumOrganWt.FixedValue = 14
            [Grain].MaximumGrainsPerCob.FixedValue = 432
            [Grain].MaximumPotentialGrainSize.FixedValue = 0.375
          Memo
            The variety Makueni Composite is a kenyan variety with similar phenology but slightly higher cob size than Katumani composite.
        Cultivar Katumani
          Command:
            [Phenology].Juvenile.Target.FixedValue = 150
            [Phenology].Photosensitive.Target.XYPairs.X = 0, 12.5, 24
            [Phenology].Photosensitive.Target.XYPairs.Y = 0, 0, 115
            [Phenology].FlagLeafToFlowering.Target.FixedValue = 10
            [Phenology].FloweringToGrainFilling.Target.FixedValue = 120
            [Phenology].GrainFilling.Target.FixedValue = 530
            [Rachis].DMDemands.Structural.DMDemandFunction.MaximumOrganWt.FixedValue = 14
            [Grain].MaximumGrainsPerCob.FixedValue = 405
            [Grain].MaximumPotentialGrainSize.FixedValue = 0.375
          Memo
            The variety Katumani Composite B was formed in 1966 and released in 1968 as part of the maize breeding work undertaken at the Katumani Research Station in Kenya which started in 1956.  Katumani Composite B was an advanced generation of Katumani Synthetic V X Katumani Synthetic VI.  It has slight photoperiod sensitivity and relatively small potential cob size.
        Cultivar Pioneer_3153
        Cultivar Pioneer_39G12
          Command:
            [Phenology].Juvenile.Target.FixedValue = 180
            [Phenology].GrainFilling.Target.FixedValue = 500
            [Grain].MaximumGrainsPerCob.FixedValue = 550
            [Grain].NumberFunction.GrowthRateFactor.XYPairs.X = 0.2,2,4,10
            [Grain].NumberFunction.GrowthRateFactor.XYPairs.Y = 0,0.6,1,1
            [Grain].MaximumPotentialGrainSize.FixedValue = 0.25
      CompositeBiomass Spike: Propertys=[[Husk].Live, [Rachis].Live]; DMDOfStructural=0.6
        Memo
          The SpikeLive composite biomass object includes the Live pools of then non-grain organs within the reproductive spike to allow output for total dry matter and Nutrient contents, including total structural, non-structural and metabolic pools.
      Constant MortalityRate: FixedValue=0
  Simulation SimulationWheatRye
    Clock: Start=2016-01-01; End=2017-12-31
    Summary SummaryFile
    Weather: FileName=Ames.met
    SoilArbitrator Soil Arbitrator
    Zone field: Area=1; Slope=0; AspectAngle=0; Altitude=50
      Report: EventNames=[Clock].EndOfDay
        VariableNames:
          [Clock].Today
          [Wheat].Phenology.Stage
          [Wheat].Phenology.MinimumLeafNumber
          [Wheat].Leaf.LAI
          [Wheat].Phenology.AccumulatedTT
          [Wheat].AboveGround.Wt
          [Wheat].AboveGround.NConc
      Fertiliser
      SurfaceOrganicMatter: InitialResidueName=maize_stubble; InitialResidueType=maize; InitialResidueMass=500; InitialStandingFraction=0; InitialCPR=0; InitialCNR=80
      Plant Wheat
      MicroClimate: a_interception=0; b_interception=1; c_interception=0; d_interception=0; SoilHeatFluxFraction=0.4; MinimumHeightDiffForNewLayer=0; NightInterceptionFraction=0.5; ReferenceHeight=2
      Soil: SoilType=Nicollet; LocalName=SoilAmesCorn; NearestTown=Ames; Region=Boone; State=Iowa; Country=US; ApsoilNumber=34; Latitude=42.02204; Longitude=-93.769115; DataSource=mesured data and web soil survey; Comments=hydrological parameters and BD from Saxton and Rawls, 2006
        Physical
          Thickness  BD    AirDry  LL15   DUL    SAT   KS
          25         1.25  0.135   0.174  0.31   0.49  151
          25         1.25  0.135   0.174  0.31   0.49  128
          50         1.25  0.15    0.174  0.3    0.48  239
          100        1.25  0.165   0.165  0.25   0.47  158
          100        1.25  0.12    0.12   0.22   0.47  144
          150        1.35  0.11    0.11   0.21   0.46  115
          150        1.35  0.102   0.102  0.22   0.45  103
          150        1.36  0.126   0.126  0.265  0.44  182
          150        1.36  0.133   0.133  0.261  0.43  168
          150        1.36  0.128   0.128  0.253  0.42  159
          150        1.4   0.128   0.128  0.2    0.42  2
          300        1.4   0.09    0.09   0.28   0.4   2
          300        1.4   0.09    0.09   0.18   0.39  2
          300        1.4   0.09    0.09   0.2    0.38  2
          400        1.4   0.09    0.09   0.191  0.37  2
          SoilCrop WheatSoil
            LL=[0.174, 0.174, 0.174, 0.165, 0.12, 0.11, 0.102, 0.126, 0.133, 0.128, 0.128, 0.09, 0.09, 0.09, 0.09]
            KL=[0.08, 0.08, 0.08, 0.08, 0.08, 0.08, 0.07, 0.06, 0.06, 0.04, 0.01, 0.01, 0.01, 0, 0]
            XF=[1, 1, 1, 1, 1, 1, 1, 1, 1, 1, 1, 1, 0.5, 0, 0]
        Organic: FOMCNRatio=46
          Thickness  Carbon  SoilCNRatio  FBiom  FInert  FOM
          25         2.43    12.5         0.191  0.4     483.114
          25         2.34    12.5         0.164  0.4     468.836
          50         2.44    12.5         0.162  0.4     441.533
          100        2.37    12.5         0.055  0.441   391.605
          100        1.98    12.5         0.017  0.52    347.322
          150        1.95    12.5         0.018  0.619   290.108
          150        0.97    12.5         0.034  0.738   242.318
          150        0.98    12.5         0.04   0.802   202.401
          150        0.49    12.5         0.061  0.797   169.06
          150        0.49    12.5         0.053  0.798   141.211
          150        0.49    12.5         0.011  0.808   117.949
          300        0.49    12.5         0.01   0.857   82.2903
          300        0.49    12.5         0.012  0.95    57.412
          300        0.49    12.5         0.016  0.99    40.055
          400        0.49    12.5         0.01   0.99    24.7854
        Chemical
          Thickness  NO3N       NH4N       PH
          25         4.7        8.8        7.48
          25         5          14.7       7.48
          50         3.5        2.9        7.48
          100        4.4        3.7        7.38
          100        5.1        2.19       7.43
          150        3.9        1.35       7.43
          150        2.9        0.84       7.73
          150        1.7        0.735294   7.73
          150        0.539216   0.735294   8.08
          150        0.441176   0.0490196  8.08
          150        0.380952   0.0952381  8.08
          300        0.261905   0.0714286  8.08
          300        0.119048   0.0952381  8.08
          300        0.0952381  0          8.08
          400        0          0          8.08
        Sample Initial nitrogen: SWUnits=Volumetric; OCUnits=Total; PHUnits=Water
          Thickness=[25, 25, 50, 100, 100, 150, 150, 150, 150, 150, 150, 300, 300, 300, 400]
          SW=[0.31, 0.31, 0.32, 0.25, 0.327, 0.304, 0.298, 0.285, 0.384, 0.335, 0.37, 0.332, 0.242, 0.256, 0.234]
        WaterBalance SoilWater: SummerDate=1-Nov; SummerU=6; SummerCona=3.5; WinterDate=1-Apr; WinterU=6; WinterCona=3.5; DiffusConst=88; DiffusSlope=35.4; Salb=0.2; CN2Bare=85; CNRed=20; CNCov=0.8; DischargeWidth=0; CatchmentArea=0; Thickness=[150, 150, 150, 150, 150, 150, 300, 300, 1000]; SWCON=[0.7, 0.7, 0.7, 0.7, 0.7, 0.7, 0.2, 0.2, 0.2]
        CERESSoilTemperature Temperature
        Nutrient
      Manager SowFixedDate
        Crop = [Wheat]
        SowDate = 10-oct
        CultivarName = Yecora
        SowingDepth = 50
        RowSpacing = 150
        Population = 300
```csharp
using APSIM.Shared.Utilities;
using Models.Utilities;
using Models.Soils;
using Models.PMF;
using Models.Core;
using System;

namespace Models
{
    [Serializable]
    public class Script : Model
    {
        [Link] Clock Clock;
        [Link] Fertiliser Fertiliser;
        [Link] Summary Summary;
        [Link] Soil Soil;
        Accumulator accumulatedRain;
        
        [Description("Crop")]
        public IPlant Crop { get; set; }
        [Description("Sowing date (d-mmm)")]
        public string SowDate { get; set; }
    [Display(Type = DisplayType.CultivarName)]
        [Description("Cultivar to be sown")]
        public string CultivarName { get; set; }
        [Description("Sowing depth (mm)")]
        public double SowingDepth { get; set; }
        [Description("Row spacing (mm)")]
        public double RowSpacing { get; set; }
        [Description("Plant population (/m2)")]
        public double Population { get; set; }
        


        [EventSubscribe("DoManagement")]
        private void OnDoManagement(object sender, EventArgs e)
        {
            if (DateUtilities.WithinDates(SowDate, Clock.Today, SowDate))
            {
                Crop.Sow(population: Population, cultivar: CultivarName, depth: SowingDepth, rowSpacing: RowSpacing);    
            }
        
        }
        
    }
}
```
      Manager Harvesting
        Crop = [Wheat]
```csharp
using APSIM.Shared.Utilities;
using Models.Utilities;
using Models.Soils;
using Models.PMF;
using Models.Core;
using System;

namespace Models
{
    [Serializable] 
    public class Script : Model
    {
        [Description("Crop")]
        public IPlant Crop { get; set; }
        
        [EventSubscribe("DoManagement")]
        private void OnDoManagement(object sender, EventArgs e)
        {
            if (Crop.IsReadyForHarvesting)
            {
                Crop.Harvest();
                Crop.EndCrop();
            }
        }
    }
}
```
  DataStore
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