folder simulations-canisteo-corn: version=37; creator=Apsim 7.9-r4044
  factorial Factorials: active=0
    settings
  folder LongTerm-IA-corn
    simulation IA-CC_Canisteo_Cover
      metfile met: filename=boone-10-19.met
      clock
        start_date = 01/01/2010  # Enter the start date of the simulation
        end_date = 09/11/2019  # Enter the end date of the simulation
      summaryfile
      area paddock
        Soil CL (Canisteo No209): SoilType=Canisteo; Region=Renville; State=Minnesota; Country=US; ApsoilNumber=209; Latitude=44.7892; Longitude=-95.2114; YearOfSampling=2015
          DataSource:
            Original data by http://websoilsurvey.sc.egov.usda.gov/App/HomePage.htm
            Profile developed by Integrated Cropping Systems Lab, Department of Agronomy, ISU
          Comments:
            The Canisteo series consists of very deep, poorly and very poorly drained soils that formed in calcareous, loamy till or in a thin mantle of loamy or silty sediments and the underlying calcareous, loamy till. These soils are on rims of depressions, depressions and flats on moraines or till plains. Slope ranges from 0 to 2 percent. Mean air annual temperature is about 9 degrees C. Mean annual precipitation is about 785 millimeters.

            TAXONOMIC CLASS: Fine-loamy, mixed, superactive, calcareous, mesic Typic Endoaquolls

            TYPICAL PEDON: Canisteo clay loam, on a nearly level to slightly convex slope, on a ground moraine, in a cultivated field. (Colors are for moist soil unless otherwise noted.)

            Ap--0 to 25 centimeters inches; black (N 2/0) clay loam, very dark gray (N 3/0) dry; weak medium subangular blocky structure; friable; about 2 percent gravel; strongly effervescent; slightly alkaline; abrupt smooth boundary.

            A--25 to 46 centimeters; very dark gray (N 3/0) clay loam, dark gray (N 4/0) dry; moderate very fine subangular blocky structure; friable; about 2 percent gravel; strongly effervescent; slightly alkaline; clear smooth boundary.

            Bkg1--46 to 61 centimeters; olive gray (5Y 5/2) loam; weak medium subangular blocky structure; friable; few light gray (2.5Y 7/2) calcium carbonates on faces of peds; few fine prominent olive (5Y 5/6) iron concentrations; about 3 percent gravel; strongly effervescent; moderately alkaline; clear smooth boundary.

            Bkg2--61 to 99 centimeters; light olive gray (5Y 6/2) loam; weak medium subangular blocky structure; friable; few light gray (2.5Y 7/2) calcium carbonates on faces of peds; common fine prominent light olive brown (2.5Y 5/6) iron concentrations; about 3 percent gravel; slightly effervescent; slightly alkaline; clear smooth boundary.

            Cg1--99 to 165 centimeters; gray (5Y 6/1) loam; massive; friable; common medium prominent light olive brown (2.5Y 5/4) iron concentrations; about 5 percent gravel; slightly effervescent; slightly alkaline; clear smooth boundary.

            Cg2--165 to 203 centimeters; gray (5Y 6/1) loam; massive; friable; few dark yellowish brown (10YR 4/6) iron concretions in pores; many medium prominent dark yellowish brown (10YR 4/6) iron concentrations; about 5 percent gravel; slightly effervescent; slightly alkaline.

            TYPE LOCATION: Major Land Resource Area (MLRA) 103-Central Iowa and Minnesota Till Prairies, Waseca County, Minnesota subset; about 4.5 miles south and 3 miles west of Waseca; located about 1,800 feet south and 200 feet west of the northeast corner of section 22, T. 108 N., R. 22 W.; USGS Morristown quadrangle; lat. 44 degrees 8 minutes 52 seconds N. and long. 93 degrees 26 minutes 50 seconds W., NAD 83.
          Water
            Thickness  BD     AirDry  LL15   DUL    SAT       KS
            250        1.4    0.2106  0.234  0.345  0.421698  792.567
            250        1.4    0.234   0.234  0.345  0.421698  792.567
            40         1.425  0.212   0.212  0.33   0.412264  792.567
            40         1.425  0.212   0.212  0.33   0.412264  792.567
            190        1.4    0.137   0.137  0.272  0.421698  792.567
            190        1.4    0.137   0.137  0.272  0.421698  792.567
            280        1.525  0.154   0.154  0.29   0.31      792.567
            280        1.525  0.154   0.154  0.29   0.32      1
            60         1.525  0.154   0.154  0.29   0.31      0.001
            BD, DUL source: Field measured and checked for sensibility (layer 1, 2, 3, 4, 5, 6, 7, 8)
            AirDry, LL15 source: Estimated based on local knowledge (layer 1, 2, 3, 4, 5, 6, 7, 8)
            SAT source: Calculated from measured, estimated or calculated BD (layer 1, 2, 3, 4, 5, 6, 7, 8)
            SoilCrop maize
              LL=[0.234, 0.234, 0.212, 0.212, 0.137, 0.137, 0.154, 0.154, 0.154]
              KL=[0.08, 0.0689312, 0.0622323, 0.0605945, 0.0559352, 0.0489522, 0.04, 0.03, 0]
              XF=[1, 1, 1, 1, 1, 1, 1, 1, 0]
              LL source: Estimated based on local knowledge (layer 1, 2, 3, 4, 5, 6, 7, 8)
            SoilCrop soybean
              LL=[0.234, 0.234, 0.212, 0.212, 0.137, 0.137, 0.154, 0.154, 0.154]
              KL=[0.08, 0.0689312, 0.0622323, 0.0605945, 0.0559352, 0.0489522, 0.04, 0.03, 0.03]
              XF=[1, 1, 1, 1, 1, 1, 1, 1, 1]
              LL source: Estimated based on local knowledge (layer 1, 2, 3, 4, 5, 6, 7, 8)
            SoilCrop wheat
              LL=[0.234, 0.234, 0.212, 0.212, 0.137, 0.137, 0.154, 0.154, 0.154]
              KL=[0.08, 0.07, 0.06, 0.06, 0.06, 0.05, 0.04, 0.03, 0.03]
              XF=[1, 1, 1, 1, 1, 1, 1, 1, 1]
          SoilOrganicMatter: RootCN=45; RootWt=1000; SoilCN=13; EnrACoeff=7.4; EnrBCoeff=0.2; OCUnits=Total
            Thickness  OC        FBiom     FInert
            250        3.48837   0.03595   0.4216
            250        3.48837   0.01398   0.6248
            40         1.74419   0.011059  0.74164
            40         1.74419   0.010297  0.77212
            190        0.436047  0.01      0.8
            190        0.436047  0.01      0.8
            280        0.145349  0.01      0.8
            280        0.145349  0.01      0.862976
            OC source: Estimated based on local knowledge
          Analysis: PHUnits=Water; BoronUnits=HotWater
            Thickness  Texture  PH     CEC  ParticleSizeSand  ParticleSizeSilt  ParticleSizeClay
            250        CL       6.804  0    35.4              33.6              31
            250        CL       6.804  0    35.4              33.6              31
            40         CL       6.804  0    33.5              36.5              30
            40         CL       6.804  0    33.5              36.5              30
            190        CL       6.804  0    35.9              39.1              25
            190        CL       6.804  0    35.9              39.1              25
            280        CL       6.804  0    38                36                26
            280        CL       6.804  0    38                36                26
            PH source: Estimated based on local knowledge
            CEC, ParticleSizeSand, ParticleSizeSilt, ParticleSizeClay source: Measured
          InitialWater: FractionFull=1; PercentMethod=FilledFromTop
          Sample InitialNitrogen: NO3Units=ppm; NH4Units=ppm; SWUnits=Volumetric; OCUnits=Total; PHUnits=Water
            Thickness  NO3  NH4
            250        0    0
            250        -    -
            40         -    -
            40         -    -
            190        -    -
            190        -    -
            280        -    -
            280        -    -
          Swim: Salb=0.13; CN2Bare=75; CNRed=20; CNCov=0.8; KDul=0.1; PSIDul=-100; VC=true; DTmin=0; DTmax=1440; MaxWaterIncrement=10; SpaceWeightingFactor=0; SoluteSpaceWeightingFactor=0; Diagnostics=false
            SwimSoluteParameters: Dis=15; Disp=1; A=1; DTHP=1
              zero: DTHC, WaterTableCl, WaterTableNO3, WaterTableNH4, WaterTableUrea, WaterTableTracer, WaterTableMineralisationInhibitor, WaterTableUreaseInhibitor, WaterTableNitrificationInhibitor, WaterTableDenitrificationInhibitor
              Thickness  NO3Exco  NO3FIP  NH4Exco  NH4FIP  UreaExco  UreaFIP  ClExco  ClFIP
              1000       0        1       100      1       0         1        0       1
              500        0        1       100      1       0         1        0       1
              20         0        1       100      1       0         1        0       1
            SwimWaterTable: WaterTableDepth=2000
            SwimSubsurfaceDrain: DrainDepth=1200; DrainSpacing=6100; DrainRadius=38; Klat=1000; ImpermDepth=3000
        surfaceom SurfaceOrganicMatter
          PoolName = wheat  # Organic Matter pool name
          type = wheat  # Organic Matter type
          mass = 1000  # Initial surface residue (kg/ha)
          cnr = 80  # C:N ratio of initial residue
          standing_fraction = 0.20  # Fraction of residue standing
        fertiliser
        maize
        wheat
        manager Sow on a fixed date-maize-cc
          # Sowing criteria
          date = 1-may  # Enter sowing date (dd-mmm)
          # Sowing parameters
          crop = maize  # Enter name of crop to sow
          density = 9  # Enter sowing density (plants/m2)
          depth = 50  # Enter sowing depth (mm)
          cultivar = A_110  # Enter cultivar
          class = maize  # Enter crop growth class
          row_spacing = 762  # Enter row spacing (mm)
          on start_of_day:
```
        if (today = date('[date]') then
              [crop] sow plants =[density], sowing_depth = [depth], cultivar = [cultivar], row_spacing = [row_spacing], crop_class = [class]
         endif
```
        manager End crop on a fixed date-maize-cc
          # Harvesting criteria
          crop = maize  # Enter name of crop to harvest when ripe
          date = 30-sep  # Enter ending date (dd-mmm)
          on end_of_day:
```
        if (today = date('[date]') then
              [crop]  end_crop
        endif
```
        manager Sow on a fixed date -rye
          # Sowing criteria
          date = 1-oct  # Enter sowing date (dd-mmm)
          # Sowing parameters
          crop = wheat  # Enter name of crop to sow
          density = 200  # Enter sowing density (plants/m2)
          depth = 40  # Enter sowing depth (mm)
          cultivar = yecora  # Enter cultivar
          class = plant  # Enter crop growth class
          row_spacing = 150  # Enter row spacing (mm)
          on start_of_day:
          script: same as in LongTerm-IA-corn.IA-CC_Canisteo_Cover.paddock.Sow on a fixed date-maize-cc
        manager End crop on a fixed date -rye
          # Harvesting criteria
          crop = wheat  # Enter name of crop to harvest when ripe
          date = 25-apr  # Enter ending date (dd-mmm)
          on end_of_day:
```
        if (today = date('[date]') then
              [crop]  end_crop
        endif
```
        manager Fertilise at sowing
          # When should fertiliser be applied
          modulename = maize  # On which module should the event come from
          eventname = sowing  # On which event should fertiliser be applied
          # Fertiliser application details
          fertmodule = fertiliser  # Module used to apply the fertiliser
          fert_amount_sow = 150  # Amount of starter fertiliser at sowing (kg/ha)
          fert_type_sow = urea_N  # Sowing fertiliser type
          on [modulename].[eventname]:
```
        [fertmodule] apply amount = [fert_amount_sow] (kg/ha), depth = 50 (mm), type = [fert_type_sow]
```
        erosion
          model = freebairn  # Model Name
          slope = 2  # Slope of plot in percent (%)
          slope_length = 60.0  # Length of plot (m)
          k_factor = 0.29  # Soil erodibility factor (t/ha/EI 30 )
          p_factor = 0.9  # Supporting practise factor (unitless)
          bed_depth = 1900  # Depth to bedrock (mm)
          profile_reduction = off
          profile_layer_merge = 0.05  # Fraction of original size in which the lowest layer is merged into the layer above (0-1)
          minimum_depth = 100.0  # If the profile erodes to this depth, the simulation is stopped (mm)
        outputfile: filename=IA-CC_Canisteo_Cover.out; title=IA-CC_Canisteo_Cover
          variables
            variables: dd/mm/yyyy as Date, biomass, yield, day, year, rain, sw, runoff, subsurface_drain, esw, cep, ep, transpiration, transp_eff, transpiration_tot, subsurface_drain_no3
          events Reporting Frequency: event=Daily
    simulation IA-CC_Canisteo_No-Cover
      metfile met: filename=boone-10-19.met
      clock
        start_date = 01/01/2010  # Enter the start date of the simulation
        end_date = 09/11/2019  # Enter the end date of the simulation
      summaryfile
      area paddock
        Soil CL (Canisteo No209): same as LongTerm-IA-corn.IA-CC_Canisteo_Cover.paddock.CL (Canisteo No209)
        surfaceom SurfaceOrganicMatter
          PoolName = wheat  # Organic Matter pool name
          type = wheat  # Organic Matter type
          mass = 1000  # Initial surface residue (kg/ha)
          cnr = 80  # C:N ratio of initial residue
          standing_fraction = 0.20  # Fraction of residue standing
        fertiliser
        maize
        manager Sow on a fixed date-maize: same as LongTerm-IA-corn.IA-CC_Canisteo_Cover.paddock.Sow on a fixed date-maize-cc
        manager End crop on a fixed date -maize
          # Harvesting criteria
          crop = maize  # Enter name of crop to harvest when ripe
          date = 30-sep  # Enter ending date (dd-mmm)
          on end_of_day:
```
        if (today = date('[date]') then
              [crop]  end_crop
        endif
```
        manager Fertilise at sowing: same as LongTerm-IA-corn.IA-CC_Canisteo_Cover.paddock.Fertilise at sowing
        erosion: same as LongTerm-IA-corn.IA-CC_Canisteo_Cover.paddock.Erosion
        outputfile: filename=IA-CC_Canisteo_No-Cover.out; title=IA-CC_Canisteo_No-Cover
          variables
            variables: dd/mm/yyyy as Date, biomass, yield, day, year, rain, sw, tt, zadok_stage, subsurface_drain_no3, no3(1-4), biomass_n, subsurface_drain, runoff, soil_loss, subsurface_drain_no3, surfaceom_cover, stover_wt, oc(1), fom_c(1), surfaceom_wt, sw_stress_expan
          events Reporting Frequency: event=Daily
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